# OpenSim document version 40000
InverseKinematicsTool:
  model_file: ..\Scaling\scaledModelAdjusted.osim
  time_range: 0.337 0.601
  output_motion_file: ikResults.mot
  marker_file: ..\Data\maxSprint_virtualMarkers.trc
  IKTaskSet MU2392_Arms_Scale:
    IKMarkerTask C7: apply=true weight=10
    IKMarkerTask T10: apply=true weight=2
    IKMarkerTask CLAV: apply=true weight=10
    IKMarkerTask STRN: apply=true weight=5
    IKMarkerTask MTOR: apply=true weight=10
    IKMarkerTask RACR: apply=true weight=20
    IKMarkerTask LACR: apply=true weight=20
    IKMarkerTask RASI: apply=true weight=20
    IKMarkerTask LASI: apply=true weight=20
    IKMarkerTask LPSI: apply=true weight=20
    IKMarkerTask RPSI: apply=true weight=20
    IKMarkerTask MPEL: apply=true weight=20
    IKMarkerTask RTH1: apply=true weight=5
    IKMarkerTask RTH2: apply=true weight=5
    IKMarkerTask RTH3: apply=true weight=5
    IKMarkerTask RHJC: apply=true weight=20
    IKMarkerTask RLFC: apply=false weight=1
    IKMarkerTask RTB1: apply=true weight=5
    IKMarkerTask RTB2: apply=true weight=5
    IKMarkerTask RTB3: apply=true weight=5
    IKMarkerTask RLMAL: apply=false weight=1
    IKMarkerTask RMMAL: apply=false weight=1
    IKMarkerTask RCAL: apply=true weight=10
    IKMarkerTask RMT5: apply=true weight=5
    IKMarkerTask RMT1: apply=true weight=2.5
    IKMarkerTask LTH1: apply=true weight=5
    IKMarkerTask LTH2: apply=true weight=5
    IKMarkerTask LTH3: apply=true weight=5
    IKMarkerTask LHJC: apply=true weight=20
    IKMarkerTask LLFC: apply=false weight=1
    IKMarkerTask LTB1: apply=true weight=5
    IKMarkerTask LTB2: apply=true weight=5
    IKMarkerTask LTB3: apply=true weight=5
    IKMarkerTask LLMAL: apply=false weight=1
    IKMarkerTask LMMAL: apply=false weight=1
    IKMarkerTask LCAL: apply=true weight=10
    IKMarkerTask LMT5: apply=true weight=5
    IKMarkerTask LMT1: apply=true weight=2.5
