# OpenSim document version 40000
Model gait9dof18musc_Ong_et_al:
  length_units: meters
  force_units: N
  gravity: 0 -9.80665 0
  credits:
    A planar reduced gait model with 9 degrees of freedom and 18 muscles by Ajay Seth. Adjusted by Carmichael Ong to follow muscle strengths of Handsfield/Rajagopal and changed hamstrings to follow semimembranosus. Ankle passive mechanics based on Weiss, Kearney, and Hunter 1986. Closely based on Delp S.L., Loan J.P., Hoy M.G., Zajac F.E., Topp E.L., Rosen J.M., Thelen D.G., Anderson F.C., Seth A. Notes: 3D, 23 DOF gait model created by D.G. Thelen, Univ. of Wisconsin-Madison, and Ajay Seth, Frank C. Anderson, and Scott L. Delp, Stanford University. Lower extremity joint defintions based on Delp et al. (1990). Low back joint and anthropometry based on Anderson and Pandy (1999, 2001). Planar knee model of Yamaguchi and Zajac (1989). Seth replaced tibia translation constraints with a CustomJoint for the knee and removed the patella to eliminate all kinematic constraints; insertions of the quadrucepts are handled with moving points in the tibia frame as defined by Delp 1990. Number of muscles was reduced by Anderson to improve simulation speed for demonstrations and is not intended to be used in research. License: Creative Commons (CCBY 3.0). You are free to distribute, remix, tweak, and build upon this work, even commercially, as long as you credit us for the original creation. http://creativecommons.org/licenses/by/3.0/ More Information: http://simtk-confluence.stanford.edu:8080/display/OpenSim/Gait+2392+and+2354+Models
  publications:
    Delp, S.L., Loan, J.P., Hoy, M.G., Zajac, F.E., Topp E.L., Rosen, J.M.: An interactive graphics-based model of the lower extremity to study orthopaedic surgical procedures, IEEE Transactions on Biomedical Engineering, vol. 37, pp. 757-767, 1990. Yamaguchi G.T., Zajac F.E.: A planar model of the knee joint to characterize the knee extensor mechanism." J . Biomech. vol. 22. pp. 1-10. 1989. Anderson F.C., Pandy M.G.: A dynamic optimization solution for vertical jumping in three dimensions. Computer Methods in Biomechanics and Biomedical Engineering 2:201-231, 1999. Anderson F.C., Pandy M.G.: Dynamic optimization of human walking. Journal of Biomechanical Engineering 123:381-390, 2001.
  Ground
  BodySet:
    Body pelvis: mass=9.714334 [kg] mass_center=(-0.0682778 0 0) inertia=(0.08149288 0.08149288 0.04454276 0 0 0)
        meshes=(r_pelvis.vtp l_pelvis.vtp sacrum.vtp)
    Body femur_l: mass=7.672319 mass_center=(0 -0.170467 0) inertia=(0.1110555 0.02911163 0.11711 0 0 0)
        meshes=femur_l.vtp
    Body femur_r: mass=7.672319 mass_center=(0 -0.170467 0) inertia=(0.1110555 0.02911163 0.11711 0 0 0)
        meshes=femur_r.vtp
    Body tibia_l: mass=3.058155 mass_center=(0 -0.180489 0) inertia=(0.0388527 0.003931523 0.03939232 0 0 0)
        meshes=(tibia_l.vtp l_fibula.vtp)
    Body tibia_r: mass=3.058155 mass_center=(0 -0.180489 0) inertia=(0.0388527 0.003931523 0.03939232 0 0 0)
        meshes=(tibia_r.vtp r_fibula.vtp)
    Body talus_l: mass=0.08248564 mass_center=(0 0 0) inertia=(0.0006889677 0.0006889677 0.0006889677 0 0 0)
        meshes=l_talus.vtp
    Body talus_r: mass=0.08248564 mass_center=(0 0 0) inertia=(0.0006889677 0.0006889677 0.0006889677 0 0 0)
        meshes=r_talus.vtp
    Body calcn_l: mass=1.03107 mass_center=(0.0913924 0.0274177 0) inertia=(0.0009645548 0.002686974 0.002824768 0 0 0)
        meshes=l_foot.vtp
    Body calcn_r: mass=1.03107 mass_center=(0.0913924 0.0274177 0) inertia=(0.0009645548 0.002686974 0.002824768 0 0 0)
        meshes=r_foot.vtp
    Body toes_l: mass=0.1786639 mass_center=(0.0316218 0.00548355 0.0159937)
        inertia=(6.889677e-5 0.0001377935 6.889677e-5 0 0 0) meshes=l_bofoot.vtp
    Body toes_r: mass=0.1786639 mass_center=(0.0316218 0.00548355 -0.0159937)
        inertia=(6.889677e-5 0.0001377935 6.889677e-5 0 0 0) meshes=r_bofoot.vtp
    Body torso: mass=28.24028 mass_center=(-0.0289722 0.309037 0) inertia=(1.140436 0.5934009 1.140436 0 0 0)
        meshes=(hat_spine.vtp hat_jaw.vtp hat_skull.vtp hat_ribs.vtp)
  JointSet:
    PlanarJoint ground_pelvis: socket_parent_frame=ground_offset socket_child_frame=pelvis_offset
      Coordinate pelvis_tilt: range=(-1.570796 1.570796)
      Coordinate pelvis_tx: range=(-5 5)
      Coordinate pelvis_ty: range=(-3 3)
      PhysicalOffsetFrame ground_offset: socket_parent=/ground translation=(0 0 0) [meters]
      PhysicalOffsetFrame pelvis_offset: socket_parent=/bodyset/pelvis translation=(0 0 0)
    PinJoint hip_l: socket_parent_frame=pelvis_offset socket_child_frame=femur_l_offset
      Coordinate hip_flexion_l: range=(-2.094395 2.094395)
      PhysicalOffsetFrame pelvis_offset: socket_parent=/bodyset/pelvis translation=(-0.0682778 -0.0638354 -0.08233069)
      PhysicalOffsetFrame femur_l_offset: socket_parent=/bodyset/femur_l translation=(0 0 0)
    PinJoint hip_r: socket_parent_frame=pelvis_offset socket_child_frame=femur_r_offset
      Coordinate hip_flexion_r: range=(-2.094395 2.094395)
      PhysicalOffsetFrame pelvis_offset: socket_parent=/bodyset/pelvis translation=(-0.0682778 -0.0638354 0.08233069)
      PhysicalOffsetFrame femur_r_offset: socket_parent=/bodyset/femur_r translation=(0 0 0)
    PinJoint knee_l: socket_parent_frame=femur_l_offset socket_child_frame=tibia_l_offset
      Coordinate knee_angle_l: range=(-2.094395 0.1745329)
      PhysicalOffsetFrame femur_l_offset: socket_parent=/bodyset/femur_l translation=(-0.004512212 -0.3969072 0)
      PhysicalOffsetFrame tibia_l_offset: socket_parent=/bodyset/tibia_l translation=(0 0 0)
    PinJoint knee_r: socket_parent_frame=femur_r_offset socket_child_frame=tibia_r_offset
      Coordinate knee_angle_r: range=(-2.094395 0.1745329)
      PhysicalOffsetFrame femur_r_offset: socket_parent=/bodyset/femur_r translation=(-0.004512212 -0.3969072 0)
      PhysicalOffsetFrame tibia_r_offset: socket_parent=/bodyset/tibia_r translation=(0 0 0)
    PinJoint ankle_l: socket_parent_frame=tibia_l_offset socket_child_frame=talus_l_offset
      Coordinate ankle_angle_l: range=(-1.047198 1.047198)
      PhysicalOffsetFrame tibia_l_offset: socket_parent=/bodyset/tibia_l translation=(0 -0.4156948 0)
      PhysicalOffsetFrame talus_l_offset: socket_parent=/bodyset/talus_l translation=(0 0 0)
    PinJoint ankle_r: socket_parent_frame=tibia_r_offset socket_child_frame=talus_r_offset
      Coordinate ankle_angle_r: range=(-1.047198 1.047198)
      PhysicalOffsetFrame tibia_r_offset: socket_parent=/bodyset/tibia_r translation=(0 -0.4156948 0)
      PhysicalOffsetFrame talus_r_offset: socket_parent=/bodyset/talus_r translation=(0 0 0)
    WeldJoint subtalar_l: socket_parent_frame=talus_l_offset socket_child_frame=calcn_l_offset
      PhysicalOffsetFrame talus_l_offset: socket_parent=/bodyset/talus_l
          translation=(-0.04457209 -0.03833913 -0.007238281)
      PhysicalOffsetFrame calcn_l_offset: socket_parent=/bodyset/calcn_l translation=(0 0 0)
    WeldJoint subtalar_r: socket_parent_frame=talus_r_offset socket_child_frame=calcn_r_offset
      PhysicalOffsetFrame talus_r_offset: socket_parent=/bodyset/talus_r
          translation=(-0.04457209 -0.03833913 0.007238281)
      PhysicalOffsetFrame calcn_r_offset: socket_parent=/bodyset/calcn_r translation=(0 0 0)
    WeldJoint mtp_l: socket_parent_frame=calcn_l_offset socket_child_frame=toes_l_offset
      PhysicalOffsetFrame calcn_l_offset: socket_parent=/bodyset/calcn_l
          translation=(0.1634097 -0.001827849 -0.0009870383)
      PhysicalOffsetFrame toes_l_offset: socket_parent=/bodyset/toes_l translation=(0 0 0)
    WeldJoint mtp_r: socket_parent_frame=calcn_r_offset socket_child_frame=toes_r_offset
      PhysicalOffsetFrame calcn_r_offset: socket_parent=/bodyset/calcn_r
          translation=(0.1634097 -0.001827849 0.0009870383)
      PhysicalOffsetFrame toes_r_offset: socket_parent=/bodyset/toes_r translation=(0 0 0)
    PinJoint back: socket_parent_frame=pelvis_offset socket_child_frame=torso_offset
      Coordinate lumbar_extension: range=(-1.570796 1.570796)
      PhysicalOffsetFrame pelvis_offset: socket_parent=/bodyset/pelvis translation=(-0.09724999 0.07870779 0)
      PhysicalOffsetFrame torso_offset: socket_parent=/bodyset/torso translation=(0 0 0)
  ForceSet:
    SmoothSphereHalfSpaceForce [values shared by the 12 below unless stated]: socket_half_space=/contactgeometryset/floor
        stiffness=3067776 [N/m^2] dissipation=2 [s/m] static_friction=0.95 dynamic_friction=0.3 viscous_friction=0.3
        transition_velocity=0.001 [m/s] hertz_smoothing=300 hunt_crossley_smoothing=50
    SmoothSphereHalfSpaceForce contactHeel_r: socket_sphere=/contactgeometryset/heel_r derivative_smoothing=1e-5
    SmoothSphereHalfSpaceForce contactMH1_r: socket_sphere=/contactgeometryset/mh1_r
    SmoothSphereHalfSpaceForce contactMH3_r: socket_sphere=/contactgeometryset/mh3_r
    SmoothSphereHalfSpaceForce contactMH5_r: socket_sphere=/contactgeometryset/mh5_r
    SmoothSphereHalfSpaceForce contactToe1_r: socket_sphere=/contactgeometryset/toe1_r derivative_smoothing=1e-5
    SmoothSphereHalfSpaceForce contactToe2_r: socket_sphere=/contactgeometryset/toe2_r
    SmoothSphereHalfSpaceForce contactHeel_l: socket_sphere=/contactgeometryset/heel_l derivative_smoothing=1e-5
    SmoothSphereHalfSpaceForce contactMH1_l: socket_sphere=/contactgeometryset/mh1_l
    SmoothSphereHalfSpaceForce contactMH3_l: socket_sphere=/contactgeometryset/mh3_l
    SmoothSphereHalfSpaceForce contactMH5_l: socket_sphere=/contactgeometryset/mh5_l
    SmoothSphereHalfSpaceForce contactToe1_l: socket_sphere=/contactgeometryset/toe1_l derivative_smoothing=1e-5
    SmoothSphereHalfSpaceForce contactToe2_l: socket_sphere=/contactgeometryset/toe2_l
    CoordinateActuator lumbarAct: coordinate=lumbar_extension optimal_force=10
    DeGrooteFregly2016Muscle [values shared by the 18 below unless stated]: min_control=0.01 max_control=1
        max_contraction_velocity=15 activation_time_constant=0.01 deactivation_time_constant=0.04
        default_activation=0.01 active_force_width_scale=1 fiber_damping=0.01 tendon_strain_at_one_norm_force=0.049
        ignore_passive_fiber_force=false
    DeGrooteFregly2016Muscle hamstrings_r: max_isometric_force=4105.466 optimal_fiber_length=0.069
        tendon_slack_length=0.349 pennation_angle_at_optimal=0.2617994 [radians]
      PathPoint bifemlh_r-P1: pelvis (-0.121645 -0.0990559 0.0684676)
      PathPoint bifemlh_r-P2: tibia_r (-0.0290986 -0.0348024 0.0284509)
      PathPoint bifemlh_r-P3: tibia_r (-0.0226215 -0.054427 0.0331589)
    DeGrooteFregly2016Muscle bifemsh_r: max_isometric_force=557.1148 optimal_fiber_length=0.11
        tendon_slack_length=0.117 pennation_angle_at_optimal=0.4014257
      PathPoint P1: femur_r (0.00501373 -0.211679 0.0234642)
      PathPoint P2: tibia_r (-0.0290986 -0.0348024 0.0284509)
      PathPoint P3: tibia_r (-0.0226215 -0.054427 0.0331589)
    DeGrooteFregly2016Muscle glut_max_r: max_isometric_force=3337.584 optimal_fiber_length=0.157
        tendon_slack_length=0.048 pennation_angle_at_optimal=0
      PathPoint P1: pelvis (-0.127188 0.00840194 0.045553)
      PathPoint P2: pelvis (-0.129795 -0.0588136 0.0801615)
      PathPoint P3: femur_r (-0.0451235 -0.0585603 0.0252692)
      PathPoint P4: femur_r (-0.0156428 -0.101879 0.042015)
    DeGrooteFregly2016Muscle iliopsoas_r: max_isometric_force=2697.344 optimal_fiber_length=0.117
        tendon_slack_length=0.13 pennation_angle_at_optimal=0.1396263
      PathPoint psoas_r-P1: pelvis (-0.0624834 0.0856611 0.0284953)
      PathPoint psoas_r-P2: pelvis (-0.0229846 -0.0550472 0.0748371)
      ConditionalPathPoint psoas_r-P3: pelvis (-0.0278133 -0.077742 0.0804573) range=(-1.5708 0.785398)
          coordinate=hip_flexion_r socket_coordinate=/jointset/hip_r/hip_flexion_r
      PathPoint psoas_r-P4: femur_r (0.00160439 -0.0508392 0.00381043)
      PathPoint psoas_r-P5: femur_r (-0.0188516 -0.0598639 0.0104285)
    DeGrooteFregly2016Muscle rect_fem_r: max_isometric_force=2191.741 optimal_fiber_length=0.076
        tendon_slack_length=0.346 pennation_angle_at_optimal=0.08726646
      PathPoint P1: pelvis (-0.0284893 -0.0300345 0.0954444)
      ConditionalPathPoint P2: femur_r (0.0334917 -0.404106 0.00190522) range=(-2.61799 -1.45997)
          socket_coordinate=/jointset/knee_r/knee_angle_r
      MovingPathPoint P3: tibia_r (0.0597031 0.0202859 0.00135343) socket_x_coordinate=/jointset/knee_r/knee_angle_r
          socket_y_coordinate=/jointset/knee_r/knee_angle_r socket_z_coordinate=/jointset/knee_r/knee_angle_r
        x_location: MultiplierFunction: scale=0.9667322
          SimmSpline: x=(-2.0944 -1.99997 -1.5708 -1.45752 -1.39626 -1.0472 -0.698132 -0.526391 -0.349066 -0.174533 0 0.00017453 0.00034907 0.0279253 0.0872665 0.174533 2.0944)
              y=(0.0155805 0.0179938 0.0275081 0.0296564 0.0307615 0.0365695 0.0422074 0.0450902 0.048391 0.0534299 0.0617576 0.0617669 0.0617762 0.0633083 0.066994 0.0733035 0.0573481)
        y_location: MultiplierFunction: scale=0.9667322
          SimmSpline: x=(-2.0944 -1.99997 -1.5708 -1.45752 -1.39626 -1.0472 -0.698132 -0.526391 -0.349066 -0.174533 0 0.00017453 0.00034907 0.0279253 0.0872665 0.174533 2.0944)
              y=(0.0234116 0.0237613 0.0251141 0.0252795 0.0253146 0.0249184 0.0242373 0.0238447 0.0234197 0.0227644 0.020984 0.0209814 0.0209788 0.0205225 0.0191754 0.0159554 -0.0673774)
        z_location: MultiplierFunction: scale=0.9667322
          SimmSpline: x=(-2.0944 0.1745) y=(0.0014 0.0014)
    DeGrooteFregly2016Muscle vasti_r: max_isometric_force=9593.951 optimal_fiber_length=0.099 tendon_slack_length=0.102
        pennation_angle_at_optimal=0.05235988
      PathPoint vas_int_r-P1: femur_r (0.0290796 -0.192928 0.0310851)
      PathPoint vas_int_r-P2: femur_r (0.033592 -0.208972 0.0285782)
      ConditionalPathPoint vas_int_r-P3: femur_r (0.0343942 -0.404106 0.0055151) range=(-2.61799 -1.42)
          socket_coordinate=/jointset/knee_r/knee_angle_r
      MovingPathPoint vas_int_r-P4: tibia_r (0.0536181 0.0244509 0.00174012)
          socket_x_coordinate=/jointset/knee_r/knee_angle_r socket_y_coordinate=/jointset/knee_r/knee_angle_r
          socket_z_coordinate=/jointset/knee_r/knee_angle_r
        x_location: MultiplierFunction: scale=0.9667322
          SimmSpline: x=(-2.0944 -1.99997 -1.5708 -1.45752 -1.39626 -1.0472 -0.698132 -0.526391 -0.349066 -0.174533 0 0.00017453 0.00034907 0.0279253 0.0872665 0.174533 2.0944)
              y=(0.0082733 0.0106866 0.0202042 0.022353 0.0234583 0.0292715 0.0349465 0.037871 0.0412569 0.0465287 0.0554632 0.0554735 0.0554837 0.0571717 0.061272 0.0684368 0.0648818)
        y_location: MultiplierFunction: scale=0.9667322
          SimmSpline: x=(-2.0944 -1.99997 -1.5708 -1.45752 -1.39626 -1.0472 -0.698132 -0.526391 -0.349066 -0.174533 0 0.00017453 0.00034907 0.0279253 0.0872665 0.174533 2.0944)
              y=(0.025599 0.0259487 0.0273124 0.0274796 0.0275151 0.0271363 0.0265737 0.0263073 0.0261187 0.0260129 0.0252923 0.0252911 0.0252898 0.0250526 0.0242191 0.0218288 -0.0685706)
        z_location: MultiplierFunction: scale=0.9667322
          SimmSpline: x=(-2.0944 2.0944) y=(0.0018 0.0018)
    DeGrooteFregly2016Muscle gastroc_r: max_isometric_force=4690.574 optimal_fiber_length=0.051
        tendon_slack_length=0.384 pennation_angle_at_optimal=0.296706 tendon_strain_at_one_norm_force=0.1
      PathPoint med_gas_r-P1: femur_r (-0.0190522 -0.393979 -0.0235645)
      ConditionalPathPoint med_gas_r-P2: femur_r (-0.0300824 -0.403304 -0.0258708) range=(-0.785398 0.174533)
          socket_coordinate=/jointset/knee_r/knee_angle_r
      PathPoint med_gas_r-P3: calcn_r (0 0.0283317 -0.0048438)
    DeGrooteFregly2016Muscle soleus_r: max_isometric_force=7924.997 optimal_fiber_length=0.044
        tendon_slack_length=0.244 pennation_angle_at_optimal=0.4363323 tendon_strain_at_one_norm_force=0.1
      PathPoint P1: tibia_r (-0.00232016 -0.1482 0.0068638)
      PathPoint P2: calcn_r (0 0.0283317 -0.0048438)
    DeGrooteFregly2016Muscle tib_ant_r: max_isometric_force=2116.818 optimal_fiber_length=0.068
        tendon_slack_length=0.238 pennation_angle_at_optimal=0.08726646
      PathPoint P1: tibia_r (0.0173045 -0.156997 0.0111174)
      PathPoint P2: tibia_r (0.0318055 -0.381956 -0.0171112)
      PathPoint P3: calcn_r (0.106564 0.0162679 -0.0278747)
    DeGrooteFregly2016Muscle hamstrings_l: max_isometric_force=4105.466 optimal_fiber_length=0.069
        tendon_slack_length=0.349 pennation_angle_at_optimal=0.2617994
      PathPoint bifemlh_l-P1: pelvis (-0.121645 -0.0990559 -0.0684676)
      PathPoint bifemlh_l-P2: tibia_l (-0.0290986 -0.0348024 -0.0284509)
      PathPoint bifemlh_l-P3: tibia_l (-0.0226215 -0.054427 -0.0331589)
    DeGrooteFregly2016Muscle bifemsh_l: max_isometric_force=557.1148 optimal_fiber_length=0.11
        tendon_slack_length=0.117 pennation_angle_at_optimal=0.4014257
      PathPoint P1: femur_l (0.00501373 -0.211679 -0.0234642)
      PathPoint P2: tibia_l (-0.0290986 -0.0348024 -0.0284509)
      PathPoint P3: tibia_l (-0.0226215 -0.054427 -0.0331589)
    DeGrooteFregly2016Muscle glut_max_l: max_isometric_force=3337.584 optimal_fiber_length=0.157
        tendon_slack_length=0.048 pennation_angle_at_optimal=0
      PathPoint P1: pelvis (-0.127188 0.00840194 -0.045553)
      PathPoint P2: pelvis (-0.129795 -0.0588136 -0.0801615)
      PathPoint P3: femur_l (-0.0451235 -0.0585603 -0.0252692)
      PathPoint P4: femur_l (-0.0156428 -0.101879 -0.042015)
    DeGrooteFregly2016Muscle iliopsoas_l: max_isometric_force=2697.344 optimal_fiber_length=0.117
        tendon_slack_length=0.13 pennation_angle_at_optimal=0.1396263
      PathPoint psoas_l-P1: pelvis (-0.0624834 0.0856611 -0.0284953)
      PathPoint psoas_l-P2: pelvis (-0.0229846 -0.0550472 -0.0748371)
      ConditionalPathPoint psoas_l-P3: pelvis (-0.0278133 -0.077742 -0.0804573) range=(-1.5708 0.785398)
          socket_coordinate=/jointset/hip_l/hip_flexion_l
      PathPoint psoas_l-P4: femur_l (0.00160439 -0.0508392 -0.00381043)
      PathPoint psoas_l-P5: femur_l (-0.0188516 -0.0598639 -0.0104285)
    DeGrooteFregly2016Muscle rect_fem_l: max_isometric_force=2191.741 optimal_fiber_length=0.076
        tendon_slack_length=0.346 pennation_angle_at_optimal=0.08726646
      PathPoint P1: pelvis (-0.0284893 -0.0300345 -0.0954444)
      ConditionalPathPoint P2: femur_l (0.0334917 -0.404106 -0.00190522) range=(-2.61799 -1.45997)
          socket_coordinate=/jointset/knee_l/knee_angle_l
      MovingPathPoint P3: tibia_l (0.0597031 0.0202859 -0.00135343) socket_x_coordinate=/jointset/knee_l/knee_angle_l
          socket_y_coordinate=/jointset/knee_l/knee_angle_l socket_z_coordinate=/jointset/knee_l/knee_angle_l
        x_location: MultiplierFunction: scale=0.9667322
          SimmSpline: x=(-2.0944 -1.99997 -1.5708 -1.45752 -1.39626 -1.0472 -0.698132 -0.526391 -0.349066 -0.174533 0 0.00017453 0.00034907 0.0279253 0.0872665 0.174533 2.0944)
              y=(0.0155805 0.0179938 0.0275081 0.0296564 0.0307615 0.0365695 0.0422074 0.0450902 0.048391 0.0534299 0.0617576 0.0617669 0.0617762 0.0633083 0.066994 0.0733035 0.0573481)
        y_location: MultiplierFunction: scale=0.9667322
          SimmSpline: x=(-2.0944 -1.99997 -1.5708 -1.45752 -1.39626 -1.0472 -0.698132 -0.526391 -0.349066 -0.174533 0 0.00017453 0.00034907 0.0279253 0.0872665 0.174533 2.0944)
              y=(0.0234116 0.0237613 0.0251141 0.0252795 0.0253146 0.0249184 0.0242373 0.0238447 0.0234197 0.0227644 0.020984 0.0209814 0.0209788 0.0205225 0.0191754 0.0159554 -0.0673774)
        z_location: MultiplierFunction: scale=0.9667322
          SimmSpline: x=(-2.0944 0.1745) y=(-0.0014 -0.0014)
    DeGrooteFregly2016Muscle vasti_l: max_isometric_force=9593.951 optimal_fiber_length=0.099 tendon_slack_length=0.102
        pennation_angle_at_optimal=0.05235988
      PathPoint vas_int_l-P1: femur_l (0.0290796 -0.192928 -0.0310851)
      PathPoint vas_int_l-P2: femur_l (0.033592 -0.208972 -0.0285782)
      ConditionalPathPoint vas_int_l-P3: femur_l (0.0343942 -0.404106 -0.0055151) range=(-2.61799 -1.42)
          socket_coordinate=/jointset/knee_l/knee_angle_l
      MovingPathPoint vas_int_l-P4: tibia_l (0.0536181 0.0244509 -0.00174012)
          socket_x_coordinate=/jointset/knee_l/knee_angle_l socket_y_coordinate=/jointset/knee_l/knee_angle_l
          socket_z_coordinate=/jointset/knee_l/knee_angle_l
        x_location: MultiplierFunction: scale=0.9667322
          SimmSpline: x=(-2.0944 -1.99997 -1.5708 -1.45752 -1.39626 -1.0472 -0.698132 -0.526391 -0.349066 -0.174533 0 0.00017453 0.00034907 0.0279253 0.0872665 0.174533 2.0944)
              y=(0.0082733 0.0106866 0.0202042 0.022353 0.0234583 0.0292715 0.0349465 0.037871 0.0412569 0.0465287 0.0554632 0.0554735 0.0554837 0.0571717 0.061272 0.0684368 0.0648818)
        y_location: MultiplierFunction: scale=0.9667322
          SimmSpline: x=(-2.0944 -1.99997 -1.5708 -1.45752 -1.39626 -1.0472 -0.698132 -0.526391 -0.349066 -0.174533 0 0.00017453 0.00034907 0.0279253 0.0872665 0.174533 2.0944)
              y=(0.025599 0.0259487 0.0273124 0.0274796 0.0275151 0.0271363 0.0265737 0.0263073 0.0261187 0.0260129 0.0252923 0.0252911 0.0252898 0.0250526 0.0242191 0.0218288 -0.0685706)
        z_location: MultiplierFunction: scale=0.9667322
          SimmSpline: x=(-2.0944 2.0944) y=(-0.0018 -0.0018)
    DeGrooteFregly2016Muscle gastroc_l: max_isometric_force=4690.574 optimal_fiber_length=0.051
        tendon_slack_length=0.384 pennation_angle_at_optimal=0.296706 tendon_strain_at_one_norm_force=0.1
      PathPoint med_gas_l-P1: femur_l (-0.0190522 -0.393979 0.0235645)
      ConditionalPathPoint med_gas_l-P2: femur_l (-0.0300824 -0.403304 0.0258708) range=(-0.785398 0.174533)
          socket_coordinate=/jointset/knee_l/knee_angle_l
      PathPoint med_gas_l-P3: calcn_l (0 0.0283317 0.0048438)
    DeGrooteFregly2016Muscle soleus_l: max_isometric_force=7924.997 optimal_fiber_length=0.044
        tendon_slack_length=0.244 pennation_angle_at_optimal=0.4363323 tendon_strain_at_one_norm_force=0.1
      PathPoint P1: tibia_l (-0.00232016 -0.1482 -0.0068638)
      PathPoint P2: calcn_l (0 0.0283317 0.0048438)
    DeGrooteFregly2016Muscle tib_ant_l: max_isometric_force=2116.818 optimal_fiber_length=0.068
        tendon_slack_length=0.238 pennation_angle_at_optimal=0.08726646
      PathPoint P1: tibia_l (0.0173045 -0.156997 -0.0111174)
      PathPoint P2: tibia_l (0.0318055 -0.381956 0.0171112)
      PathPoint P3: calcn_l (0.106564 0.0162679 0.0278747)
  MarkerSet:
    Marker C7: torso (-0.0719118 0.443847 -6.51926e-9) fixed=true
    Marker T10: torso (-0.107789 0.15861 -0.00935266) fixed=true
    Marker CLAV: torso (0.0508116 0.364705 0.000956381) fixed=true
    Marker STRN: torso (0.110846 0.197126 -0.00206165)
    Marker RACR: torso (-0.0183681 0.416587 0.143744) fixed=true
    Marker LACR: torso (-0.0163361 0.418496 -0.139563) fixed=true
    Marker MTOR: torso (-0.0139511 0.4109087 0.001284344) fixed=true
    Marker RASI: pelvis (0.0102084 0.0110517 0.129031) fixed=true
    Marker LASI: pelvis (0.0107003 0.0110903 -0.128859) fixed=true
    Marker RPSI: pelvis (-0.170415 0.0392144 0.0451596) fixed=true
    Marker LPSI: pelvis (-0.161044 0.0405656 -0.0470868) fixed=true
    Marker MPEL: pelvis (-0.07763758 0.0254805 -0.0004388) fixed=true
    Marker RTH1: femur_r (0.00409299 -0.111769 0.101648)
    Marker RTH2: femur_r (0.0831463 -0.195595 0.0830509)
    Marker RTH3: femur_r (0.0133172 -0.259861 0.0886074)
    Marker RHJC: femur_r (0 0 0) fixed=true
    Marker RLFC: femur_r (0.00994012 -0.3928361 0.05346824) fixed=true
    Marker RMFC: femur_r (0.009940123 -0.3878972 -0.05495864) fixed=true
    Marker RKJC: femur_r (0.009940121 -0.3903666 -0.0007452) fixed=true
    Marker RTB3: tibia_r (0.0323191 -0.240317 -0.00217926)
    Marker RTB2: tibia_r (0.0123407 -0.172087 0.05579)
    Marker RTB1: tibia_r (0.0282208 -0.114424 -0.00737411)
    Marker RLMAL: tibia_r (-0.005001464 -0.3811132 0.05315813) fixed=true
    Marker RMMAL: tibia_r (0.005661898 -0.370504 -0.03899428) fixed=true
    Marker RAJC: tibia_r (0.000330217 -0.3758086 0.007081923) fixed=true
    Marker fRAJC: tibia_r (0.00033153 -0.445442 0.0099277) fixed=true
    Marker RCAL: calcn_r (-0.0346145 0.033579 -0.00729209) fixed=true
    Marker fRCAL: calcn_r (-0.0346145 -0.00349207 -0.00729209) fixed=true
    Marker RMT5: toes_r (-2.5e-5 0.035579 0.046275) fixed=true
    Marker fRMT5: toes_r (-2.5e-5 -0.00149207 0.046275) fixed=true
    Marker RMT1: toes_r (0.019064 0.035579 -0.0272685) fixed=true
    Marker fRMT1: toes_r (0.019063 -0.00149207 -0.0272685) fixed=true
    Marker RMT3: toes_r (0.009519 0.035579 0.0095033) fixed=true
    Marker fRMT3: toes_r (0.009519 -0.00149207 0.00950325) fixed=true
    Marker LTH1: femur_l (0.0170418 -0.105203 -0.0985949)
    Marker LTH2: femur_l (0.0787166 -0.185847 -0.0924006)
    Marker LTH3: femur_l (0.0148498 -0.252185 -0.0905964)
    Marker LHJC: femur_l (0 0 0) fixed=true
    Marker LLFC: femur_l (0.00994012 -0.392836 -0.0534682) fixed=true
    Marker LMFC: femur_l (0.00994012 -0.387897 0.0549586) fixed=true
    Marker LKJC: femur_l (0.009940121 -0.3903666 0.0007452) fixed=true
    Marker LTB3: tibia_l (0.0389233 -0.229826 0.00461402)
    Marker LTB2: tibia_l (0.0422297 -0.163589 -0.0589624)
    Marker LTB1: tibia_l (0.030641 -0.109275 0.003052)
    Marker LLMAL: tibia_l (-0.00500146 -0.381113 -0.0531581) fixed=true
    Marker LMMAL: tibia_l (0.0056619 -0.370504 0.0389943) fixed=true
    Marker LAJC: tibia_l (0.000330217 -0.3758086 -0.007081923) fixed=true
    Marker fLAJC: tibia_l (0.000330217 -0.445442 -0.007081923) fixed=true
    Marker LCAL: calcn_l (-0.036382 0.033579 0.00231319) fixed=true
    Marker fLCAL: calcn_l (-0.036382 -0.00349207 0.00231319) fixed=true
    Marker LMT5: toes_l (-2.5e-5 0.035579 -0.046275) fixed=true
    Marker fLMT5: toes_l (-2.5e-5 -0.00149207 -0.046275)
    Marker LMT1: toes_l (0.019063 0.035579 0.0272685) fixed=true
    Marker fLMT1: toes_l (0.019063 -0.00149207 0.0272685) fixed=true
    Marker LMT3: toes_l (0.009519 0.035579 -0.0095033) fixed=true
    Marker fLMT3: toes_l (0.009519 -0.00149207 -0.00950325) fixed=true
  ContactGeometrySet:
    ContactHalfSpace floor: socket_frame=/ground orientation=(0 0 -1.570796)
    ContactSphere heel_r: socket_frame=/bodyset/calcn_r location=(0.03130753 0.01043584 0) radius=0.04
    ContactSphere mh1_r: socket_frame=/bodyset/calcn_r location=(0.17 -0.0081 -0.023) radius=0.02
    ContactSphere mh3_r: socket_frame=/bodyset/calcn_r location=(0.155 -0.0081 0.0116) radius=0.02
    ContactSphere mh5_r: socket_frame=/bodyset/calcn_r location=(0.135 -0.0081 0.037) radius=0.02
    ContactSphere toe1_r: socket_frame=/bodyset/toes_r location=(0.0562 -0.0102 -0.0181) radius=0.02
    ContactSphere toe2_r: socket_frame=/bodyset/toes_r location=(0.0441 -0.006 0.0242) radius=0.02
    ContactSphere heel_l: socket_frame=/bodyset/calcn_l location=(0.03130753 0.01043584 0) radius=0.04
    ContactSphere mh1_l: socket_frame=/bodyset/calcn_l location=(0.17 -0.0081 0.023) radius=0.02
    ContactSphere mh3_l: socket_frame=/bodyset/calcn_l location=(0.155 -0.0081 -0.0116) radius=0.02
    ContactSphere mh5_l: socket_frame=/bodyset/calcn_l location=(0.135 -0.0081 -0.037) radius=0.02
    ContactSphere toe1_l: socket_frame=/bodyset/toes_l location=(0.0562 -0.0102 0.0181) radius=0.02
    ContactSphere toe2_l: socket_frame=/bodyset/toes_l location=(0.0441 -0.006 -0.0242) radius=0.02
