# OpenSim document version 40000
ModelProcessor:
  operators:
    ModOpRemoveMuscles
    ModOpReplaceJointsWithWelds: joint_paths=(s u b t a l a r _ r)
    ModOpReplaceJointsWithWelds: joint_paths=(subtalar_r subtalar_l)
  model: Model scaledModel:
    gravity: 0 -9.80665 0
    length_units: meters
    force_units: N
    credits:
      Rajagopal Model w/ torso, updated knee, modified for movements involving high hip and knee flexion
    publications:
      Lai,A.K.M., Arnold, A.S., Wakeling, J.M. (2017) Why are antagonist muscles co-activated in my simulation? A musculoskeletal model for analysing human locomotor tasks. Annals of Biomedical Engineering
    Ground
    BodySet:
      Body pelvis: mass=10.89143 [kg] mass_center=(-0.06769001 0 0) inertia=(0.09506996 0.08055052 0.05354622 0 0 0)
          meshes=(r_pelvis.vtp l_pelvis.vtp sacrum.vtp)
        WrapCylinder Gmax1_at_pelvis_r: xyz_body_rotation=(-0.6 0.45 0)
            translation=(-0.07372179 -0.08065878 0.05712846) quadrant=-x radius=0.03604378 length=0.1366105
        WrapCylinder Gmax2_at_pelvis_r: xyz_body_rotation=(-0.75 0.39 0)
            translation=(-0.07659407 -0.06762302 0.06368418) quadrant=all radius=0.03640681 length=0.08933262
        WrapCylinder Gmax3_at_pelvis_r: xyz_body_rotation=(-0.1 0 0) translation=(-0.07946634 -0.07169669 0.06368418)
            quadrant=all radius=0.03546929 length=0.09353964
        WrapCylinder Gmax1_at_pelvis_l: xyz_body_rotation=(0.6 -0.45 0)
            translation=(-0.07372179 -0.08065878 -0.05712846) quadrant=-x radius=0.03604378 length=0.1366105
        WrapCylinder Gmax2_at_pelvis_l: xyz_body_rotation=(0.75 -0.39 0)
            translation=(-0.07659407 -0.06762302 -0.06368418) quadrant=all radius=0.03640681 length=0.08933262
        WrapCylinder Gmax3_at_pelvis_l: xyz_body_rotation=(0.1 0 0) translation=(-0.07946634 -0.07169669 -0.06368418)
            quadrant=all radius=0.03546929 length=0.09353964
        WrapCylinder PS_at_brim_r: xyz_body_rotation=(-0.25 -0.27 0.1) translation=(-0.07084951 -0.04888411 0.0614365)
            quadrant=-y radius=0.04446487 length=0.09315475
        WrapCylinder PS_at_brim_l: xyz_body_rotation=(0.25 0.27 0.1) translation=(-0.07084951 -0.04888411 -0.0614365)
            quadrant=-y radius=0.04446487 length=0.09315475
        WrapCylinder IL_at_brim_r: xyz_body_rotation=(-0.32 -0.24 0.9) translation=(-0.06797723 -0.05295778 0.07080182)
            quadrant=-y radius=0.04905952 length=0.09270461
        WrapCylinder IL_at_brim_l: xyz_body_rotation=(0.32 0.24 0.9) translation=(-0.06797723 -0.05295778 -0.07080182)
            quadrant=-y radius=0.04905952 length=0.09270461
      Body femur_r: mass=8.601982 mass_center=(0 -0.2012125 0) inertia=(0.1238314 0.03246066 0.1305825 0 0 0)
          meshes=r_femur.vtp
        WrapCylinder GasLat_at_condyles_r: translation=(0.005766509 -0.4852771 0) quadrant=all radius=0.03037976
            length=0.1153302
        WrapCylinder GasMed_at_condyles_r: translation=(0.005766509 -0.4852771 0) quadrant=all radius=0.02921131
            length=0.1153302
        WrapCylinder KnExt_at_fem_r: xyz_body_rotation=(-0.0623366 0.0507601 0)
            translation=(0.00413837 -0.4766747 0.002411681) quadrant=all radius=0.02920986 length=0.1153421
        WrapCylinder KnExtVL_at_fem_r: xyz_body_rotation=(-0.0623366 0.0507601 0)
            translation=(0.002177757 -0.4766747 0.002411681) quadrant=all radius=0.02920986 length=0.1153421
        WrapCylinder AB_at_femshaft_r: xyz_body_rotation=(1.66157 0.186644 0)
            translation=(0.01688826 -0.1332678 0.0269469) quadrant=all radius=0.01904021 length=0.08276343
        WrapCylinder AL_at_femshaft_r: xyz_body_rotation=(1.77711 0.136489 0)
            translation=(0.03544408 -0.2744881 0.01743066) quadrant=all radius=0.02319978 length=0.1181816
        WrapCylinder AMprox_at_femshaft_r: xyz_body_rotation=(1.61126 0.18656 0)
            translation=(0.005977552 -0.08627849 0.02929733) quadrant=all radius=0.02434632 length=0.08277682
        WrapCylinder AMmid_at_femshaft_r: xyz_body_rotation=(1.61139 0.13656 0)
            translation=(0.02654036 -0.190218 0.0237398) quadrant=all radius=0.02468728 length=0.14196
        WrapCylinder AMdist_at_femshaft_r: xyz_body_rotation=(1.71188 0.186636 0)
            translation=(0.03645184 -0.3086079 0.01080021) quadrant=all radius=0.02515988 length=0.2364001
        WrapCylinder AMisch_at_condyles_r: xyz_body_rotation=(1.71115 -0.463363 0)
            translation=(-0.02612356 -0.4460182 -0.003637941) quadrant=all radius=0.04626403 length=0.2825138
        WrapCylinder PECT_at_femshaft_r: xyz_body_rotation=(1.81295 0.276344 0)
            translation=(0.007018684 -0.1000179 0.03510709) quadrant=all radius=0.0173289 length=0.05898889
      Body tibia_r: mass=3.428715 mass_center=(0 -0.2086444 0) inertia=(0.04661018 0.004716506 0.04725754 0 0 0)
          meshes=(r_tibia.vtp r_fibula.vtp)
        WrapCylinder GasLat_at_shank_r: xyz_body_rotation=(2.96723 -0.279725 -1.47812)
            translation=(-0.007569937 -0.08269783 -0.003375783) quadrant=-y radius=0.05879874 length=0.1025712
        WrapCylinder GasMed_at_shank_r: xyz_body_rotation=(2.96723 0.0279725 -1.47812)
            translation=(-0.007569937 -0.08269783 -0.003375783) quadrant=-y radius=0.06306616 length=0.1025936
        WrapCylinder GR_at_condyles_r: xyz_body_rotation=(0 -0.4 0) translation=(-0.003068893 -0.02235076 0)
            quadrant=all radius=0.03852905 length=0.1022964
        WrapCylinder SM_at_condyles_r: xyz_body_rotation=(0 -0.1 0) translation=(-0.001022964 -0.02235076 0)
            quadrant=all radius=0.03692367 length=0.1022964
        WrapCylinder ST_at_condyles_r: xyz_body_rotation=(0 -0.2 0) translation=(-0.002045929 -0.02290953 0)
            quadrant=all radius=0.04548568 length=0.1022964
        WrapCylinder BF140_at_gastroc_r: translation=(-0.03989561 -0.06705229 0) quadrant=y radius=0.03103729
            length=0.1534447
      Body patella_r: mass=0.0797182 mass_center=(0.002130485 0.03124711 0)
          inertia=(3.718297e-6 1.698497e-5 1.698497e-5 0 0 0) meshes=r_patella.vtp
      Body talus_r: mass=0.09248051 mass_center=(0 0 0) inertia=(0.0009248051 0.0009248051 0.0009248051 0 0 0)
          meshes=r_talus.vtp
      Body calcn_r: mass=1.156006 mass_center=(0.09428541 0.04340007 0)
          inertia=(0.001294727 0.00360674 0.003791701 0 0 0) meshes=r_foot.vtp
      Body toes_r: mass=0.2003128 mass_center=(0.03262275 0.008680014 -0.02524772)
          inertia=(9.248051e-5 0.000184961 0.0009248051 0 0 0) meshes=r_bofoot.vtp
      Body femur_l: mass=8.601982 mass_center=(0 -0.2066857 0) inertia=(0.1238314 0.03246066 0.1305825 0 0 0)
          meshes=l_femur.vtp
        WrapCylinder GasLat_at_condyles_l: translation=(0.005789243 -0.4984774 0) quadrant=all radius=0.03085741
            length=0.1157849
        WrapCylinder GasMed_at_condyles_l: translation=(0.005789243 -0.4984774 0) quadrant=all radius=0.02967059
            length=0.1157849
        WrapCylinder KnExt_at_fem_l: xyz_body_rotation=(0.0623366 -0.0507601 0)
            translation=(0.004154685 -0.489641 -0.002421189) quadrant=all radius=0.02966785 length=0.1158079
        WrapCylinder KnExtVL_at_fem_l: xyz_body_rotation=(0.0623366 -0.0507601 0)
            translation=(0.002186343 -0.489641 -0.002421189) quadrant=all radius=0.02966785 length=0.1158079
        WrapCylinder AB_at_femshaft_l: xyz_body_rotation=(-1.66157 -0.186644 0)
            translation=(0.01695484 -0.1368928 -0.02705313) quadrant=all radius=0.01912525 length=0.08493796
        WrapCylinder AL_at_femshaft_l: xyz_body_rotation=(-1.77711 -0.136489 0)
            translation=(0.03558382 -0.2819546 -0.01749938) quadrant=all radius=0.02330837 length=0.1212417
        WrapCylinder AMprox_at_femshaft_l: xyz_body_rotation=(-1.61126 -0.18656 0)
            translation=(0.006001118 -0.08862539 -0.02941283) quadrant=all radius=0.02445314 length=0.08496329
        WrapCylinder AMmid_at_femshaft_l: xyz_body_rotation=(-1.61139 -0.13656 0)
            translation=(0.02664499 -0.1953922 -0.02383339) quadrant=all radius=0.02479076 length=0.145759
        WrapCylinder AMdist_at_femshaft_l: xyz_body_rotation=(-1.71188 -0.186636 0)
            translation=(0.03659554 -0.3170024 -0.01084279) quadrant=all radius=0.02527573 length=0.2425534
        WrapCylinder AMisch_at_condyles_l: xyz_body_rotation=(-1.71115 0.463363 0)
            translation=(-0.02622655 -0.4581506 0.003652283) quadrant=all radius=0.04656871 length=0.288852
        WrapCylinder PECT_at_femshaft_l: xyz_body_rotation=(-1.81295 -0.276344 0)
            translation=(0.007046355 -0.1027385 -0.03524549) quadrant=all radius=0.01742451 length=0.06042776
      Body tibia_l: mass=3.428715 mass_center=(0 -0.2068878 0) inertia=(0.04661018 0.004716506 0.04725754 0 0 0)
          meshes=(l_tibia.vtp l_fibula.vtp)
        WrapCylinder GasLat_at_shank_l: xyz_body_rotation=(-2.96723 0.279725 -1.47812)
            translation=(-0.007535782 -0.0820016 0.003360552) quadrant=-y radius=0.05841608 length=0.1020952
        WrapCylinder GasMed_at_shank_l: xyz_body_rotation=(-2.96723 -0.0279725 -1.47812)
            translation=(-0.007535782 -0.0820016 0.003360552) quadrant=-y radius=0.06265622 length=0.1021164
        WrapCylinder GR_at_condyles_l: xyz_body_rotation=(0 0.4 0) translation=(-0.003055047 -0.02216259 0)
            quadrant=all radius=0.03827662 length=0.1018349
        WrapCylinder SM_at_condyles_l: xyz_body_rotation=(0 0.1 0) translation=(-0.001018349 -0.02216259 0)
            quadrant=all radius=0.03668176 length=0.1018349
        WrapCylinder ST_at_condyles_l: xyz_body_rotation=(0 0.2 0) translation=(-0.002036698 -0.02271666 0)
            quadrant=all radius=0.04518767 length=0.1018349
        WrapCylinder BF140_at_gastroc_l: translation=(-0.03971561 -0.06648778 0) quadrant=all radius=0.03083394
            length=0.1527523
      Body patella_l: mass=0.0797182 mass_center=(0.002188437 0.03209708 0)
          inertia=(3.923334e-6 1.792157e-5 1.792157e-5 0 0 0) meshes=l_patella.vtp
      Body talus_l: mass=0.09248051 mass_center=(0 0 0) inertia=(0.0009248051 0.0009248051 0.0009248051 0 0 0)
          meshes=l_talus.vtp
      Body calcn_l: mass=1.156006 mass_center=(0.09482183 0.0436882 0)
          inertia=(0.001294727 0.00360674 0.003791701 0 0 0) meshes=l_foot.vtp
      Body toes_l: mass=0.2003128 mass_center=(0.03280835 0.008737641 0.02543216)
          inertia=(9.248051e-5 0.000184961 0.0009248051 0 0 0) meshes=l_bofoot.vtp
      Body torso: mass=31.35052 mass_center=(-0.03140257 0.3187234 0) inertia=(1.363625 0.6986903 1.323766 0 0 0)
          meshes=(hat_spine.vtp hat_jaw.vtp hat_skull.vtp hat_ribs_scap.vtp)
    JointSet:
      CustomJoint ground_pelvis: socket_parent_frame=ground_offset socket_child_frame=pelvis_offset
        Coordinate pelvis_tilt: default_value=0 range=(-1.570796 1.570796) clamped=true
        Coordinate pelvis_list: default_value=0 range=(-1.570796 1.570796) clamped=true
        Coordinate pelvis_rotation: default_value=0 range=(-1.570796 1.570796) clamped=true
        Coordinate pelvis_tx: default_value=0 range=(-5 5) clamped=true
        Coordinate pelvis_ty: default_value=0.93 range=(-1 2) clamped=true
        Coordinate pelvis_tz: default_value=0 range=(-3 3) clamped=true
        PhysicalOffsetFrame ground_offset: socket_parent=/ground translation=(0 0 0) [meters]
        PhysicalOffsetFrame pelvis_offset: socket_parent=/bodyset/pelvis translation=(0 0 0)
        SpatialTransform:
          TransformAxis rotation1: coordinates=pelvis_tilt axis=(0 0 1) LinearFunction(coefficients=1 0)
          TransformAxis rotation2: coordinates=pelvis_list axis=(1 0 0) LinearFunction(coefficients=1 0)
          TransformAxis rotation3: coordinates=pelvis_rotation axis=(0 1 0) LinearFunction(coefficients=1 0)
          TransformAxis translation1: coordinates=pelvis_tx axis=(1 0 0) LinearFunction(coefficients=1 0)
          TransformAxis translation2: coordinates=pelvis_ty axis=(0 1 0) LinearFunction(coefficients=1 0)
          TransformAxis translation3: coordinates=pelvis_tz axis=(0 0 1) LinearFunction(coefficients=1 0)
      CustomJoint hip_r: socket_parent_frame=pelvis_offset socket_child_frame=femur_r_offset
        Coordinate hip_flexion_r: default_value=2.332052e-9 range=(-0.5235988 2.094395) clamped=true
        Coordinate hip_adduction_r: default_value=-1.199293e-9 range=(-0.8726646 0.5235988) clamped=true
        Coordinate hip_rotation_r: default_value=0 range=(-0.6981317 0.6981317) clamped=true
        PhysicalOffsetFrame pelvis_offset: socket_parent=/bodyset/pelvis
            translation=(-0.0538801 -0.06394856 0.07235647)
        PhysicalOffsetFrame femur_r_offset: socket_parent=/bodyset/femur_r translation=(0 0 0)
        SpatialTransform: axes_held_at_zero=(translation1 translation2 translation3)
          TransformAxis rotation1: coordinates=hip_flexion_r axis=(0 0 1) LinearFunction(coefficients=1 0)
          TransformAxis rotation2: coordinates=hip_adduction_r axis=(1 0 0) LinearFunction(coefficients=1 0)
          TransformAxis rotation3: coordinates=hip_rotation_r axis=(0 1 0) LinearFunction(coefficients=1 0)
      CustomJoint walker_knee_r: socket_parent_frame=femur_r_offset socket_child_frame=tibia_r_offset
        Coordinate knee_angle_r: default_value=4.877666e-5 range=(0 2.443461) clamped=true
        PhysicalOffsetFrame femur_r_offset: socket_parent=/bodyset/femur_r
            translation=(-0.005189858 -0.4848037 -0.002018278) orientation=(-1.64157 1.44618 1.5708) [radians]
        PhysicalOffsetFrame tibia_r_offset: socket_parent=/bodyset/tibia_r
            translation=(-0.008275312 -0.003950274 -0.001518836) orientation=(-1.64157 1.44618 1.5708)
        SpatialTransform:
          TransformAxis rotation1: coordinates=knee_angle_r axis=(1 0 0) LinearFunction(coefficients=1 0)
          TransformAxis rotation2: coordinates=knee_angle_r axis=(0 0 1)
            SimmSpline: x=(0 0.174533 0.349066 0.523599 0.698132 0.872665 1.0472 1.22173 1.39626 1.5708 1.74533 1.91986 2.0944)
                y=(0 0.0126809 0.0226969 0.0296054 0.0332049 0.0335354 0.0308779 0.0257548 0.0189295 0.011407 0.00443314 -0.00050475 -0.0016782)
          TransformAxis rotation3: coordinates=knee_angle_r axis=(0 1 0)
            SimmSpline: x=(0 0.174533 0.349066 0.523599 0.698132 0.872665 1.0472 1.22173 1.39626 1.5708 1.74533 1.91986 2.0944)
                y=(0 0.059461 0.109399 0.150618 0.18392 0.210107 0.229983 0.24435 0.254012 0.25977 0.262428 0.262788 0.261654)
          TransformAxis translation1: coordinates=knee_angle_r axis=(1 0 0)
            MultiplierFunction: scale=1.153302
              SimmSpline: x=(0 0.174533 0.349066 0.523599 0.698132 0.872665 1.0472 1.22173 1.39626 1.5708 1.74533 1.91986 2.0944)
                  y=(0 5.3e-5 0.000188 0.000378 0.000597 0.000825 0.001045 0.001247 0.00142 0.001558 0.001661 0.001728 0.00176)
          TransformAxis translation2: coordinates=knee_angle_r axis=(0 1 0)
            MultiplierFunction: scale=1.183603
              SimmSpline: x=(0 0.174533 0.349066 0.523599 0.698132 0.872665 1.0472 1.22173 1.39626 1.5708 1.74533 1.91986 2.0944)
                  y=(0 0.000301 0.000143 -0.000401 -0.001233 -0.002243 -0.003316 -0.004346 -0.005239 -0.005924 -0.006361 -0.006539 -0.00648)
          TransformAxis translation3: coordinates=knee_angle_r axis=(0 0 1)
            MultiplierFunction: scale=1.153302
              SimmSpline: x=(0 0.174533 0.349066 0.523599 0.698132 0.872665 1.0472 1.22173 1.39626 1.5708 1.74533 1.91986 2.0944)
                  y=(0 0.001055 0.002061 0.00289 0.003447 0.003676 0.003559 0.00311 0.002373 0.001418 0.000329 -0.000805 -0.001898)
      CustomJoint patellofemoral_r: socket_parent_frame=femur_r_offset socket_child_frame=patella_r_offset
        Coordinate knee_angle_r_beta: default_value=4.877666e-5 range=(-99999.9 99999.9) clamped=false
        PhysicalOffsetFrame femur_r_offset: socket_parent=/bodyset/femur_r
            translation=(-0.009330212 -0.4828626 -0.00317158)
        PhysicalOffsetFrame patella_r_offset: socket_parent=/bodyset/patella_r translation=(0 0 0)
        SpatialTransform: axes_held_at_zero=(rotation2 rotation3)
          TransformAxis rotation1: coordinates=knee_angle_r_beta axis=(0 0 1)
            SimmSpline: x=(0 0.174533 0.349066 0.523599 0.698132 0.872665 1.0472 1.22173 1.39626 1.5708 1.74533 1.91986 2.0944)
                y=(0.00113686 -0.00629212 -0.105582 -0.253683 -0.414245 -0.579047 -0.747244 -0.91799 -1.09044 -1.26379 -1.43763 -1.61186 -1.78634)
          TransformAxis translation1: coordinates=knee_angle_r_beta axis=(1 0 0)
            MultiplierFunction: scale=1.153302
              SimmSpline: x=(0 0.174533 0.349066 0.523599 0.698132 0.872665 1.0472 1.22173 1.39626 1.5708 1.74533 1.91986 2.0944)
                  y=(0.0524 0.0488 0.0437 0.0371 0.0296 0.0216 0.0136 0.0057 -0.0019 -0.0088 -0.0148 -0.0196 -0.0227)
          TransformAxis translation2: coordinates=knee_angle_r_beta axis=(0 1 0)
            MultiplierFunction: scale=1.183603
              SimmSpline: x=(0 0.174533 0.349066 0.523599 0.698132 0.872665 1.0472 1.22173 1.39626 1.5708 1.74533 1.91986 2.0944)
                  y=(-0.0108 -0.019 -0.0263 -0.0322 -0.0367 -0.0395 -0.0408 -0.0404 -0.0384 -0.0349 -0.0301 -0.0245 -0.0187)
          TransformAxis translation3: axis=(0 0 1) MultiplierFunction(scale=1.153302, Constant(value=0.00275))
      PinJoint ankle_r: socket_parent_frame=tibia_r_offset socket_child_frame=talus_r_offset
        Coordinate ankle_angle_r: default_value=-1.182866e-9 range=(-0.6981317 0.5235988) clamped=true
        PhysicalOffsetFrame tibia_r_offset: socket_parent=/bodyset/tibia_r translation=(-0.01022964 -0.4470153 0)
            orientation=(0.175895 -0.105208 0.0186622)
        PhysicalOffsetFrame talus_r_offset: socket_parent=/bodyset/talus_r translation=(0 0 0)
            orientation=(0.175895 -0.105208 0.0186622)
      PinJoint subtalar_r: socket_parent_frame=talus_r_offset socket_child_frame=calcn_r_offset
        Coordinate subtalar_angle_r: default_value=0 range=(-0.6108652 0.6108652) clamped=true locked=true
        PhysicalOffsetFrame talus_r_offset: socket_parent=/bodyset/talus_r
            translation=(-0.04988997 -0.04688073 0.008101878) orientation=(-1.76819 0.906223 1.8196)
        PhysicalOffsetFrame calcn_r_offset: socket_parent=/bodyset/calcn_r translation=(0 0 0)
            orientation=(-1.76819 0.906223 1.8196)
      PinJoint mtp_r: socket_parent_frame=calcn_r_offset socket_child_frame=toes_r_offset
        Coordinate mtp_angle_r: default_value=0 range=(-0.5235988 0.5235988) clamped=true locked=true
        PhysicalOffsetFrame calcn_r_offset: socket_parent=/bodyset/calcn_r
            translation=(0.1685823 -0.002893338 0.001104802) orientation=(-3.14159 0.619901 0)
        PhysicalOffsetFrame toes_r_offset: socket_parent=/bodyset/toes_r translation=(0 0 0)
            orientation=(-3.14159 0.619901 0)
      CustomJoint hip_l: socket_parent_frame=pelvis_offset socket_child_frame=femur_l_offset
        Coordinate hip_flexion_l: default_value=2.332052e-9 range=(-0.5235988 2.094395) clamped=true
        Coordinate hip_adduction_l: default_value=-1.199293e-9 range=(-0.8726646 0.5235988) clamped=true
        Coordinate hip_rotation_l: default_value=0 range=(-0.6981317 0.6981317) clamped=true
        PhysicalOffsetFrame pelvis_offset: socket_parent=/bodyset/pelvis
            translation=(-0.0538801 -0.06394856 -0.07235647)
        PhysicalOffsetFrame femur_l_offset: socket_parent=/bodyset/femur_l translation=(0 0 0)
        SpatialTransform: axes_held_at_zero=(translation1 translation2 translation3)
          TransformAxis rotation1: coordinates=hip_flexion_l axis=(0 0 1) LinearFunction(coefficients=1 0)
          TransformAxis rotation2: coordinates=hip_adduction_l axis=(1 0 0) LinearFunction(coefficients=-1 0)
          TransformAxis rotation3: coordinates=hip_rotation_l axis=(0 1 0) LinearFunction(coefficients=-1 0)
      CustomJoint walker_knee_l: socket_parent_frame=femur_l_offset socket_child_frame=tibia_l_offset
        Coordinate knee_angle_l: default_value=4.877992e-5 range=(0 2.443461) clamped=true
        PhysicalOffsetFrame femur_l_offset: socket_parent=/bodyset/femur_l
            translation=(-0.005210319 -0.4979911 0.002026235) orientation=(1.64157 -1.44618 1.5708)
        PhysicalOffsetFrame tibia_l_offset: socket_parent=/bodyset/tibia_l
            translation=(-0.008237975 -0.003917017 0.001511983) orientation=(1.64157 -1.44618 1.5708)
        SpatialTransform:
          TransformAxis rotation1: coordinates=knee_angle_l axis=(-1 0 0) LinearFunction(coefficients=1 0)
          TransformAxis rotation2: coordinates=knee_angle_l axis=(0 0 1)
            SimmSpline: x=(0 0.174533 0.349066 0.523599 0.698132 0.872665 1.0472 1.22173 1.39626 1.5708 1.74533 1.91986 2.0944)
                y=(0 0.0126809 0.0226969 0.0296054 0.0332049 0.0335354 0.0308779 0.0257548 0.0189295 0.011407 0.00443314 -0.00050475 -0.0016782)
          TransformAxis rotation3: coordinates=knee_angle_l axis=(0 1 0)
            SimmSpline: x=(0 0.174533 0.349066 0.523599 0.698132 0.872665 1.0472 1.22173 1.39626 1.5708 1.74533 1.91986 2.0944)
                y=(0 -0.059461 -0.109399 -0.150618 -0.18392 -0.210107 -0.229983 -0.24435 -0.254012 -0.25977 -0.262428 -0.262788 -0.261654)
          TransformAxis translation1: coordinates=knee_angle_l axis=(1 0 0)
            MultiplierFunction: scale=1.157849
              SimmSpline: x=(0 0.174533 0.349066 0.523599 0.698132 0.872665 1.0472 1.22173 1.39626 1.5708 1.74533 1.91986 2.0944)
                  y=(0 5.3e-5 0.000188 0.000378 0.000597 0.000825 0.001045 0.001247 0.00142 0.001558 0.001661 0.001728 0.00176)
          TransformAxis translation2: coordinates=knee_angle_l axis=(0 1 0)
            MultiplierFunction: scale=1.215798
              SimmSpline: x=(0 0.174533 0.349066 0.523599 0.698132 0.872665 1.0472 1.22173 1.39626 1.5708 1.74533 1.91986 2.0944)
                  y=(0 0.000301 0.000143 -0.000401 -0.001233 -0.002243 -0.003316 -0.004346 -0.005239 -0.005924 -0.006361 -0.006539 -0.00648)
          TransformAxis translation3: coordinates=knee_angle_l axis=(0 0 1)
            MultiplierFunction: scale=1.157849
              SimmSpline: x=(0 0.174533 0.349066 0.523599 0.698132 0.872665 1.0472 1.22173 1.39626 1.5708 1.74533 1.91986 2.0944)
                  y=(0 -0.001055 -0.002061 -0.00289 -0.003447 -0.003676 -0.003559 -0.00311 -0.002373 -0.001418 -0.000329 0.000805 0.001898)
      CustomJoint patellofemoral_l: socket_parent_frame=femur_l_offset socket_child_frame=patella_l_offset
        Coordinate knee_angle_l_beta: default_value=4.877992e-5 range=(-99999.9 99999.9) clamped=false
        PhysicalOffsetFrame femur_l_offset: socket_parent=/bodyset/femur_l
            translation=(-0.009366996 -0.4959971 0.003184084)
        PhysicalOffsetFrame patella_l_offset: socket_parent=/bodyset/patella_l translation=(0 0 0)
        SpatialTransform: axes_held_at_zero=(rotation2 rotation3)
          TransformAxis rotation1: coordinates=knee_angle_l_beta axis=(0 0 1)
            SimmSpline: x=(0 0.174533 0.349066 0.523599 0.698132 0.872665 1.0472 1.22173 1.39626 1.5708 1.74533 1.91986 2.0944)
                y=(0.00113686 -0.00629212 -0.105582 -0.253683 -0.414245 -0.579047 -0.747244 -0.91799 -1.09044 -1.26379 -1.43763 -1.61186 -1.78634)
          TransformAxis translation1: coordinates=knee_angle_l_beta axis=(1 0 0)
            MultiplierFunction: scale=1.157849
              SimmSpline: x=(0 0.174533 0.349066 0.523599 0.698132 0.872665 1.0472 1.22173 1.39626 1.5708 1.74533 1.91986 2.0944)
                  y=(0.0524 0.0488 0.0437 0.0371 0.0296 0.0216 0.0136 0.0057 -0.0019 -0.0088 -0.0148 -0.0196 -0.0227)
          TransformAxis translation2: coordinates=knee_angle_l_beta axis=(0 1 0)
            MultiplierFunction: scale=1.215798
              SimmSpline: x=(0 0.174533 0.349066 0.523599 0.698132 0.872665 1.0472 1.22173 1.39626 1.5708 1.74533 1.91986 2.0944)
                  y=(-0.0108 -0.019 -0.0263 -0.0322 -0.0367 -0.0395 -0.0408 -0.0404 -0.0384 -0.0349 -0.0301 -0.0245 -0.0187)
          TransformAxis translation3: axis=(0 0 1) MultiplierFunction(scale=1.157849, Constant(value=-0.00275))
      PinJoint ankle_l: socket_parent_frame=tibia_l_offset socket_child_frame=talus_l_offset
        Coordinate ankle_angle_l: default_value=8.352658e-11 range=(-0.6981317 0.5235988) clamped=true
        PhysicalOffsetFrame tibia_l_offset: socket_parent=/bodyset/tibia_l translation=(-0.01018349 -0.4432519 0)
            orientation=(-0.175895 0.105208 0.0186622)
        PhysicalOffsetFrame talus_l_offset: socket_parent=/bodyset/talus_l translation=(0 0 0)
            orientation=(-0.175895 0.105208 0.0186622)
      PinJoint subtalar_l: socket_parent_frame=talus_l_offset socket_child_frame=calcn_l_offset
        Coordinate subtalar_angle_l: default_value=0 range=(-0.6108652 0.6108652) clamped=true locked=true
        PhysicalOffsetFrame talus_l_offset: socket_parent=/bodyset/talus_l
            translation=(-0.04966488 -0.04648604 -0.008065324) orientation=(1.76819 -0.906223 1.8196)
        PhysicalOffsetFrame calcn_l_offset: socket_parent=/bodyset/calcn_l translation=(0 0 0)
            orientation=(1.76819 -0.906223 1.8196)
      PinJoint mtp_l: socket_parent_frame=calcn_l_offset socket_child_frame=toes_l_offset
        Coordinate mtp_angle_l: default_value=0 range=(-0.5235988 0.5235988) clamped=true locked=true
        PhysicalOffsetFrame calcn_l_offset: socket_parent=/bodyset/calcn_l
            translation=(0.1695414 -0.002912547 -0.001099817) orientation=(-3.14159 -0.619901 0)
        PhysicalOffsetFrame toes_l_offset: socket_parent=/bodyset/toes_l translation=(0 0 0)
            orientation=(-3.14159 -0.619901 0)
      CustomJoint back: socket_parent_frame=pelvis_offset socket_child_frame=torso_offset
        Coordinate lumbar_extension: default_value=0 range=(-1.570796 1.570796) clamped=false
        Coordinate lumbar_bending: default_value=0 range=(-1.570796 1.570796) clamped=false
        Coordinate lumbar_rotation: default_value=0 range=(-1.570796 1.570796) clamped=false
        PhysicalOffsetFrame pelvis_offset: socket_parent=/bodyset/pelvis translation=(-0.09641278 0.06640091 0)
        PhysicalOffsetFrame torso_offset: socket_parent=/bodyset/torso translation=(0 0 0)
        SpatialTransform: axes_held_at_zero=(translation1 translation2 translation3)
          TransformAxis rotation1: coordinates=lumbar_extension axis=(0 0 1) LinearFunction(coefficients=1 0)
          TransformAxis rotation2: coordinates=lumbar_bending axis=(1 0 0) LinearFunction(coefficients=1 0)
          TransformAxis rotation3: coordinates=lumbar_rotation axis=(0 1 0) LinearFunction(coefficients=1 0)
    ConstraintSet:
      CoordinateCouplerConstraint patellofemoral_knee_angle_r_con: independent_coordinate_names=knee_angle_r
          dependent_coordinate_name=knee_angle_r_beta scale_factor=1
          coupled_coordinates_function=LinearFunction(coefficients=1 0)
      CoordinateCouplerConstraint patellofemoral_knee_angle_l_con: independent_coordinate_names=knee_angle_l
          dependent_coordinate_name=knee_angle_l_beta scale_factor=1
          coupled_coordinates_function=LinearFunction(coefficients=1 0)
    ForceSet:
      SmoothSphereHalfSpaceForce [values shared by the 12 below unless stated]: socket_half_space=/contactgeometryset/floor
          stiffness=3067776 [N/m^2] dissipation=2 [s/m] static_friction=0.8 dynamic_friction=0.8 viscous_friction=0.5
          transition_velocity=0.2 [m/s] hertz_smoothing=300 hunt_crossley_smoothing=50
      SmoothSphereHalfSpaceForce contactHeel_r: socket_sphere=/contactgeometryset/heel_r
      SmoothSphereHalfSpaceForce contactMH1_r: socket_sphere=/contactgeometryset/mh1_r
      SmoothSphereHalfSpaceForce contactMH3_r: socket_sphere=/contactgeometryset/mh3_r
      SmoothSphereHalfSpaceForce contactMH5_r: socket_sphere=/contactgeometryset/mh5_r
      SmoothSphereHalfSpaceForce contactHallux_r: socket_sphere=/contactgeometryset/hallux_r
      SmoothSphereHalfSpaceForce contactOtherToes_r: socket_sphere=/contactgeometryset/othertoes_r stiffness=306777.6
      SmoothSphereHalfSpaceForce contactHeel_l: socket_sphere=/contactgeometryset/heel_l
      SmoothSphereHalfSpaceForce contactMH1_l: socket_sphere=/contactgeometryset/mh1_l
      SmoothSphereHalfSpaceForce contactMH3_l: socket_sphere=/contactgeometryset/mh3_l
      SmoothSphereHalfSpaceForce contactMH5_l: socket_sphere=/contactgeometryset/mh5_l
      SmoothSphereHalfSpaceForce contactHallux_l: socket_sphere=/contactgeometryset/hallux_l
      SmoothSphereHalfSpaceForce contactOtherToes_l: socket_sphere=/contactgeometryset/othertoes_l stiffness=306777.6
      Millard2012EquilibriumMuscle [values shared by the 80 below unless stated]: fiber_damping=0.01
          default_activation=0.01 minimum_activation=0.01
        ActiveForceLengthCurve: min_norm_active_fiber_length=0.25 transition_norm_fiber_length=0.77
            max_norm_active_fiber_length=1.9 shallow_ascending_slope=0.75 minimum_value=0
        ForceVelocityCurve: concentric_slope_at_vmax=0 concentric_slope_near_vmax=0.25 isometric_slope=5
            eccentric_slope_at_vmax=0 eccentric_slope_near_vmax=0.15 max_eccentric_velocity_force_multiplier=1.4
        FiberForceLengthCurve: strain_at_zero_force=0 strain_at_one_norm_force=0.7
        TendonForceLengthCurve
      Millard2012EquilibriumMuscle addbrev_r: max_isometric_force=540.7705 optimal_fiber_length=0.1167386
          tendon_slack_length=0.04013984 pennation_angle_at_optimal=0.1147809 [radians] ignore_tendon_compliance=true
        PathPoint P1: pelvis (-0.01828683 -0.0765851 0.01442259)
        PathPoint P2: femur_r (-0.002306604 -0.1396651 0.02871722)
        PathWrap: wrap_object=AB_at_femshaft_r method=hybrid
      Millard2012EquilibriumMuscle addlong_r: max_isometric_force=763.269 optimal_fiber_length=0.1271581
          tendon_slack_length=0.1548923 pennation_angle_at_optimal=0.1377704
        PathPoint P1: pelvis (-0.007257288 -0.07242995 0.01768173)
        PathPoint P2: femur_r (0.01298618 -0.283319 0.01825677)
        PathWrap: wrap_object=AL_at_femshaft_r method=hybrid
      Millard2012EquilibriumMuscle addmagDist_r: max_isometric_force=467.4058 optimal_fiber_length=0.2215533
          tendon_slack_length=0.1092521 pennation_angle_at_optimal=0.194705 ignore_tendon_compliance=true
        PathPoint P1: pelvis (-0.07088781 -0.1040172 0.03729271)
        PathPoint P2: femur_r (0.01297465 -0.3106957 0.02225873)
        PathWrap: wrap_object=AMdist_at_femshaft_r method=hybrid
      Millard2012EquilibriumMuscle addmagIsch_r: max_isometric_force=472.4159 optimal_fiber_length=0.1932258
          tendon_slack_length=0.2676252 pennation_angle_at_optimal=0.1680443
        PathPoint P1: pelvis (-0.0858045 -0.10572 0.03906275)
        PathPoint P2: femur_r (0.005547382 -0.4592024 -0.03774757)
        PathWrap: wrap_object=AMisch_at_condyles_r method=hybrid
      Millard2012EquilibriumMuscle addmagMid_r: max_isometric_force=473.8012 optimal_fiber_length=0.1698425
          tendon_slack_length=0.05751173 pennation_angle_at_optimal=0.2073076 ignore_tendon_compliance=true
        PathPoint P1: pelvis (-0.05041804 -0.09837927 0.02672863)
        PathPoint P2: femur_r (0.00279099 -0.1922171 0.03369948)
        PathWrap: wrap_object=AMmid_at_femshaft_r method=hybrid
      Millard2012EquilibriumMuscle addmagProx_r: max_isometric_force=532.6991 optimal_fiber_length=0.1158485
          tendon_slack_length=0.04423758 pennation_angle_at_optimal=0.3114833 ignore_tendon_compliance=true
        PathPoint P1: pelvis (-0.02966105 -0.08762476 0.01278366)
        PathPoint P2: femur_r (-0.01761092 -0.09333892 0.03692873)
        PathWrap: wrap_object=AMprox_at_femshaft_r method=hybrid
      Millard2012EquilibriumMuscle bflh140_r: max_isometric_force=1064.548 optimal_fiber_length=0.1177957
          tendon_slack_length=0.4013021 pennation_angle_at_optimal=0.1759182
        PathPoint bflh_r-P1: pelvis (-0.09957229 -0.09703495 0.05488078)
        PathPoint bflh_r-P2: tibia_r (-0.03514906 -0.04076779 0.03701085)
        PathPoint bflh_r-P3: tibia_r (-0.02766096 -0.05596631 0.03555824)
      Millard2012EquilibriumMuscle bfsh140_r: max_isometric_force=464.7963 optimal_fiber_length=0.1293532
          tendon_slack_length=0.1240961 pennation_angle_at_optimal=0.2642232 ignore_tendon_compliance=true
        PathPoint bfsh_r-P1: femur_r (0.005766509 -0.2498585 0.02698726)
        PathPoint bfsh_r-P2: tibia_r (-0.02931816 -0.03669995 0.03277578)
        PathWrap: wrap_object=BF140_at_gastroc_r method=hybrid
      Millard2012EquilibriumMuscle edl_r: max_isometric_force=560.1546 optimal_fiber_length=0.07305012
          tendon_slack_length=0.3888367 pennation_angle_at_optimal=0.2182582
        PathPoint P1: tibia_r (-0.01636743 -0.1292992 0.02097077)
        PathPoint P2: tibia_r (0.01677662 -0.4201944 0.0114572)
        PathPoint P3: calcn_r (0.08664829 0.05208009 0.0008183715)
        PathPoint P4: calcn_r (0.1523652 0.00795668 0.01329854)
        PathPoint P5: toes_r (0.0002828562 0.006799345 0.02207372)
        PathPoint P6: toes_r (0.04176844 -0.0005786676 0.03606817)
      Millard2012EquilibriumMuscle ehl_r: max_isometric_force=270.1507 optimal_fiber_length=0.07744261
          tendon_slack_length=0.3383406 pennation_angle_at_optimal=0.1972681
        PathPoint P1: tibia_r (-0.0143215 -0.1732184 0.01933403)
        PathPoint P2: tibia_r (0.007263047 -0.3250919 0.01677662)
        PathPoint P3: tibia_r (0.02045929 -0.4127069 -0.0028643)
        PathPoint P4: calcn_r (0.09145685 0.05627543 -0.02158455)
        PathPoint P5: calcn_r (0.121911 0.04470207 -0.02629019)
        PathPoint P6: calcn_r (0.1634909 0.0201087 -0.028643)
        PathPoint P7: toes_r (0.02809705 0.005931343 -0.03534681)
        PathPoint P8: toes_r (0.05308269 0.004918675 -0.02683472)
      Millard2012EquilibriumMuscle fdl_r: max_isometric_force=396.3202 optimal_fiber_length=0.04659405
          tendon_slack_length=0.3957077 pennation_angle_at_optimal=0.2248391
        PathPoint P1: tibia_r (-0.002352818 -0.204733 -0.001841336)
        PathPoint P2: tibia_r (-0.01800417 -0.4073427 -0.01268476)
        PathPoint P3: calcn_r (0.04110844 0.04557008 -0.028643)
        PathPoint P4: calcn_r (0.06675407 0.02546138 -0.02690396)
        PathPoint P5: calcn_r (0.1563252 -0.01171802 0.01186639)
        PathPoint P6: toes_r (-0.001791423 -0.01128402 0.02120808)
        PathPoint P7: toes_r (0.02687134 -0.01027135 0.03101863)
        PathPoint P8: toes_r (0.04157987 -0.008680014 0.03491399)
      Millard2012EquilibriumMuscle fhl_r: max_isometric_force=864.2778 optimal_fiber_length=0.0541609
          tendon_slack_length=0.3641624 pennation_angle_at_optimal=0.2580255
        PathPoint P1: tibia_r (-0.0317119 -0.2417235 0.02045929)
        PathPoint P2: tibia_r (-0.02475574 -0.4102483 -0.00777453)
        PathPoint P3: calcn_r (0.03526274 0.03992807 -0.02465344)
        PathPoint P4: calcn_r (0.09786826 0.00983735 -0.02618789)
        PathPoint P5: calcn_r (0.1627366 -0.007667346 -0.02751774)
        PathPoint P6: toes_r (0.01461424 -0.009258682 -0.03823226)
        PathPoint P7: toes_r (0.0529884 -0.01475602 -0.02611336)
      Millard2012EquilibriumMuscle gaslat140_r: max_isometric_force=1407.709 optimal_fiber_length=0.07553577
          tendon_slack_length=0.4094258 pennation_angle_at_optimal=0.2102268
        PathPoint gaslat_r-P1: femur_r (0.002306604 -0.4509527 0.02374649)
        PathPoint gaslat_r-P2: calcn_r (0.004148558 0.04484674 -0.005421711)
        PathWrap: wrap_object=GasLat_at_shank_r method=hybrid
        PathWrap pathwrap_0: wrap_object=GasLat_at_condyles_r method=hybrid
      Millard2012EquilibriumMuscle gasmed_r: max_isometric_force=2786.14 optimal_fiber_length=0.06455035
          tendon_slack_length=0.4234065 pennation_angle_at_optimal=0.1656816
        PathPoint P1: femur_r (0.006919811 -0.4556871 -0.02537264)
        PathPoint P2: calcn_r (0.004148558 0.04484674 -0.005421711)
        PathWrap: wrap_object=GasMed_at_shank_r method=hybrid
        PathWrap pathwrap_0: wrap_object=GasMed_at_condyles_r method=hybrid
      Millard2012EquilibriumMuscle glmax1_r: max_isometric_force=1010.865 optimal_fiber_length=0.1399727
          tendon_slack_length=0.08312665 pennation_angle_at_optimal=0.3540118 ignore_tendon_compliance=true
        PathPoint P1: pelvis (-0.1178591 0.02810836 0.05272676)
        PathPoint P2: pelvis (-0.1203484 -0.01971659 0.07295585)
        PathPoint P3: femur_r (-0.0512066 -0.03858545 0.03482972)
        PathPoint P4: femur_r (-0.03194646 -0.06699192 0.05420519)
        PathWrap: wrap_object=Gmax1_at_pelvis_r method=hybrid
      Millard2012EquilibriumMuscle glmax2_r: max_isometric_force=1365.393 optimal_fiber_length=0.1581835
          tendon_slack_length=0.1098217 pennation_angle_at_optimal=0.3673821 ignore_tendon_compliance=true
        PathPoint P1: pelvis (-0.126093 0.007088196 0.04326778)
        PathPoint P2: pelvis (-0.128678 -0.04961737 0.07614006)
        PathPoint P3: femur_r (-0.05189858 -0.0691224 0.02906321)
        PathPoint P4: femur_r (-0.01799151 -0.120254 0.04832335)
        PathWrap: wrap_object=Gmax2_at_pelvis_r method=hybrid
      Millard2012EquilibriumMuscle glmax3_r: max_isometric_force=866.9087 optimal_fiber_length=0.1786317
          tendon_slack_length=0.110174 pennation_angle_at_optimal=0.3824161 ignore_tendon_compliance=true
        PathPoint P1: pelvis (-0.1244654 -0.04277359 0.008428789)
        PathPoint P2: pelvis (-0.1218803 -0.102901 0.04073915)
        PathPoint P3: femur_r (-0.03240778 -0.1331553 0.01084104)
        PathPoint P4: femur_r (-0.006919811 -0.1679532 0.04740071)
        PathWrap: wrap_object=Gmax3_at_pelvis_r method=hybrid
      Millard2012EquilibriumMuscle glmed1_r: max_isometric_force=1197.586 optimal_fiber_length=0.06521408
          tendon_slack_length=0.04986361 pennation_angle_at_optimal=0.3165559 ignore_tendon_compliance=true
        PathPoint P1: pelvis (-0.04260545 0.01996101 0.1097616)
        PathPoint P2: femur_r (-0.02514198 -0.01384815 0.06400825)
      Millard2012EquilibriumMuscle glmed2_r: max_isometric_force=826.7039 optimal_fiber_length=0.06610069
          tendon_slack_length=0.05908208 pennation_angle_at_optimal=0.3165559 ignore_tendon_compliance=true
        PathPoint P1: pelvis (-0.0813812 0.02574563 0.06321592)
        PathPoint P2: femur_r (-0.02975519 -0.006864896 0.06077901)
      Millard2012EquilibriumMuscle glmed3_r: max_isometric_force=891.2439 optimal_fiber_length=0.06981736
          tendon_slack_length=0.04326079 pennation_angle_at_optimal=0.3165559 ignore_tendon_compliance=true
        PathPoint P1: pelvis (-0.1102955 -0.005947566 0.04926159)
        PathPoint P2: femur_r (-0.03563703 -0.005562933 0.05974104)
      Millard2012EquilibriumMuscle glmin1_r: max_isometric_force=384.9307 optimal_fiber_length=0.06465036
          tendon_slack_length=0.01534285 pennation_angle_at_optimal=0.1745329 ignore_tendon_compliance=true
        PathPoint P1: pelvis (-0.04442456 -0.01213955 0.09758664)
        PathPoint P2: femur_r (-0.008303773 -0.01230947 0.0645849)
      Millard2012EquilibriumMuscle glmin2_r: max_isometric_force=403.2276 optimal_fiber_length=0.05364833
          tendon_slack_length=0.02500304 pennation_angle_at_optimal=0 ignore_tendon_compliance=true
        PathPoint P1: pelvis (-0.05897743 -0.01156924 0.09093726)
        PathPoint P2: femur_r (-0.0110717 -0.01230947 0.0645849)
      Millard2012EquilibriumMuscle glmin3_r: max_isometric_force=449.0362 optimal_fiber_length=0.03699215
          tendon_slack_length=0.04952324 pennation_angle_at_optimal=0.01745329
        PathPoint P1: pelvis (-0.0755409 -0.01262839 0.07473526)
        PathPoint P2: femur_r (-0.01556958 -0.009823903 0.0634316)
      Millard2012EquilibriumMuscle grac_r: max_isometric_force=227.5228 optimal_fiber_length=0.2755725
          tendon_slack_length=0.2080872 pennation_angle_at_optimal=0.1720016 ignore_tendon_compliance=true
        PathPoint P1: pelvis (-0.04534369 -0.1053615 0.02300123)
        PathPoint P2: tibia_r (-0.018843 -0.05313894 -0.03028998)
        PathPoint P3: tibia_r (0.001820877 -0.07780301 -0.01609123)
        PathWrap: wrap_object=GR_at_condyles_r method=hybrid
      Millard2012EquilibriumMuscle iliacus_r: max_isometric_force=1049.275 optimal_fiber_length=0.1015017
          tendon_slack_length=0.09152362 pennation_angle_at_optimal=0.279914 ignore_tendon_compliance=true
        PathPoint P1: pelvis (-0.05792426 0.02517532 0.07894965)
        PathPoint P2: pelvis (-0.01292525 -0.04538075 0.07080182)
        PathPoint P3: femur_r (-0.002652594 -0.06687356 0.0160309)
        PathPoint P4: femur_r (-0.01407028 -0.0753955 0.02260472)
        PathWrap: wrap_object=IL_at_brim_r method=hybrid range=(2 3)
      Millard2012EquilibriumMuscle perbrev_r: max_isometric_force=484.2694 optimal_fiber_length=0.0478073
          tendon_slack_length=0.1553501 pennation_angle_at_optimal=0.2052361
        PathPoint P1: tibia_r (-0.02485804 -0.2829607 0.02567641)
        PathPoint P2: tibia_r (-0.03467849 -0.4350576 0.02547181)
        PathPoint P3: tibia_r (-0.02915449 -0.4474623 0.02608559)
        PathPoint P4: calcn_r (0.04440843 0.03906006 0.02383507)
        PathPoint P5: calcn_r (0.06383122 0.03168205 0.03508768)
      Millard2012EquilibriumMuscle perlong_r: max_isometric_force=1023.142 optimal_fiber_length=0.05418351
          tendon_slack_length=0.3543482 pennation_angle_at_optimal=0.2479525
        PathPoint P1: tibia_r (-0.02045929 -0.153438 0.0288476)
        PathPoint P2: tibia_r (-0.03242797 -0.4358399 0.02424426)
        PathPoint P3: tibia_r (-0.02782463 -0.4485798 0.02455115)
        PathPoint P4: calcn_r (0.04129701 0.03327339 0.02260751)
        PathPoint P5: calcn_r (0.06420836 0.01533469 0.02905219)
        PathPoint P6: calcn_r (0.08033117 0.009982017 0.01207098)
        PathPoint P7: calcn_r (0.1134253 0.01229669 -0.01882255)
      Millard2012EquilibriumMuscle piri_r: max_isometric_force=1057.069 optimal_fiber_length=0.02478203
          tendon_slack_length=0.1095235 pennation_angle_at_optimal=0.1745329
        PathPoint P1: pelvis (-0.09747552 -0.00532022 0.01265255)
        PathPoint P2: pelvis (-0.09767658 -0.02497978 0.05705353)
        PathPoint P3: femur_r (-0.01706887 -0.00426097 0.05039929)
      Millard2012EquilibriumMuscle psoas_r: max_isometric_force=1506.369 optimal_fiber_length=0.1083336
          tendon_slack_length=0.09224863 pennation_angle_at_optimal=0.2155251 ignore_tendon_compliance=true
        PathPoint P1: pelvis (-0.05802001 0.05051358 0.03652475)
        PathPoint P2: pelvis (-0.01962723 -0.05328368 0.0614365)
        PathPoint P3: femur_r (-0.01522358 -0.05527425 0.005305189)
        PathPoint P4: femur_r (-0.02710259 -0.06202079 0.01014906)
        PathWrap: wrap_object=PS_at_brim_r method=hybrid range=(2 3)
      Millard2012EquilibriumMuscle recfem_r: max_isometric_force=1863.057 optimal_fiber_length=0.08736237
          tendon_slack_length=0.5184191 pennation_angle_at_optimal=0.2170149
        PathPoint P1: pelvis (-0.02297822 -0.03161172 0.08737844)
        PathPoint P2: patella_r (0.01183603 0.05799654 0.000828522)
        PathPoint P3: patella_r (0.01432159 0.05172344 -0.001183603)
        PathPoint P4: patella_r (0.005918014 0.002923499 3.550808e-5)
        PathPoint P5: tibia_r (0.03334864 -0.07053901 -0.0004807933)
        PathWrap: wrap_object=KnExt_at_fem_r method=hybrid
      Millard2012EquilibriumMuscle sart_r: max_isometric_force=217.3487 optimal_fiber_length=0.452467
          tendon_slack_length=0.1392204 pennation_angle_at_optimal=0.02613542 ignore_tendon_compliance=true
        PathPoint P1: pelvis (-0.0186698 -0.01270987 0.09889779)
        PathPoint P2: femur_r (-0.003459906 -0.4223095 -0.04855401)
        PathPoint P3: tibia_r (-0.02567641 -0.04481328 -0.0373382)
        PathPoint P4: tibia_r (-0.01626513 -0.06694054 -0.02700626)
        PathPoint P5: tibia_r (0.01391232 -0.09052059 -0.002659707)
      Millard2012EquilibriumMuscle semimem_r: max_isometric_force=1786.277 optimal_fiber_length=0.103678
          tendon_slack_length=0.4038621 pennation_angle_at_optimal=0.2545615
        PathPoint P1: pelvis (-0.09449793 -0.0928798 0.05750307)
        PathPoint P2: tibia_r (-0.02762004 -0.04581907 -0.0200501)
        PathWrap: wrap_object=SM_at_condyles_r method=hybrid
      Millard2012EquilibriumMuscle semiten_r: max_isometric_force=480.8976 optimal_fiber_length=0.2321821
          tendon_slack_length=0.2973843 pennation_angle_at_optimal=0.241295
        PathPoint P1: pelvis (-0.0993808 -0.1020863 0.0482314)
        PathPoint P2: tibia_r (-0.03191649 -0.05677094 -0.02342588)
        PathPoint P3: tibia_r (0.001943632 -0.0863857 -0.01196868)
        PathWrap: wrap_object=ST_at_condyles_r method=hybrid
      Millard2012EquilibriumMuscle soleus_r: max_isometric_force=5589.178 optimal_fiber_length=0.04771497
          tendon_slack_length=0.3051047 pennation_angle_at_optimal=0.3814289
        PathPoint P1: tibia_r (-0.00777453 -0.1023665 0.01002505)
        PathPoint P2: calcn_r (0.004148558 0.04484674 -0.005421711)
      Millard2012EquilibriumMuscle tfl_r: max_isometric_force=361.2003 optimal_fiber_length=0.1058169
          tendon_slack_length=0.5006779 pennation_angle_at_optimal=0.05235988
        PathPoint P1: pelvis (-0.02977594 0.01743533 0.1162236)
        PathPoint P2: femur_r (0.03390707 -0.1177685 0.06885212)
        PathPoint P3: femur_r (0.01234033 -0.4793591 0.03736698)
        PathPoint P4: tibia_r (0.01104802 -0.04581907 0.03539457)
      Millard2012EquilibriumMuscle tibant_r: max_isometric_force=1112.085 optimal_fiber_length=0.07375768
          tendon_slack_length=0.2596756 pennation_angle_at_optimal=0.1951828
        PathPoint P1: tibia_r (0.01575365 -0.146621 0.01657202)
        PathPoint P2: tibia_r (0.02567641 -0.2130028 0.01309394)
        PathPoint P3: tibia_r (0.02383507 -0.4089072 -0.01350313)
        PathPoint P4: calcn_r (0.1099368 0.02575071 -0.03120041)
      Millard2012EquilibriumMuscle tibpost_r: max_isometric_force=1573.704 optimal_fiber_length=0.04066055
          tendon_slack_length=0.3020278 pennation_angle_at_optimal=0.2264891
        PathPoint P1: tibia_r (-0.004194154 -0.145727 0.01053653)
        PathPoint P2: tibia_r (-0.01677662 -0.4084602 -0.01790188)
        PathPoint P3: calcn_r (0.03931702 0.04831875 -0.02925678)
        PathPoint P4: calcn_r (0.07278834 0.02300204 -0.0287453)
      Millard2012EquilibriumMuscle vasint_r: max_isometric_force=1413.935 optimal_fiber_length=0.1374201
          tendon_slack_length=0.2407788 pennation_angle_at_optimal=0.06309973
        PathPoint P1: femur_r (0.03344575 -0.2277252 0.03575236)
        PathPoint P2: femur_r (0.03863561 -0.2466628 0.0328691)
        PathPoint P3: patella_r (0.006864896 0.05681293 -0.0007101617)
        PathPoint P4: patella_r (0.005918014 0.002923499 -0.0004616051)
        PathPoint P5: tibia_r (0.03331795 -0.07062841 0.0004398747)
        PathWrap: wrap_object=KnExt_at_fem_r method=hybrid
      Millard2012EquilibriumMuscle vaslat140_r: max_isometric_force=4291.342 optimal_fiber_length=0.1373459
          tendon_slack_length=0.2594311 pennation_angle_at_optimal=0.2528673
        PathPoint vaslat_r-P1: femur_r (0.005535849 -0.21944 0.04025023)
        PathPoint vaslat_r-P2: femur_r (0.03102382 -0.3066715 0.04717005)
        PathPoint vaslat_r-P3: patella_r (0.01219111 0.0500664 0.0166888)
        PathPoint vaslat_r-P4: patella_r (0.005918014 0.002923499 0.008675808)
        PathPoint vaslat_r-P5: tibia_r (0.03328726 -0.07082957 0.005227348)
        PathWrap: wrap_object=KnExtVL_at_fem_r method=hybrid
      Millard2012EquilibriumMuscle vasmed_r: max_isometric_force=2290.53 optimal_fiber_length=0.1291115
          tendon_slack_length=0.2441382 pennation_angle_at_optimal=0.4222225
        PathPoint P1: femur_r (0.01614623 -0.2484382 0.02168207)
        PathPoint P2: femur_r (0.04105755 -0.3277396 0.001037972)
        PathPoint P3: patella_r (0.007456698 0.05267032 -0.02012125)
        PathPoint P4: patella_r (0.005918014 0.002923499 -0.01006062)
        PathPoint P5: tibia_r (0.03263256 -0.0710419 -0.006935699)
        PathWrap: wrap_object=KnExt_at_fem_r method=hybrid
      Millard2012EquilibriumMuscle addbrev_l: max_isometric_force=530.3194 optimal_fiber_length=0.1190392
          tendon_slack_length=0.04093089 pennation_angle_at_optimal=0.1147809 ignore_tendon_compliance=true
        PathPoint P1: pelvis (-0.01828683 -0.0765851 -0.01442259)
        PathPoint P2: femur_l (-0.002315697 -0.1434642 -0.02883043)
        PathWrap: wrap_object=AB_at_femshaft_l method=hybrid
      Millard2012EquilibriumMuscle addlong_l: max_isometric_force=744.0236 optimal_fiber_length=0.1304472
          tendon_slack_length=0.1588989 pennation_angle_at_optimal=0.1377704
        PathPoint P1: pelvis (-0.007257288 -0.07242995 -0.01768173)
        PathPoint P2: femur_l (0.01303738 -0.2910257 -0.01832874)
        PathWrap: wrap_object=AL_at_femshaft_l method=hybrid
      Millard2012EquilibriumMuscle addmagDist_l: max_isometric_force=453.9278 optimal_fiber_length=0.2281316
          tendon_slack_length=0.1124961 pennation_angle_at_optimal=0.194705 ignore_tendon_compliance=true
        PathPoint P1: pelvis (-0.07088781 -0.1040172 -0.03729271)
        PathPoint P2: femur_l (0.0130258 -0.3191471 -0.02234648)
        PathWrap: wrap_object=AMdist_at_femshaft_l method=hybrid
      Millard2012EquilibriumMuscle addmagIsch_l: max_isometric_force=458.7941 optimal_fiber_length=0.1989628
          tendon_slack_length=0.2755711 pennation_angle_at_optimal=0.1680443
        PathPoint P1: pelvis (-0.0858045 -0.10572 -0.03906275)
        PathPoint P2: femur_l (0.005569252 -0.4716933 0.03789639)
        PathWrap: wrap_object=AMisch_at_condyles_l method=hybrid
      Millard2012EquilibriumMuscle addmagMid_l: max_isometric_force=461.4048 optimal_fiber_length=0.1744056
          tendon_slack_length=0.05905688 pennation_angle_at_optimal=0.2073076 ignore_tendon_compliance=true
        PathPoint P1: pelvis (-0.05041804 -0.09837927 -0.02672863)
        PathPoint P2: femur_l (0.002801994 -0.1974457 -0.03383234)
        PathWrap: wrap_object=AMmid_at_femshaft_l method=hybrid
      Millard2012EquilibriumMuscle addmagProx_l: max_isometric_force=526.2606 optimal_fiber_length=0.1172659
          tendon_slack_length=0.04477879 pennation_angle_at_optimal=0.3114833 ignore_tendon_compliance=true
        PathPoint P1: pelvis (-0.02966105 -0.08762476 -0.01278366)
        PathPoint P2: femur_l (-0.01768035 -0.09587787 -0.03707432)
        PathWrap: wrap_object=AMprox_at_femshaft_l method=hybrid
      Millard2012EquilibriumMuscle bflh140_l: max_isometric_force=1038.718 optimal_fiber_length=0.120725
          tendon_slack_length=0.4112815 pennation_angle_at_optimal=0.1759182
        PathPoint bflh_l-P1: pelvis (-0.09957229 -0.09703495 -0.05488078)
        PathPoint bflh_l-P2: tibia_l (-0.03499047 -0.04042457 -0.03684387)
        PathPoint bflh_l-P3: tibia_l (-0.02753616 -0.05549513 -0.03539781)
      Millard2012EquilibriumMuscle bfsh140_l: max_isometric_force=454.5792 optimal_fiber_length=0.1322605
          tendon_slack_length=0.1268852 pennation_angle_at_optimal=0.2642232 ignore_tendon_compliance=true
        PathPoint bfsh_l-P1: femur_l (0.005789243 -0.2566551 -0.02709366)
        PathPoint bfsh_l-P2: tibia_l (-0.02918588 -0.03639098 -0.0326279)
        PathWrap: wrap_object=BF140_at_gastroc_l method=hybrid
      Millard2012EquilibriumMuscle edl_l: max_isometric_force=562.646 optimal_fiber_length=0.07272665
          tendon_slack_length=0.3871149 pennation_angle_at_optimal=0.2182582
        PathPoint P1: tibia_l (-0.01629358 -0.1282106 -0.02087615)
        PathPoint P2: tibia_l (0.01670092 -0.4166568 -0.01140551)
        PathPoint P3: calcn_l (0.08714127 0.05242584 -0.0008146792)
        PathPoint P4: calcn_l (0.1532321 0.008009504 -0.01323854)
        PathPoint P5: toes_l (0.0002844655 0.006844485 -0.02223497)
        PathPoint P6: toes_l (0.04200607 -0.0005825094 -0.03633165)
      Millard2012EquilibriumMuscle ehl_l: max_isometric_force=271.2392 optimal_fiber_length=0.07713184
          tendon_slack_length=0.3369829 pennation_angle_at_optimal=0.1972681
        PathPoint P1: tibia_l (-0.01425689 -0.1717601 -0.0192468)
        PathPoint P2: tibia_l (0.007230278 -0.3223549 -0.01670092)
        PathPoint P3: tibia_l (0.02036698 -0.4092323 0.002851377)
        PathPoint P4: calcn_l (0.09197718 0.05664904 0.02148716)
        PathPoint P5: calcn_l (0.1226046 0.04499885 0.02617157)
        PathPoint P6: calcn_l (0.1644211 0.0202422 0.02851377)
        PathPoint P7: toes_l (0.02825691 0.005970721 0.03560502)
        PathPoint P8: toes_l (0.05338469 0.00495133 0.02703075)
      Millard2012EquilibriumMuscle fdl_l: max_isometric_force=397.7781 optimal_fiber_length=0.04642327
          tendon_slack_length=0.3942573 pennation_angle_at_optimal=0.2248391
        PathPoint P1: tibia_l (-0.002342203 -0.2030094 0.001833028)
        PathPoint P2: tibia_l (-0.01792294 -0.4039133 0.01262753)
        PathPoint P3: calcn_l (0.04134232 0.04587261 0.02851377)
        PathPoint P4: calcn_l (0.06713386 0.02563041 0.02678258)
        PathPoint P5: calcn_l (0.1572146 -0.01179582 -0.01181285)
        PathPoint P6: toes_l (-0.001801615 -0.01135893 -0.02136301)
        PathPoint P7: toes_l (0.02702422 -0.01033954 -0.03124522)
        PathPoint P8: toes_l (0.04181643 -0.008737641 -0.03516904)
      Millard2012EquilibriumMuscle fhl_l: max_isometric_force=866.4956 optimal_fiber_length=0.05402228
          tendon_slack_length=0.3632303 pennation_angle_at_optimal=0.2580255
        PathPoint P1: tibia_l (-0.03156882 -0.2396885 -0.02036698)
        PathPoint P2: tibia_l (-0.02464405 -0.4067944 0.007739452)
        PathPoint P3: calcn_l (0.03546337 0.04019315 0.02454221)
        PathPoint P4: calcn_l (0.09842506 0.00990266 0.02606973)
        PathPoint P5: calcn_l (0.1636625 -0.007718249 0.02739359)
        PathPoint P6: toes_l (0.01469738 -0.00932015 0.03851155)
        PathPoint P7: toes_l (0.05328987 -0.01485399 0.02630412)
      Millard2012EquilibriumMuscle gaslat140_l: max_isometric_force=1418.881 optimal_fiber_length=0.07494102
          tendon_slack_length=0.4062021 pennation_angle_at_optimal=0.2102268
        PathPoint gaslat_l-P1: femur_l (0.002315697 -0.4632192 -0.0238401)
        PathPoint gaslat_l-P2: calcn_l (0.004172161 0.04514448 0.00539725)
        PathWrap: wrap_object=GasLat_at_shank_l method=hybrid
        PathWrap pathwrap_0: wrap_object=GasLat_at_condyles_l method=hybrid
      Millard2012EquilibriumMuscle gasmed_l: max_isometric_force=2809.121 optimal_fiber_length=0.06402227
          tendon_slack_length=0.4199427 pennation_angle_at_optimal=0.1656816
        PathPoint P1: femur_l (0.006947092 -0.4680824 0.02547267)
        PathPoint P2: calcn_l (0.004172161 0.04514448 0.00539725)
        PathWrap: wrap_object=GasMed_at_shank_l method=hybrid
        PathWrap pathwrap_0: wrap_object=GasMed_at_condyles_l method=hybrid
      Millard2012EquilibriumMuscle glmax1_l: max_isometric_force=1002.019 optimal_fiber_length=0.1412084
          tendon_slack_length=0.08386051 pennation_angle_at_optimal=0.3540118 ignore_tendon_compliance=true
        PathPoint P1: pelvis (-0.1178591 0.02810836 -0.05272676)
        PathPoint P2: pelvis (-0.1203484 -0.01971659 -0.07295585)
        PathPoint P3: femur_l (-0.05140848 -0.03963503 -0.03496703)
        PathPoint P4: femur_l (-0.03207241 -0.06881419 -0.05441889)
        PathWrap: wrap_object=Gmax1_at_pelvis_l method=hybrid
      Millard2012EquilibriumMuscle glmax2_l: max_isometric_force=1347.469 optimal_fiber_length=0.1602877
          tendon_slack_length=0.1112825 pennation_angle_at_optimal=0.3673821 ignore_tendon_compliance=true
        PathPoint P1: pelvis (-0.126093 0.007088196 -0.04326778)
        PathPoint P2: pelvis (-0.128678 -0.04961737 -0.07614006)
        PathPoint P3: femur_l (-0.05210319 -0.07100263 -0.02917779)
        PathPoint P4: femur_l (-0.01806244 -0.1235251 -0.04851386)
        PathWrap: wrap_object=Gmax2_at_pelvis_l method=hybrid
      Millard2012EquilibriumMuscle glmax3_l: max_isometric_force=852.9296 optimal_fiber_length=0.1815594
          tendon_slack_length=0.1119797 pennation_angle_at_optimal=0.3824161 ignore_tendon_compliance=true
        PathPoint P1: pelvis (-0.1244654 -0.04277359 -0.008428789)
        PathPoint P2: pelvis (-0.1218803 -0.102901 -0.04073915)
        PathPoint P3: femur_l (-0.03253555 -0.1367773 -0.01088378)
        PathPoint P4: femur_l (-0.006947092 -0.1725218 -0.04758758)
        PathWrap: wrap_object=Gmax3_at_pelvis_l method=hybrid
      Millard2012EquilibriumMuscle glmed1_l: max_isometric_force=1192.733 optimal_fiber_length=0.06547942
          tendon_slack_length=0.05006649 pennation_angle_at_optimal=0.3165559 ignore_tendon_compliance=true
        PathPoint P1: pelvis (-0.04260545 0.01996101 -0.1097616)
        PathPoint P2: femur_l (-0.0252411 -0.01422484 -0.0642606)
      Millard2012EquilibriumMuscle glmed2_l: max_isometric_force=824.6703 optimal_fiber_length=0.06626369
          tendon_slack_length=0.05922777 pennation_angle_at_optimal=0.3165559 ignore_tendon_compliance=true
        PathPoint P1: pelvis (-0.0813812 0.02574563 -0.06321592)
        PathPoint P2: femur_l (-0.0298725 -0.007051631 -0.06101863)
      Millard2012EquilibriumMuscle glmed3_l: max_isometric_force=889.1862 optimal_fiber_length=0.06997893
          tendon_slack_length=0.0433609 pennation_angle_at_optimal=0.3165559 ignore_tendon_compliance=true
        PathPoint P1: pelvis (-0.1102955 -0.005947566 -0.04926159)
        PathPoint P2: femur_l (-0.03577752 -0.005714253 -0.05997656)
      Millard2012EquilibriumMuscle glmin1_l: max_isometric_force=382.8755 optimal_fiber_length=0.06499739
          tendon_slack_length=0.0154252 pennation_angle_at_optimal=0.1745329 ignore_tendon_compliance=true
        PathPoint P1: pelvis (-0.04442456 -0.01213955 -0.09758664)
        PathPoint P2: femur_l (-0.008336511 -0.0126443 -0.06483953)
      Millard2012EquilibriumMuscle glmin2_l: max_isometric_force=401.0986 optimal_fiber_length=0.05393309
          tendon_slack_length=0.02513576 pennation_angle_at_optimal=0 ignore_tendon_compliance=true
        PathPoint P1: pelvis (-0.05897743 -0.01156924 -0.09093726)
        PathPoint P2: femur_l (-0.01111535 -0.0126443 -0.06483953)
      Millard2012EquilibriumMuscle glmin3_l: max_isometric_force=447.1746 optimal_fiber_length=0.03714615
          tendon_slack_length=0.04972941 pennation_angle_at_optimal=0.01745329
        PathPoint P1: pelvis (-0.0755409 -0.01262839 -0.07473526)
        PathPoint P2: femur_l (-0.01563096 -0.01009113 -0.06368168)
      Millard2012EquilibriumMuscle grac_l: max_isometric_force=222.3167 optimal_fiber_length=0.2820258
          tendon_slack_length=0.2129602 pennation_angle_at_optimal=0.1720016 ignore_tendon_compliance=true
        PathPoint P1: pelvis (-0.04534369 -0.1053615 -0.02300123)
        PathPoint P2: tibia_l (-0.01875799 -0.05269157 0.03015331)
        PathPoint P3: tibia_l (0.001812661 -0.07714799 0.01601863)
        PathWrap: wrap_object=GR_at_condyles_l method=hybrid
      Millard2012EquilibriumMuscle iliacus_l: max_isometric_force=1040.141 optimal_fiber_length=0.102393
          tendon_slack_length=0.09232728 pennation_angle_at_optimal=0.279914 ignore_tendon_compliance=true
        PathPoint P1: pelvis (-0.05792426 0.02517532 -0.07894965)
        PathPoint P2: pelvis (-0.01292525 -0.04538075 -0.07080182)
        PathPoint P3: femur_l (-0.002663052 -0.06869261 -0.0160941)
        PathPoint P4: femur_l (-0.01412575 -0.07744636 -0.02269383)
        PathWrap: wrap_object=IL_at_brim_l method=hybrid range=(2 3)
      Millard2012EquilibriumMuscle perbrev_l: max_isometric_force=487.2649 optimal_fiber_length=0.0475134
          tendon_slack_length=0.1543951 pennation_angle_at_optimal=0.2052361
        PathPoint P1: tibia_l (-0.02474588 -0.2805784 -0.02556056)
        PathPoint P2: tibia_l (-0.03452203 -0.4313949 -0.02535689)
        PathPoint P3: tibia_l (-0.02902295 -0.4436951 -0.0259679)
        PathPoint P4: calcn_l (0.04466108 0.03931938 -0.02372753)
        PathPoint P5: calcn_l (0.06419438 0.03189239 -0.03492937)
      Millard2012EquilibriumMuscle perlong_l: max_isometric_force=1029.375 optimal_fiber_length=0.05385542
          tendon_slack_length=0.3522025 pennation_angle_at_optimal=0.2479525
        PathPoint P1: tibia_l (-0.02036698 -0.1521462 -0.02871744)
        PathPoint P2: tibia_l (-0.03228166 -0.4321706 -0.02413487)
        PathPoint P3: tibia_l (-0.02769909 -0.4448033 -0.02444038)
        PathPoint P4: calcn_l (0.04153196 0.03349429 -0.02250551)
        PathPoint P5: calcn_l (0.06457367 0.0154365 -0.02892111)
        PathPoint P6: calcn_l (0.0807882 0.01004829 -0.01201652)
        PathPoint P7: calcn_l (0.1140707 0.01237832 0.01873762)
      Millard2012EquilibriumMuscle piri_l: max_isometric_force=1055.498 optimal_fiber_length=0.02481892
          tendon_slack_length=0.1096865 pennation_angle_at_optimal=0.1745329
        PathPoint P1: pelvis (-0.09747552 -0.00532022 -0.01265255)
        PathPoint P2: pelvis (-0.09767658 -0.02497978 -0.05705353)
        PathPoint P3: femur_l (-0.01713616 -0.004376875 -0.05059799)
      Millard2012EquilibriumMuscle psoas_l: max_isometric_force=1496.961 optimal_fiber_length=0.1090144
          tendon_slack_length=0.09282839 pennation_angle_at_optimal=0.2155251 ignore_tendon_compliance=true
        PathPoint P1: pelvis (-0.05802001 0.05051358 -0.03652475)
        PathPoint P2: pelvis (-0.01962723 -0.05328368 -0.0614365)
        PathPoint P3: femur_l (-0.0152836 -0.05677779 -0.005326104)
        PathPoint P4: femur_l (-0.02720944 -0.06370784 -0.01018907)
        PathWrap: wrap_object=PS_at_brim_l method=hybrid range=(2 3)
      Millard2012EquilibriumMuscle recfem_l: max_isometric_force=1823.174 optimal_fiber_length=0.08927349
          tendon_slack_length=0.5297599 pennation_angle_at_optimal=0.2170149
        PathPoint P1: pelvis (-0.02297822 -0.03161172 -0.08737844)
        PathPoint P2: patella_l (0.01215798 0.05957413 -0.0008510589)
        PathPoint P3: patella_l (0.01471116 0.05313039 0.001215798)
        PathPoint P4: patella_l (0.006078992 0.003003022 -3.647395e-5)
        PathPoint P5: tibia_l (0.03319818 -0.06994515 0.000478624)
        PathWrap: wrap_object=KnExt_at_fem_l method=hybrid
      Millard2012EquilibriumMuscle sart_l: max_isometric_force=213.3781 optimal_fiber_length=0.4608868
          tendon_slack_length=0.1418111 pennation_angle_at_optimal=0.02613542 ignore_tendon_compliance=true
        PathPoint P1: pelvis (-0.0186698 -0.01270987 -0.09889779)
        PathPoint P2: femur_l (-0.003473546 -0.4337969 0.04874543)
        PathPoint P3: tibia_l (-0.02556056 -0.044436 0.03716974)
        PathPoint P4: tibia_l (-0.01619175 -0.06637697 0.02688441)
        PathPoint P5: tibia_l (0.01384955 -0.0897585 0.002647707)
      Millard2012EquilibriumMuscle semimem_l: max_isometric_force=1741.42 optimal_fiber_length=0.1063487
          tendon_slack_length=0.4142651 pennation_angle_at_optimal=0.2545615
        PathPoint P1: pelvis (-0.09449793 -0.0928798 -0.05750307)
        PathPoint P2: tibia_l (-0.02749542 -0.04543332 0.01995964)
        PathWrap: wrap_object=SM_at_condyles_l method=hybrid
      Millard2012EquilibriumMuscle semiten_l: max_isometric_force=470.2443 optimal_fiber_length=0.2374421
          tendon_slack_length=0.3041214 pennation_angle_at_optimal=0.241295
        PathPoint P1: pelvis (-0.0993808 -0.1020863 -0.0482314)
        PathPoint P2: tibia_l (-0.03177249 -0.05629299 0.02332019)
        PathPoint P3: tibia_l (0.001934863 -0.08565842 0.01191468)
        PathWrap: wrap_object=ST_at_condyles_l method=hybrid
      Millard2012EquilibriumMuscle soleus_l: max_isometric_force=5647.173 optimal_fiber_length=0.04722495
          tendon_slack_length=0.3019714 pennation_angle_at_optimal=0.3814289
        PathPoint P1: tibia_l (-0.007739452 -0.1015047 -0.00997982)
        PathPoint P2: calcn_l (0.004172161 0.04514448 0.00539725)
      Millard2012EquilibriumMuscle tfl_l: max_isometric_force=353.7879 optimal_fiber_length=0.108034
          tendon_slack_length=0.5111679 pennation_angle_at_optimal=0.05235988
        PathPoint P1: pelvis (-0.02977594 0.01743533 -0.1162236)
        PathPoint P2: femur_l (0.03404075 -0.1209719 -0.06912357)
        PathPoint P3: femur_l (0.01238898 -0.4923984 -0.0375143)
        PathPoint P4: tibia_l (0.01099817 -0.04543332 -0.03523487)
      Millard2012EquilibriumMuscle tibant_l: max_isometric_force=1120.934 optimal_fiber_length=0.07317539
          tendon_slack_length=0.2576256 pennation_angle_at_optimal=0.1951828
        PathPoint P1: tibia_l (0.01568257 -0.1453866 -0.01649725)
        PathPoint P2: tibia_l (0.02556056 -0.2112095 -0.01303487)
        PathPoint P3: tibia_l (0.02372753 -0.4054647 0.01344221)
        PathPoint P4: calcn_l (0.1105623 0.02592167 0.03105964)
      Millard2012EquilibriumMuscle tibpost_l: max_isometric_force=1587.711 optimal_fiber_length=0.04030184
          tendon_slack_length=0.2993634 pennation_angle_at_optimal=0.2264891
        PathPoint P1: tibia_l (-0.004175231 -0.1445001 -0.01048899)
        PathPoint P2: tibia_l (-0.01670092 -0.4050214 0.01782111)
        PathPoint P3: calcn_l (0.0395407 0.04863953 0.02912478)
        PathPoint P4: calcn_l (0.07320246 0.02315475 0.02861561)
      Millard2012EquilibriumMuscle vasint_l: max_isometric_force=1386.376 optimal_fiber_length=0.1401517
          tendon_slack_length=0.245565 pennation_angle_at_optimal=0.06309973
        PathPoint P1: femur_l (0.03357761 -0.2339196 -0.03589331)
        PathPoint P2: femur_l (0.03878793 -0.2533724 -0.03299869)
        PathPoint P3: patella_l (0.007051631 0.05835833 0.0007294791)
        PathPoint P4: patella_l (0.006078992 0.003003022 0.0004741614)
        PathPoint P5: tibia_l (0.03316763 -0.0700338 -0.0004378901)
        PathWrap: wrap_object=KnExt_at_fem_l method=hybrid
      Millard2012EquilibriumMuscle vaslat140_l: max_isometric_force=4209.863 optimal_fiber_length=0.1400041
          tendon_slack_length=0.2644522 pennation_angle_at_optimal=0.2528673
        PathPoint vaslat_l-P1: femur_l (0.005557674 -0.225409 -0.04040892)
        PathPoint vaslat_l-P2: femur_l (0.03114613 -0.3150134 -0.04735601)
        PathPoint vaslat_l-P3: patella_l (0.01252272 0.05142828 -0.01714276)
        PathPoint vaslat_l-P4: patella_l (0.006078992 0.003003022 -0.008911803)
        PathPoint vaslat_l-P5: tibia_l (0.03313708 -0.07023326 -0.005203763)
        PathWrap: wrap_object=KnExtVL_at_fem_l method=hybrid
      Millard2012EquilibriumMuscle vasmed_l: max_isometric_force=2247.469 optimal_fiber_length=0.1315853
          tendon_slack_length=0.2488159 pennation_angle_at_optimal=0.4222225
        PathPoint P1: femur_l (0.01620988 -0.2551961 -0.02176756)
        PathPoint P2: femur_l (0.04121941 -0.3366546 -0.001042064)
        PathPoint P3: patella_l (0.00765953 0.05410303 0.02066857)
        PathPoint P4: patella_l (0.006078992 0.003003022 0.01033429)
        PathPoint P5: tibia_l (0.03248533 -0.0704438 0.006904406)
        PathWrap: wrap_object=KnExt_at_fem_l method=hybrid
      CoordinateActuator tau_lumbar_ext: coordinate=lumbar_extension optimal_force=10
      CoordinateActuator tau_lumbar_bend: coordinate=lumbar_bending optimal_force=10
      CoordinateActuator tau_lumbar_rot: coordinate=lumbar_rotation optimal_force=10
      ObjectGroup right_leg: members=(addbrev_r addlong_r addmagDist_r addmagIsch_r addmagMid_r addmagProx_r edl_r ehl_r fdl_r fhl_r gasmed_r glmax1_r glmax2_r glmax3_r glmed1_r glmed2_r glmed3_r glmin1_r glmin2_r glmin3_r grac_r iliacus_r perbrev_r perlong_r piri_r psoas_r recfem_r sart_r semimem_r semiten_r soleus_r tfl_r tibant_r tibpost_r vasint_r vasmed_r)
      ObjectGroup left_leg: members=(addbrev_l addlong_l addmagDist_l addmagIsch_l addmagMid_l addmagProx_l edl_l ehl_l fdl_l fhl_l gasmed_l glmax1_l glmax2_l glmax3_l glmed1_l glmed2_l glmed3_l glmin1_l glmin2_l glmin3_l grac_l iliacus_l perbrev_l perlong_l piri_l psoas_l recfem_l sart_l semimem_l semiten_l soleus_l tfl_l tibant_l tibpost_l vasint_l vasmed_l)
      ObjectGroup hip_add_r: members=(addbrev_r addlong_r addmagDist_r addmagIsch_r addmagMid_r addmagProx_r grac_r semimem_r semiten_r)
      ObjectGroup hip_abd_r: members=(glmax1_r glmed1_r glmed2_r glmed3_r glmin1_r glmin2_r glmin3_r piri_r sart_r tfl_r)
      ObjectGroup hip_flex_r: members=(addbrev_r addlong_r glmin1_r grac_r iliacus_r psoas_r recfem_r sart_r tfl_r)
      ObjectGroup hip_ext_r: members=(addlong_r addmagDist_r addmagIsch_r addmagMid_r addmagProx_r glmax1_r glmax2_r glmax3_r glmed1_r glmed2_r glmed3_r glmin3_r semimem_r semiten_r)
      ObjectGroup hip_inrot_r: members=(glmed1_r glmed2_r glmed3_r glmin1_r iliacus_r psoas_r tfl_r)
      ObjectGroup hip_exrot_r: members=(glmin3_r piri_r)
      ObjectGroup knee_flex_r: members=(gasmed_r grac_r sart_r semimem_r semiten_r)
      ObjectGroup knee_ext_r: members=(recfem_r vasint_r vasmed_r)
      ObjectGroup ankle_df_r: members=(edl_r ehl_r tibant_r)
      ObjectGroup ankle_pf_r: members=(fdl_r fhl_r gasmed_r perbrev_r perlong_r soleus_r tibpost_r)
      ObjectGroup everter_r: members=(edl_r perbrev_r perlong_r)
      ObjectGroup inverter_r: members=(ehl_r fdl_r fhl_r tibant_r tibpost_r)
      ObjectGroup hip_add_l: members=(addbrev_l addlong_l addmagDist_l addmagIsch_l addmagMid_l addmagProx_l grac_l semimem_l semiten_l)
      ObjectGroup hip_abd_l: members=(glmax1_l glmed1_l glmed2_l glmed3_l glmin1_l glmin2_l glmin3_l sart_l tfl_l)
      ObjectGroup hip_flex_l: members=(addbrev_l addlong_l glmin1_l grac_l iliacus_l psoas_l recfem_l sart_l tfl_l)
      ObjectGroup hip_ext_l: members=(addlong_l addmagDist_l addmagIsch_l addmagMid_l addmagProx_l glmax1_l glmax2_l glmax3_l glmed1_l glmed2_l glmed3_l glmin3_l semimem_l semiten_l)
      ObjectGroup hip_exrot_l: members=glmin3_l
      ObjectGroup hip_inrot_l: members=(glmed1_l glmed2_l glmed3_l glmin1_l iliacus_l psoas_l tfl_l)
      ObjectGroup knee_flex_l: members=(gasmed_l grac_l sart_l semimem_l semiten_l)
      ObjectGroup knee_ext_l: members=(recfem_l vasint_l vasmed_l)
      ObjectGroup ankle_df_l: members=(edl_l ehl_l tibant_l)
      ObjectGroup ankle_pf_l: members=(fdl_l fhl_l gasmed_l perbrev_l perlong_l soleus_l tibpost_l)
      ObjectGroup everter_l: members=(edl_l perbrev_l perlong_l)
      ObjectGroup inverter_l: members=(ehl_l fdl_l fhl_l tibant_l tibpost_l)
    MarkerSet:
      Marker C7: torso (-0.07527385 0.4420764 -7.959326e-9) fixed=true
      Marker T10: torso (-0.1128284 0.1579773 -0.01141861) fixed=true
      Marker CLAV: torso (0.05318717 0.3632501 0.00116764) fixed=true
      Marker STRN: torso (0.1559101 0.2066949 0.003947576)
      Marker RACR: torso (-0.01922685 0.4149251 0.1754962) fixed=true
      Marker LACR: torso (-0.01709985 0.4168265 -0.1703916) fixed=true
      Marker MTOR: torso (-0.01460335 0.4092695 0.001568048) fixed=true
      Marker RASI: pelvis (0.009773786 0.009004208 0.1208417) fixed=true
      Marker LASI: pelvis (0.01024474 0.009035657 -0.1206806) fixed=true
      Marker RPSI: pelvis (-0.1631597 0.03194935 0.04229341) fixed=true
      Marker LPSI: pelvis (-0.1541877 0.03305022 -0.0440983) fixed=true
      Marker MPEL: pelvis (-0.07433222 0.02075986 -0.0004109503) fixed=true
      Marker RTH1: femur_r (0.01711074 -0.1801795 0.1113915)
      Marker RTH2: femur_r (0.06038424 -0.2709124 0.08564218)
      Marker RTH3: femur_r (-0.00307276 -0.3553423 0.08640904)
      Marker RHJC: femur_r (0 0 0) fixed=true
      Marker RLFC: femur_r (0.01146396 -0.4649619 0.06166502) fixed=true
      Marker RMFC: femur_r (0.01146396 -0.4591162 -0.0633839) fixed=true
      Marker RKJC: femur_r (0.01146396 -0.4620391 -0.0008594405) fixed=true
      Marker RTB3: tibia_r (0.005895129 -0.2378898 0.0004700843)
      Marker RTB2: tibia_r (0.02027073 -0.1676224 0.04693238)
      Marker RTB1: tibia_r (0.001595648 -0.09828696 -0.00136365)
      Marker RLMAL: tibia_r (-0.005116319 -0.4259086 0.05437887) fixed=true
      Marker RMMAL: tibia_r (0.00579192 -0.4140524 -0.03988976) fixed=true
      Marker RAJC: tibia_r (0.0003378002 -0.4199805 0.007244555) fixed=true
      Marker fRAJC: tibia_r (0.0003391434 -0.4977984 0.01015568) fixed=true
      Marker RCAL: calcn_r (-0.03263642 0.0485777 -0.007459549) fixed=true
      Marker fRCAL: calcn_r (-0.03263642 -0.00505187 -0.007459549) fixed=true
      Marker RMT5: calcn_r (0.1685587 0.0485777 0.04844248) fixed=true
      Marker fRMT5: calcn_r (0.1685587 -0.00505187 0.04844248) fixed=true
      Marker RMT1: calcn_r (0.1865569 0.0485777 -0.0267899) fixed=true
      Marker fRMT1: calcn_r (0.1865559 -0.00505187 -0.0267899) fixed=true
      Marker RMT3: calcn_r (0.1775573 0.0485777 0.01082634) fixed=true
      Marker fRMT3: calcn_r (0.1775573 -0.00505187 0.01082629) fixed=true
      Marker LTH1: femur_l (0.01215284 -0.1621898 -0.1076263)
      Marker LTH2: femur_l (0.04903758 -0.2528694 -0.09080685)
      Marker LTH3: femur_l (-0.01689334 -0.3323142 -0.08426185)
      Marker LHJC: femur_l (0 0 0) fixed=true
      Marker LLFC: femur_l (0.01150916 -0.4776094 -0.06190809) fixed=true
      Marker LMFC: femur_l (0.01150916 -0.4716046 0.06363374) fixed=true
      Marker LKJC: femur_l (0.01150916 -0.4746072 0.0008628289) fixed=true
      Marker LTB3: tibia_l (-0.002123447 -0.2332751 0.01097508)
      Marker LTB2: tibia_l (0.02204659 -0.1697471 -0.03869372)
      Marker LTB1: tibia_l (0.002907946 -0.09505768 0.001975648)
      Marker LLMAL: tibia_l (-0.005093232 -0.4223226 -0.0541335) fixed=true
      Marker LMMAL: tibia_l (0.00576579 -0.4105665 0.03970981) fixed=true
      Marker LAJC: tibia_l (0.0003362761 -0.4164447 -0.007211869) fixed=true
      Marker fLAJC: tibia_l (0.0003362761 -0.4936075 -0.007211869) fixed=true
      Marker LCAL: calcn_l (-0.03449808 0.04890021 0.002355635) fixed=true
      Marker fLCAL: calcn_l (-0.03449808 -0.005085409 0.002355635) fixed=true
      Marker LMT5: calcn_l (0.1695177 0.04890021 -0.04822392) fixed=true
      Marker fLMT5: calcn_l (0.1695177 -0.005085409 -0.04822392) fixed=true
      Marker LMT1: calcn_l (0.1876173 0.04890021 0.02666903) fixed=true
      Marker fLMT1: calcn_l (0.1876173 -0.005085409 0.02666903) fixed=true
      Marker LMT3: calcn_l (0.1785675 0.04890021 -0.01077749) fixed=true
      Marker fLMT3: calcn_l (0.1785675 -0.005085409 -0.01077744) fixed=true
    ContactGeometrySet:
      ContactSphere heel_r: socket_frame=/bodyset/calcn_r location=(0.02951843 0.01509722 0) radius=0.03981231
      ContactSphere mh1_r: socket_frame=/bodyset/calcn_r location=(0.1715994 -0.01171803 -0.02352808) radius=0.01706242
      ContactSphere mh3_r: socket_frame=/bodyset/calcn_r location=(0.1563252 -0.01171803 0.01186634) radius=0.01706242
      ContactSphere mh5_r: socket_frame=/bodyset/calcn_r location=(0.1348281 -0.01171803 0.03784952) radius=0.01706242
      ContactSphere hallux_r: socket_frame=/bodyset/toes_r location=(0.05298839 -0.01475603 -0.02611341)
          radius=0.01916127
      ContactSphere othertoes_r: socket_frame=/bodyset/toes_r location=(0.04157986 -0.00868002 0.03491407)
          radius=0.01916127
      ContactSphere heel_l: socket_frame=/bodyset/calcn_l location=(0.02968636 0.0151974 0) radius=0.03993311
      ContactSphere mh1_l: socket_frame=/bodyset/calcn_l location=(0.1725757 -0.01179579 0.02342205) radius=0.01711419
      ContactSphere mh3_l: socket_frame=/bodyset/calcn_l location=(0.1572145 -0.01179579 -0.01181286) radius=0.01711419
      ContactSphere mh5_l: socket_frame=/bodyset/calcn_l location=(0.1355952 -0.01179579 -0.03767895) radius=0.01711419
      ContactSphere hallux_l: socket_frame=/bodyset/toes_l location=(0.05328985 -0.01485395 0.02630419)
          radius=0.01928879
      ContactSphere othertoes_l: socket_frame=/bodyset/toes_l location=(0.04181641 -0.00873762 -0.03516913)
          radius=0.01928879
      ContactHalfSpace floor: socket_frame=/ground orientation=(0 0 -1.570796)
