# OpenSim document version 20302
MeasurementSet:
  Measurement torso_height: apply=true
    MarkerPair: markers=(MTOR MPEL)
    BodyScale torso: axes=Y
  Measurement torso_breadth: apply=true
    MarkerPair: markers=(C7 CLAV)
    MarkerPair: markers=(T10 STRN)
    BodyScale torso: axes=X
  Measurement torso_width: apply=true
    MarkerPair: markers=(RACR LACR)
    BodyScale torso: axes=Z
  Measurement pelvis_w: apply=true
    MarkerPair: markers=(RASI LASI)
    MarkerPair: markers=(RPSI LPSI)
    BodyScale pelvis: axes=Z
  Measurement pelvis_d: apply=true
    MarkerPair: markers=(RASI RPSI)
    MarkerPair: markers=(LASI LPSI)
    BodyScale pelvis: axes=X
  Measurement pelvis_h: apply=true
    MarkerPair: markers=(MPEL RHJC)
    MarkerPair: markers=(MPEL LHJC)
    BodyScale pelvis: axes=Y
  Measurement r_thigh_length: apply=true
    MarkerPair: markers=(RHJC RKJC)
    BodyScale femur_r: axes=Y
    BodyScale patella_r: axes=(X Y Z)
  Measurement r_thigh_breadth: apply=true
    MarkerPair: markers=(RLFC RMFC)
    BodyScale femur_r: axes=(X Z)
  Measurement r_tibia_length: apply=true
    MarkerPair: markers=(RKJC RAJC)
    BodyScale tibia_r: axes=Y
    BodyScale talus_r: axes=Y
  Measurement r_tibia_breadth: apply=true
    MarkerPair: markers=(RLMAL RMMAL)
    BodyScale tibia_r: axes=(X Z)
    BodyScale talus_r: axes=(X Z)
    BodyScale calcn_r: axes=Z
  Measurement r_foot_length: apply=true
    MarkerPair: markers=(fRCAL fRAJC)
    MarkerPair: markers=(fRAJC fRMT3)
    BodyScale calcn_r: axes=X
    BodyScale toes_r: axes=X
  Measurement r_foot_height: apply=true
    MarkerPair: markers=(RAJC fRAJC)
    BodyScale calcn_r: axes=Y
    BodyScale toes_r: axes=Y
  Measurement r_foot_width: apply=true
    MarkerPair: markers=(fRMT1 fRMT5)
    BodyScale toes_r: axes=Z
  Measurement l_thigh_length: apply=true
    MarkerPair: markers=(LHJC LKJC)
    BodyScale femur_l: axes=Y
    BodyScale patella_l: axes=(X Y Z)
  Measurement l_thigh_breadth: apply=true
    MarkerPair: markers=(LLFC LMFC)
    BodyScale femur_l: axes=(X Z)
  Measurement l_tibia_length: apply=true
    MarkerPair: markers=(LKJC LAJC)
    BodyScale tibia_l: axes=Y
    BodyScale talus_l: axes=Y
  Measurement l_tibia_breadth: apply=true
    MarkerPair: markers=(LLMAL LMMAL)
    BodyScale tibia_l: axes=(X Z)
    BodyScale talus_l: axes=(X Z)
    BodyScale calcn_l: axes=Z
  Measurement l_foot_length: apply=true
    MarkerPair: markers=(fLCAL fLAJC)
    MarkerPair: markers=(fLAJC fLMT3)
    BodyScale calcn_l: axes=X
    BodyScale toes_l: axes=X
  Measurement l_foot_height: apply=true
    MarkerPair: markers=(LAJC fLAJC)
    BodyScale calcn_l: axes=Y
    BodyScale toes_l: axes=Y
  Measurement l_foot_width: apply=true
    MarkerPair: markers=(fLMT1 fLMT5)
    BodyScale toes_l: axes=Z
