# OpenSim document version 40000
MocoStudy torque_driven_rra_tracking:
  MocoProblem problem:
    MocoPhase phases:
      ModelProcessor model:
        model: Model:
          gravity: 0 -9.80665 0
          length_units: meters
          force_units: N
          credits:
            A planar reduced gait model with 9 degrees of freedom and 18 muscles by Ajay Seth. Adjusted by Carmichael Ong to follow muscle strengths of Handsfield/Rajagopal and changed hamstrings to follow semimembranosus. Ankle passive mechanics based on Weiss, Kearney, and Hunter 1986. Closely based on Delp S.L., Loan J.P., Hoy M.G., Zajac F.E., Topp E.L., Rosen J.M., Thelen D.G., Anderson F.C., Seth A. Notes: 3D, 23 DOF gait model created by D.G. Thelen, Univ. of Wisconsin-Madison, and Ajay Seth, Frank C. Anderson, and Scott L. Delp, Stanford University. Lower extremity joint defintions based on Delp et al. (1990). Low back joint and anthropometry based on Anderson and Pandy (1999, 2001). Planar knee model of Yamaguchi and Zajac (1989). Seth replaced tibia translation constraints with a CustomJoint for the knee and removed the patella to eliminate all kinematic constraints; insertions of the quadrucepts are handled with moving points in the tibia frame as defined by Delp 1990. Number of muscles was reduced by Anderson to improve simulation speed for demonstrations and is not intended to be used in research. License: Creative Commons (CCBY 3.0). You are free to distribute, remix, tweak, and build upon this work, even commercially, as long as you credit us for the original creation. http://creativecommons.org/licenses/by/3.0/ More Information: http://simtk-confluence.stanford.edu:8080/display/OpenSim/Gait+2392+and+2354+Models
          publications:
            Delp, S.L., Loan, J.P., Hoy, M.G., Zajac, F.E., Topp E.L., Rosen, J.M.: An interactive graphics-based model of the lower extremity to study orthopaedic surgical procedures, IEEE Transactions on Biomedical Engineering, vol. 37, pp. 757-767, 1990. Yamaguchi G.T., Zajac F.E.: A planar model of the knee joint to characterize the knee extensor mechanism." J . Biomech. vol. 22. pp. 1-10. 1989. Anderson F.C., Pandy M.G.: A dynamic optimization solution for vertical jumping in three dimensions. Computer Methods in Biomechanics and Biomedical Engineering 2:201-231, 1999. Anderson F.C., Pandy M.G.: Dynamic optimization of human walking. Journal of Biomechanical Engineering 123:381-390, 2001.
          Ground
          BodySet:
            Body pelvis: mass=10.86752 [kg] mass_center=(-0.06537094 0 0)
                inertia=(0.09116688 0.09116688 0.04983042 0 0 0) meshes=(r_pelvis.vtp l_pelvis.vtp sacrum.vtp)
            Body femur_l: mass=8.583098 mass_center=(0 -0.2072538 0) inertia=(0.1242388 0.03256746 0.1310121 0 0 0)
                meshes=femur_l.vtp
            Body femur_r: mass=8.583098 mass_center=(0 -0.2017647 0) inertia=(0.1242388 0.03256746 0.1310121 0 0 0)
                meshes=femur_r.vtp
            Body tibia_l: mass=3.421188 mass_center=(0 -0.2000053 0) inertia=(0.04346489 0.004398233 0.04406857 0 0 0)
                meshes=(tibia_l.vtp l_fibula.vtp)
            Body tibia_r: mass=3.421188 mass_center=(0 -0.2017037 0) inertia=(0.04346489 0.004398233 0.04406857 0 0 0)
                meshes=(tibia_r.vtp r_fibula.vtp)
            Body talus_l: mass=0.09227748 mass_center=(0 0 0) inertia=(0.0007707548 0.0007707548 0.0007707548 0 0 0)
                meshes=l_talus.vtp
            Body talus_r: mass=0.09227748 mass_center=(0 0 0) inertia=(0.0007707548 0.0007707548 0.0007707548 0 0 0)
                meshes=r_talus.vtp
            Body calcn_l: mass=1.153469 mass_center=(0.08665992 0.03992757 0)
                inertia=(0.001079057 0.003005944 0.003160095 0 0 0) meshes=l_foot.vtp
            Body calcn_r: mass=1.153469 mass_center=(0.08616969 0.03966436 0)
                inertia=(0.001079057 0.003005944 0.003160095 0 0 0) meshes=r_foot.vtp
            Body toes_l: mass=0.199873 mass_center=(0.02998436 0.007985529 0.02324316)
                inertia=(7.707548e-5 0.000154151 7.707548e-5 0 0 0) meshes=l_bofoot.vtp
            Body toes_r: mass=0.199873 mass_center=(0.02981474 0.007932887 -0.02307459)
                inertia=(7.707548e-5 0.000154151 7.707548e-5 0 0 0) meshes=r_bofoot.vtp
            Body torso: mass=31.59267 mass_center=(-0.03032665 0.3078043 0) inertia=(1.275816 0.6638434 1.275816 0 0 0)
                meshes=(hat_spine.vtp hat_jaw.vtp hat_skull.vtp hat_ribs.vtp)
          JointSet:
            PlanarJoint ground_pelvis: socket_parent_frame=ground_offset socket_child_frame=pelvis_offset
              Coordinate pelvis_tilt: range=(-1.570796 1.570796)
              Coordinate pelvis_tx: range=(-5 5)
              Coordinate pelvis_ty: range=(-3 3)
              PhysicalOffsetFrame ground_offset: socket_parent=/ground translation=(0 0 0) [meters]
              PhysicalOffsetFrame pelvis_offset: socket_parent=/bodyset/pelvis translation=(0 0 0)
            PinJoint hip_l: socket_parent_frame=pelvis_offset socket_child_frame=femur_l_offset
              Coordinate hip_flexion_l: range=(-2.094395 2.094395)
              PhysicalOffsetFrame pelvis_offset: socket_parent=/bodyset/pelvis
                  translation=(-0.06537094 -0.05200893 -0.07710533)
              PhysicalOffsetFrame femur_l_offset: socket_parent=/bodyset/femur_l translation=(0 0 0)
            PinJoint hip_r: socket_parent_frame=pelvis_offset socket_child_frame=femur_r_offset
              Coordinate hip_flexion_r: range=(-2.094395 2.094395)
              PhysicalOffsetFrame pelvis_offset: socket_parent=/bodyset/pelvis
                  translation=(-0.06537094 -0.05200893 0.07710533)
              PhysicalOffsetFrame femur_r_offset: socket_parent=/bodyset/femur_r translation=(0 0 0)
            PinJoint knee_l: socket_parent_frame=femur_l_offset socket_child_frame=tibia_l_offset
              Coordinate knee_angle_l: range=(-2.094395 0.1745329)
              PhysicalOffsetFrame femur_l_offset: socket_parent=/bodyset/femur_l
                  translation=(-0.005224465 -0.4825598 0)
              PhysicalOffsetFrame tibia_l_offset: socket_parent=/bodyset/tibia_l translation=(0 0 0)
            PinJoint knee_r: socket_parent_frame=femur_r_offset socket_child_frame=tibia_r_offset
              Coordinate knee_angle_r: range=(-2.094395 0.1745329)
              PhysicalOffsetFrame femur_r_offset: socket_parent=/bodyset/femur_r
                  translation=(-0.005203934 -0.4697794 0)
              PhysicalOffsetFrame tibia_r_offset: socket_parent=/bodyset/tibia_r translation=(0 0 0)
            PinJoint ankle_l: socket_parent_frame=tibia_l_offset socket_child_frame=talus_l_offset
              Coordinate ankle_angle_l: range=(-1.047198 1.047198)
              PhysicalOffsetFrame tibia_l_offset: socket_parent=/bodyset/tibia_l translation=(0 -0.4606439 0)
              PhysicalOffsetFrame talus_l_offset: socket_parent=/bodyset/talus_l translation=(0 0 0)
            PinJoint ankle_r: socket_parent_frame=tibia_r_offset socket_child_frame=talus_r_offset
              Coordinate ankle_angle_r: range=(-1.047198 1.047198)
              PhysicalOffsetFrame tibia_r_offset: socket_parent=/bodyset/tibia_r translation=(0 -0.4645556 0)
              PhysicalOffsetFrame talus_r_offset: socket_parent=/bodyset/talus_r translation=(0 0 0)
            WeldJoint subtalar_l: socket_parent_frame=talus_l_offset socket_child_frame=calcn_l_offset
              PhysicalOffsetFrame talus_l_offset: socket_parent=/bodyset/talus_l
                  translation=(-0.04538999 -0.04248474 -0.007371104)
              PhysicalOffsetFrame calcn_l_offset: socket_parent=/bodyset/calcn_l translation=(0 0 0)
            WeldJoint subtalar_r: socket_parent_frame=talus_r_offset socket_child_frame=calcn_r_offset
              PhysicalOffsetFrame talus_r_offset: socket_parent=/bodyset/talus_r
                  translation=(-0.04559547 -0.04284551 0.007404472)
              PhysicalOffsetFrame calcn_r_offset: socket_parent=/bodyset/calcn_r translation=(0 0 0)
            WeldJoint mtp_l: socket_parent_frame=calcn_l_offset socket_child_frame=toes_l_offset
              PhysicalOffsetFrame calcn_l_offset: socket_parent=/bodyset/calcn_l
                  translation=(0.154948 -0.002661841 -0.001434433)
              PhysicalOffsetFrame toes_l_offset: socket_parent=/bodyset/toes_l translation=(0 0 0)
            WeldJoint mtp_r: socket_parent_frame=calcn_r_offset socket_child_frame=toes_r_offset
              PhysicalOffsetFrame calcn_r_offset: socket_parent=/bodyset/calcn_r
                  translation=(0.1540715 -0.002644294 0.00142403)
              PhysicalOffsetFrame toes_r_offset: socket_parent=/bodyset/toes_r translation=(0 0 0)
            PinJoint back: socket_parent_frame=pelvis_offset socket_child_frame=torso_offset
              Coordinate lumbar_extension: range=(-1.570796 1.570796)
              PhysicalOffsetFrame pelvis_offset: socket_parent=/bodyset/pelvis translation=(-0.09310967 0.06412599 0)
              PhysicalOffsetFrame torso_offset: socket_parent=/bodyset/torso translation=(0 0 0)
          ForceSet:
            SmoothSphereHalfSpaceForce [values shared by the 6 below unless stated]: socket_half_space=/contactgeometryset/floor
                stiffness=3067776 [N/m^2] dissipation=2 [s/m] static_friction=0.8 dynamic_friction=0.8
                viscous_friction=0.5 transition_velocity=0.2 [m/s] hertz_smoothing=300 hunt_crossley_smoothing=50
            SmoothSphereHalfSpaceForce contactHeel_r: socket_sphere=/contactgeometryset/heel_r
            SmoothSphereHalfSpaceForce contactHeel_l: socket_sphere=/contactgeometryset/heel_l
            SmoothSphereHalfSpaceForce contactToe1_r: socket_sphere=/contactgeometryset/toe1_r
            SmoothSphereHalfSpaceForce contactToe1_l: socket_sphere=/contactgeometryset/toe1_l
            SmoothSphereHalfSpaceForce contactToe2_r: socket_sphere=/contactgeometryset/toe2_r
            SmoothSphereHalfSpaceForce contactToe2_l: socket_sphere=/contactgeometryset/toe2_l
            CoordinateActuator lumbarAct: coordinate=lumbar_extension optimal_force=10
            CoordinateActuator tau_pelvis_tx: coordinate=pelvis_tx optimal_force=1
            CoordinateActuator tau_pelvis_ty: coordinate=pelvis_ty optimal_force=1
            CoordinateActuator tau_pelvis_tilt: coordinate=pelvis_tilt optimal_force=1
            CoordinateActuator tau_hip_flexion_l: coordinate=hip_flexion_l optimal_force=250
            CoordinateActuator tau_hip_flexion_r: coordinate=hip_flexion_r optimal_force=250
            CoordinateActuator tau_knee_angle_l: coordinate=knee_angle_l optimal_force=150
            CoordinateActuator tau_knee_angle_r: coordinate=knee_angle_r optimal_force=150
            CoordinateActuator tau_ankle_angle_l: coordinate=ankle_angle_l optimal_force=100
            CoordinateActuator tau_ankle_angle_r: coordinate=ankle_angle_r optimal_force=100
          ContactGeometrySet:
            ContactHalfSpace floor: socket_frame=/ground orientation=(0 0 -1.570796)
            ContactSphere heel_r: socket_frame=/bodyset/calcn_r location=(0.03 0.02 0) radius=0.05
            ContactSphere toe1_r: socket_frame=/bodyset/toes_r location=(0.02 -0.005 -0.026) radius=0.025
            ContactSphere toe2_r: socket_frame=/bodyset/toes_r location=(0.02 -0.005 0.026) radius=0.025
            ContactSphere heel_l: socket_frame=/bodyset/calcn_l location=(0.03 0.02 0) radius=0.05
            ContactSphere toe1_l: socket_frame=/bodyset/toes_l location=(0.02 -0.005 -0.026) radius=0.025
            ContactSphere toe2_l: socket_frame=/bodyset/toes_l location=(0.02 -0.005 0.026) radius=0.025
      MocoInitialBounds time_initial_bounds: bounds=0.344
      MocoFinalBounds time_final_bounds: bounds=0.868
      state_infos:
        MocoVariableInfo /jointset/ground_pelvis/pelvis_tilt/value: bounds=(-0.3490659 0.08726646)
        MocoVariableInfo /jointset/ground_pelvis/pelvis_tx/value: bounds=(-5 5)
        MocoVariableInfo /jointset/ground_pelvis/pelvis_ty/value: bounds=(0.75 1.25)
        MocoVariableInfo /jointset/hip_l/hip_flexion_l/value: bounds=(-0.6981317 1.396263)
        MocoVariableInfo /jointset/hip_r/hip_flexion_r/value: bounds=(-0.6981317 1.396263)
        MocoVariableInfo /jointset/knee_l/knee_angle_l/value: bounds=(-2.443461 0)
        MocoVariableInfo /jointset/knee_r/knee_angle_r/value: bounds=(-2.443461 0)
        MocoVariableInfo /jointset/ankle_l/ankle_angle_l/value: bounds=(-0.5235988 0.5235988)
        MocoVariableInfo /jointset/ankle_r/ankle_angle_r/value: bounds=(-0.5235988 0.5235988)
        MocoVariableInfo /jointset/back/lumbar_extension/value: bounds=(-30 0)
      goals:
        MocoStateTrackingGoal state_tracking: weight=10 allow_unused_references=true scale_weights_with_range=false
          TableProcessor reference
          MocoWeightSet state_weights:
            MocoWeight /jointset/ground_pelvis/pelvis_tilt/value: weight=25
            MocoWeight /jointset/ground_pelvis/pelvis_tx/value: weight=250
            MocoWeight /jointset/ground_pelvis/pelvis_ty/value: weight=100
            MocoWeight /jointset/hip_l/hip_flexion_l/value: weight=250
            MocoWeight /jointset/hip_r/hip_flexion_r/value: weight=250
            MocoWeight /jointset/knee_l/knee_angle_l/value: weight=500
            MocoWeight /jointset/knee_r/knee_angle_r/value: weight=500
            MocoWeight /jointset/ankle_l/ankle_angle_l/value: weight=50
            MocoWeight /jointset/ankle_r/ankle_angle_r/value: weight=50
            MocoWeight /jointset/back/lumbar_extension/value: weight=150
        MocoControlGoal control_effort: weight=0.01
          MocoWeightSet control_weights:
            MocoWeight /forceset/tau_pelvis_tx: weight=10
            MocoWeight /forceset/tau_pelvis_ty: weight=10
            MocoWeight /forceset/tau_pelvis_tilt: weight=10
        MocoContactTrackingGoal contact: weight=2.5 external_loads_file=refGRF_2D.xml projection=plane
            projection_vector=(0 0 1)
          contact_groups:
            MocoContactTrackingGoalGroup: contact_force_paths=(/forceset/contactHeel_r /forceset/contactToe1_r /forceset/contactToe2_r)
                external_force_name=RightGRF alternative_frame_paths=/bodyset/toes_r
            MocoContactTrackingGoalGroup: contact_force_paths=(/forceset/contactHeel_l /forceset/contactToe1_l /forceset/contactToe2_l)
                external_force_name=LeftGRF alternative_frame_paths=/bodyset/toes_l
  MocoCasADiSolver solver:
    num_mesh_intervals: 100
    verbosity: 2
    multibody_dynamics_mode: explicit
    optim_solver: ipopt
    optim_max_iterations: 2000
    optim_convergence_tolerance: 0.0001
    optim_constraint_tolerance: 0.0001
    optim_finite_difference_scheme: forward
