# OpenSim document version 20302
ForceSet gait2392_RRA:
  CoordinateActuator tau_pelvis_tx: coordinate=pelvis_tx optimal_force=1
  CoordinateActuator tau_pelvis_ty: coordinate=pelvis_ty optimal_force=1
  CoordinateActuator tau_pelvis_tilt: coordinate=pelvis_tilt optimal_force=1
  CoordinateActuator tau_hip_flexion_l: coordinate=hip_flexion_l optimal_force=250
  CoordinateActuator tau_hip_flexion_r: coordinate=hip_flexion_r optimal_force=250
  CoordinateActuator tau_knee_angle_l: coordinate=knee_angle_l optimal_force=150
  CoordinateActuator tau_knee_angle_r: coordinate=knee_angle_r optimal_force=150
  CoordinateActuator tau_ankle_angle_l: coordinate=ankle_angle_l optimal_force=100
  CoordinateActuator tau_ankle_angle_r: coordinate=ankle_angle_r optimal_force=100
