# OpenSim document version 40000
Model gaitModel2D:
  gravity: 0 -9.80665 0
  length_units: meters
  force_units: N
  credits:
    A planar reduced gait model with 9 degrees of freedom and 18 muscles by Ajay Seth. Adjusted by Carmichael Ong to follow muscle strengths of Handsfield/Rajagopal and changed hamstrings to follow semimembranosus. Ankle passive mechanics based on Weiss, Kearney, and Hunter 1986. Closely based on Delp S.L., Loan J.P., Hoy M.G., Zajac F.E., Topp E.L., Rosen J.M., Thelen D.G., Anderson F.C., Seth A. Notes: 3D, 23 DOF gait model created by D.G. Thelen, Univ. of Wisconsin-Madison, and Ajay Seth, Frank C. Anderson, and Scott L. Delp, Stanford University. Lower extremity joint defintions based on Delp et al. (1990). Low back joint and anthropometry based on Anderson and Pandy (1999, 2001). Planar knee model of Yamaguchi and Zajac (1989). Seth replaced tibia translation constraints with a CustomJoint for the knee and removed the patella to eliminate all kinematic constraints; insertions of the quadrucepts are handled with moving points in the tibia frame as defined by Delp 1990. Number of muscles was reduced by Anderson to improve simulation speed for demonstrations and is not intended to be used in research. License: Creative Commons (CCBY 3.0). You are free to distribute, remix, tweak, and build upon this work, even commercially, as long as you credit us for the original creation. http://creativecommons.org/licenses/by/3.0/ More Information: http://simtk-confluence.stanford.edu:8080/display/OpenSim/Gait+2392+and+2354+Models
  publications:
    Delp, S.L., Loan, J.P., Hoy, M.G., Zajac, F.E., Topp E.L., Rosen, J.M.: An interactive graphics-based model of the lower extremity to study orthopaedic surgical procedures, IEEE Transactions on Biomedical Engineering, vol. 37, pp. 757-767, 1990. Yamaguchi G.T., Zajac F.E.: A planar model of the knee joint to characterize the knee extensor mechanism." J . Biomech. vol. 22. pp. 1-10. 1989. Anderson F.C., Pandy M.G.: A dynamic optimization solution for vertical jumping in three dimensions. Computer Methods in Biomechanics and Biomedical Engineering 2:201-231, 1999. Anderson F.C., Pandy M.G.: Dynamic optimization of human walking. Journal of Biomechanical Engineering 123:381-390, 2001.
  Ground
  BodySet:
    Body femur_l: mass=7.773486 [kg] mass_center=(0 -0.2072535 0) inertia=(0.1813448 0.04364571 0.1813448 0 0 0)
        meshes=femur_l.vtp
    Body tibia_l: mass=3.09848 mass_center=(0 -0.204676 0) inertia=(0.05532868 0.004559588 0.05532868 0 0 0)
        meshes=(tibia_l.vtp l_fibula.vtp)
    Body talus_l: mass=0.08357329 mass_center=(0 0 0) inertia=(0.0008897808 0.0008444059 0.0008444059 0 0 0)
        meshes=l_talus.vtp
    Body calcn_l: mass=1.044666 mass_center=(0.09222889 0.03992767 0)
        inertia=(0.002282898 0.003652376 0.003652376 0 0 0) meshes=l_foot.vtp
    Body toes_l: mass=0.1810197 mass_center=(0.03191123 0.007985548 0.0232431)
        inertia=(0.0001630641 0.0001992318 0.0001992318 0 0 0) meshes=l_bofoot.vtp
    Body torso: mass=28.61265 mass_center=(-0.03032672 0.3098183 0) inertia=(1.372399 0.8480894 1.372399 0 0 0)
        meshes=(hat_spine.vtp hat_jaw.vtp hat_skull.vtp hat_ribs.vtp)
    Body pelvis: mass=10.88771 mass_center=(-0.06769001 0 0) inertia=(0.08075938 0.08075938 0.04175438 0 0 0)
        meshes=(r_pelvis.vtp l_pelvis.vtp sacrum.vtp)
      WrapCylinder Gmax1_at_pelvis_r: xyz_body_rotation=(-0.6 0.45 0) translation=(-0.07372179 -0.08065878 0.05712846)
          quadrant=-x radius=0.03604378 length=0.1366105
      WrapCylinder Gmax2_at_pelvis_r: xyz_body_rotation=(-0.75 0.39 0) translation=(-0.07659407 -0.06762302 0.06368418)
          quadrant=all radius=0.03640681 length=0.08933262
      WrapCylinder Gmax3_at_pelvis_r: xyz_body_rotation=(-0.1 0 0) translation=(-0.07946634 -0.07169669 0.06368418)
          quadrant=all radius=0.03546929 length=0.09353964
      WrapCylinder Gmax1_at_pelvis_l: xyz_body_rotation=(0.6 -0.45 0) translation=(-0.07372179 -0.08065878 -0.05712846)
          quadrant=-x radius=0.03604378 length=0.1366105
      WrapCylinder Gmax2_at_pelvis_l: xyz_body_rotation=(0.75 -0.39 0)
          translation=(-0.07659407 -0.06762302 -0.06368418) quadrant=all radius=0.03640681 length=0.08933262
      WrapCylinder Gmax3_at_pelvis_l: xyz_body_rotation=(0.1 0 0) translation=(-0.07946634 -0.07169669 -0.06368418)
          quadrant=all radius=0.03546929 length=0.09353964
      WrapCylinder PS_at_brim_r: xyz_body_rotation=(-0.25 -0.27 0.1) translation=(-0.07084951 -0.04888411 0.0614365)
          quadrant=-y radius=0.04446487 length=0.09315475
      WrapCylinder PS_at_brim_l: xyz_body_rotation=(0.25 0.27 0.1) translation=(-0.07084951 -0.04888411 -0.0614365)
          quadrant=-y radius=0.04446487 length=0.09315475
      WrapCylinder IL_at_brim_r: xyz_body_rotation=(-0.32 -0.24 0.9) translation=(-0.06797723 -0.05295778 0.07080182)
          quadrant=-y radius=0.04905952 length=0.09270461
      WrapCylinder IL_at_brim_l: xyz_body_rotation=(0.32 0.24 0.9) translation=(-0.06797723 -0.05295778 -0.07080182)
          quadrant=-y radius=0.04905952 length=0.09270461
    Body femur_r: mass=8.599045 mass_center=(0 -0.2012125 0) inertia=(0.1722692 0.04316135 0.1722692 0 0 0)
        meshes=r_femur.vtp
      WrapCylinder GasLat_at_condyles_r: translation=(0.005766509 -0.4852771 0) quadrant=all radius=0.03037976
          length=0.1153302
      WrapCylinder GasMed_at_condyles_r: translation=(0.005766509 -0.4852771 0) quadrant=all radius=0.02921131
          length=0.1153302
      WrapCylinder KnExt_at_fem_r: xyz_body_rotation=(-0.0623366 0.0507601 0)
          translation=(0.00413837 -0.4766747 0.002411681) quadrant=all radius=0.02920986 length=0.1153421
      WrapCylinder KnExtVL_at_fem_r: xyz_body_rotation=(-0.0623366 0.0507601 0)
          translation=(0.002177757 -0.4766747 0.002411681) quadrant=all radius=0.02920986 length=0.1153421
      WrapCylinder AB_at_femshaft_r: xyz_body_rotation=(1.66157 0.186644 0)
          translation=(0.01688826 -0.1332678 0.0269469) quadrant=all radius=0.01904021 length=0.08276343
      WrapCylinder AL_at_femshaft_r: xyz_body_rotation=(1.77711 0.136489 0)
          translation=(0.03544408 -0.2744881 0.01743066) quadrant=all radius=0.02319978 length=0.1181816
      WrapCylinder AMprox_at_femshaft_r: xyz_body_rotation=(1.61126 0.18656 0)
          translation=(0.005977552 -0.08627849 0.02929733) quadrant=all radius=0.02434632 length=0.08277682
      WrapCylinder AMmid_at_femshaft_r: xyz_body_rotation=(1.61139 0.13656 0)
          translation=(0.02654036 -0.190218 0.0237398) quadrant=all radius=0.02468728 length=0.14196
      WrapCylinder AMdist_at_femshaft_r: xyz_body_rotation=(1.71188 0.186636 0)
          translation=(0.03645184 -0.3086079 0.01080021) quadrant=all radius=0.02515988 length=0.2364001
      WrapCylinder AMisch_at_condyles_r: xyz_body_rotation=(1.71115 -0.463363 0)
          translation=(-0.02612356 -0.4460182 -0.003637941) quadrant=all radius=0.04626403 length=0.2825138
      WrapCylinder PECT_at_femshaft_r: xyz_body_rotation=(1.81295 0.276344 0)
          translation=(0.007018684 -0.1000179 0.03510709) quadrant=all radius=0.0173289 length=0.05898889
    Body tibia_r: mass=3.427544 mass_center=(0 -0.2086444 0) inertia=(0.05771395 0.004933931 0.05771395 0 0 0)
        meshes=(r_tibia.vtp r_fibula.vtp)
      WrapCylinder GasLat_at_shank_r: xyz_body_rotation=(2.96723 -0.279725 -1.47812)
          translation=(-0.007569937 -0.08269783 -0.003375783) quadrant=-y radius=0.05879874 length=0.1025712
      WrapCylinder GasMed_at_shank_r: xyz_body_rotation=(2.96723 0.0279725 -1.47812)
          translation=(-0.007569937 -0.08269783 -0.003375783) quadrant=-y radius=0.06306616 length=0.1025936
      WrapCylinder GR_at_condyles_r: xyz_body_rotation=(0 -0.4 0) translation=(-0.003068893 -0.02235076 0) quadrant=all
          radius=0.03852905 length=0.1022964
      WrapCylinder SM_at_condyles_r: xyz_body_rotation=(0 -0.1 0) translation=(-0.001022964 -0.02235076 0) quadrant=all
          radius=0.03692367 length=0.1022964
      WrapCylinder ST_at_condyles_r: xyz_body_rotation=(0 -0.2 0) translation=(-0.002045929 -0.02290953 0) quadrant=all
          radius=0.04548568 length=0.1022964
      WrapCylinder BF140_at_gastroc_r: translation=(-0.03989561 -0.06705229 0) quadrant=y radius=0.03103729
          length=0.1534447
    Body talus_r: mass=0.09244893 mass_center=(0 0 0) inertia=(0.001056878 0.001012158 0.001012158 0 0 0)
        meshes=r_talus.vtp
    Body calcn_r: mass=1.155612 mass_center=(0.09428541 0.04340007 0)
        inertia=(0.002701365 0.003980592 0.003980592 0 0 0) meshes=r_foot.vtp
    Body toes_r: mass=0.2002444 mass_center=(0.03262275 0.008680014 -0.02524772)
        inertia=(0.0001929546 0.0002197543 0.0002197543 0 0 0) meshes=r_bofoot.vtp
    Body patella_r: mass=0.07969098 mass_center=(0.002130485 0.03124711 0)
        inertia=(3.717027e-6 1.697917e-5 1.697917e-5 0 0 0) meshes=r_patella.vtp
  JointSet:
    PlanarJoint ground_pelvis: socket_parent_frame=ground_offset socket_child_frame=pelvis_offset
      Coordinate pelvis_tilt: range=(-1.570796 1.570796)
      Coordinate pelvis_tx: range=(-5 5)
      Coordinate pelvis_ty: range=(-3 3)
      PhysicalOffsetFrame ground_offset: socket_parent=/ground translation=(0 0 0) [meters]
      PhysicalOffsetFrame pelvis_offset: socket_parent=/bodyset/pelvis translation=(0 0 0)
    PinJoint hip_l: socket_parent_frame=pelvis_offset socket_child_frame=femur_l_offset
      Coordinate hip_flexion_l: range=(-2.094395 2.094395)
      PhysicalOffsetFrame pelvis_offset: socket_parent=/bodyset/pelvis
          translation=(-0.06537093 -0.05604358 -0.07710534)
      PhysicalOffsetFrame femur_l_offset: socket_parent=/bodyset/femur_l translation=(0 0 0)
    PinJoint hip_r: socket_parent_frame=pelvis_offset socket_child_frame=femur_r_offset
      Coordinate hip_flexion_r: range=(-2.094395 2.094395)
      PhysicalOffsetFrame pelvis_offset: socket_parent=/bodyset/pelvis translation=(-0.06537093 -0.05604358 0.07710534)
      PhysicalOffsetFrame femur_r_offset: socket_parent=/bodyset/femur_r translation=(0 0 0)
    PinJoint knee_l: socket_parent_frame=femur_l_offset socket_child_frame=tibia_l_offset
      Coordinate knee_angle_l: range=(-2.094395 0.1745329)
      PhysicalOffsetFrame femur_l_offset: socket_parent=/bodyset/femur_l translation=(-0.005224459 -0.4825592 0)
      PhysicalOffsetFrame tibia_l_offset: socket_parent=/bodyset/tibia_l translation=(0 0 0)
    PinJoint knee_r: socket_parent_frame=femur_r_offset socket_child_frame=tibia_r_offset
      Coordinate knee_angle_r: range=(-2.094395 0.1745329)
      PhysicalOffsetFrame femur_r_offset: socket_parent=/bodyset/femur_r translation=(-0.005203943 -0.4697805 0)
      PhysicalOffsetFrame tibia_r_offset: socket_parent=/bodyset/tibia_r translation=(0 0 0)
    PinJoint ankle_l: socket_parent_frame=tibia_l_offset socket_child_frame=talus_l_offset
      Coordinate ankle_angle_l: range=(-1.047198 1.047198)
      PhysicalOffsetFrame tibia_l_offset: socket_parent=/bodyset/tibia_l translation=(0 -0.4714012 0)
      PhysicalOffsetFrame talus_l_offset: socket_parent=/bodyset/talus_l translation=(0 0 0)
    PinJoint ankle_r: socket_parent_frame=tibia_r_offset socket_child_frame=talus_r_offset
      Coordinate ankle_angle_r: range=(-1.047198 1.047198)
      PhysicalOffsetFrame tibia_r_offset: socket_parent=/bodyset/tibia_r translation=(0 -0.4754036 0)
      PhysicalOffsetFrame talus_r_offset: socket_parent=/bodyset/talus_r translation=(0 0 0)
    WeldJoint subtalar_l: socket_parent_frame=talus_l_offset socket_child_frame=calcn_l_offset
      PhysicalOffsetFrame talus_l_offset: socket_parent=/bodyset/talus_l
          translation=(-0.04538994 -0.04347688 -0.007371096)
      PhysicalOffsetFrame calcn_l_offset: socket_parent=/bodyset/calcn_l translation=(0 0 0)
    WeldJoint subtalar_r: socket_parent_frame=talus_r_offset socket_child_frame=calcn_r_offset
      PhysicalOffsetFrame talus_r_offset: socket_parent=/bodyset/talus_r
          translation=(-0.04559566 -0.04384601 0.007404504)
      PhysicalOffsetFrame calcn_r_offset: socket_parent=/bodyset/calcn_r translation=(0 0 0)
    WeldJoint mtp_l: socket_parent_frame=calcn_l_offset socket_child_frame=toes_l_offset
      PhysicalOffsetFrame calcn_l_offset: socket_parent=/bodyset/calcn_l
          translation=(0.1649053 -0.002661848 -0.001434429)
      PhysicalOffsetFrame toes_l_offset: socket_parent=/bodyset/toes_l translation=(0 0 0)
    WeldJoint mtp_r: socket_parent_frame=calcn_r_offset socket_child_frame=toes_r_offset
      PhysicalOffsetFrame calcn_r_offset: socket_parent=/bodyset/calcn_r
          translation=(0.1643355 -0.002644292 0.001424027)
      PhysicalOffsetFrame toes_r_offset: socket_parent=/bodyset/toes_r translation=(0 0 0)
    PinJoint back: socket_parent_frame=pelvis_offset socket_child_frame=torso_offset
      Coordinate lumbar_extension: range=(-1.570796 1.570796)
      PhysicalOffsetFrame pelvis_offset: socket_parent=/bodyset/pelvis translation=(-0.09310965 0.06910063 0)
      PhysicalOffsetFrame torso_offset: socket_parent=/bodyset/torso translation=(0 0 0)
    CustomJoint patellofemoral_r: socket_parent_frame=femur_r_offset socket_child_frame=patella_r_offset
      Coordinate knee_angle_r_beta: default_value=4.877666e-5 range=(-99999.9 99999.9) clamped=false
      PhysicalOffsetFrame femur_r_offset: socket_parent=/bodyset/femur_r
          translation=(-0.009330212 -0.4828626 -0.00317158)
      PhysicalOffsetFrame patella_r_offset: socket_parent=/bodyset/patella_r translation=(0 0 0)
      SpatialTransform: axes_held_at_zero=(rotation2 rotation3)
        TransformAxis rotation1: coordinates=knee_angle_r_beta axis=(0 0 1)
          SimmSpline: x=(0 0.174533 0.349066 0.523599 0.698132 0.872665 1.0472 1.22173 1.39626 1.5708 1.74533 1.91986 2.0944)
              y=(0.00113686 -0.00629212 -0.105582 -0.253683 -0.414245 -0.579047 -0.747244 -0.91799 -1.09044 -1.26379 -1.43763 -1.61186 -1.78634)
        TransformAxis translation1: coordinates=knee_angle_r_beta axis=(1 0 0)
          MultiplierFunction: scale=1.153302
            SimmSpline: x=(0 0.174533 0.349066 0.523599 0.698132 0.872665 1.0472 1.22173 1.39626 1.5708 1.74533 1.91986 2.0944)
                y=(0.0524 0.0488 0.0437 0.0371 0.0296 0.0216 0.0136 0.0057 -0.0019 -0.0088 -0.0148 -0.0196 -0.0227)
        TransformAxis translation2: coordinates=knee_angle_r_beta axis=(0 1 0)
          MultiplierFunction: scale=1.183603
            SimmSpline: x=(0 0.174533 0.349066 0.523599 0.698132 0.872665 1.0472 1.22173 1.39626 1.5708 1.74533 1.91986 2.0944)
                y=(-0.0108 -0.019 -0.0263 -0.0322 -0.0367 -0.0395 -0.0408 -0.0404 -0.0384 -0.0349 -0.0301 -0.0245 -0.0187)
        TransformAxis translation3: axis=(0 0 1) MultiplierFunction(scale=1.153302, Constant(value=0.00275))
  ConstraintSet:
    CoordinateCouplerConstraint patellofemoral_knee_angle_r_con: independent_coordinate_names=knee_angle_r
        dependent_coordinate_name=knee_angle_r_beta scale_factor=1
        coupled_coordinates_function=LinearFunction(coefficients=-1 0)
  ForceSet:
    SmoothSphereHalfSpaceForce [values shared by the 6 below unless stated]: socket_half_space=/contactgeometryset/floor
        stiffness=3067776 [N/m^2] dissipation=2 [s/m] static_friction=0.5 dynamic_friction=0.5 viscous_friction=0.5
        hertz_smoothing=300 hunt_crossley_smoothing=50 transition_velocity=0.2 [m/s]
    SmoothSphereHalfSpaceForce contactHeel_r: socket_sphere=/contactgeometryset/heel_r transition_velocity=0.001
    SmoothSphereHalfSpaceForce contactMidfoot_r: socket_sphere=/contactgeometryset/midfoot_r
    SmoothSphereHalfSpaceForce contactToe_r: socket_sphere=/contactgeometryset/toe_r
    SmoothSphereHalfSpaceForce contactHeel_l: socket_sphere=/contactgeometryset/heel_l
    SmoothSphereHalfSpaceForce contactMidfoot_l: socket_sphere=/contactgeometryset/midfoot_l
    SmoothSphereHalfSpaceForce contactToe_l: socket_sphere=/contactgeometryset/toe_l
    CoordinateActuator hip_flexion_r_actuator: coordinate=hip_flexion_r optimal_force=1
    CoordinateActuator hip_flexion_l_actuator: coordinate=hip_flexion_l optimal_force=300
    CoordinateActuator knee_angle_r_actuator: coordinate=knee_angle_r optimal_force=1
    CoordinateActuator knee_angle_l_actuator: coordinate=knee_angle_l optimal_force=300
    CoordinateActuator ankle_angle_r_actuator: coordinate=ankle_angle_r optimal_force=1
    CoordinateActuator ankle_angle_l_actuator: coordinate=ankle_angle_l optimal_force=300
    CoordinateActuator lumbar_extension_actuator: coordinate=lumbar_extension optimal_force=300
    DeGrooteFregly2016Muscle [values shared by the 40 below unless stated]: min_control=0.01 max_control=1
        max_contraction_velocity=30 activation_time_constant=0.01 deactivation_time_constant=0.04
        default_activation=0.01 active_force_width_scale=3 fiber_damping=0.01
        passive_fiber_strain_at_one_norm_force=0.7 tendon_strain_at_one_norm_force=0.049
        ignore_passive_fiber_force=true
    DeGrooteFregly2016Muscle addbrev_r: max_isometric_force=1877.459 optimal_fiber_length=0.1167386
        tendon_slack_length=0.04013984 pennation_angle_at_optimal=0.1147809 [radians] ignore_tendon_compliance=true
      PathPoint P1: pelvis (-0.01828683 -0.0765851 0.01442259)
      PathPoint P2: femur_r (-0.002306604 -0.1396651 0.02871722)
      PathWrap: wrap_object=AB_at_femshaft_r method=hybrid
    DeGrooteFregly2016Muscle addlong_r: max_isometric_force=2750.4 optimal_fiber_length=0.1271581
        tendon_slack_length=0.1548923 pennation_angle_at_optimal=0.1377704 ignore_tendon_compliance=true
      PathPoint P1: pelvis (-0.007257288 -0.07242995 0.01768173)
      PathPoint P2: femur_r (0.01298618 -0.283319 0.01825677)
      PathWrap: wrap_object=AL_at_femshaft_r method=hybrid
    DeGrooteFregly2016Muscle addmagDist_r: max_isometric_force=1791.885 optimal_fiber_length=0.2215533
        tendon_slack_length=0.1092521 pennation_angle_at_optimal=0.194705 ignore_tendon_compliance=true
      PathPoint P1: pelvis (-0.07088781 -0.1040172 0.03729271)
      PathPoint P2: femur_r (0.01297465 -0.3106957 0.02225873)
      PathWrap: wrap_object=AMdist_at_femshaft_r method=hybrid
    DeGrooteFregly2016Muscle addmagIsch_r: max_isometric_force=1791.885 optimal_fiber_length=0.1932258
        tendon_slack_length=0.2676252 pennation_angle_at_optimal=0.1680443 ignore_tendon_compliance=true
      PathPoint P1: pelvis (-0.0858045 -0.10572 0.03906275)
      PathPoint P2: femur_r (0.005547382 -0.4592024 -0.03774757)
      PathWrap: wrap_object=AMisch_at_condyles_r method=hybrid
    DeGrooteFregly2016Muscle addmagMid_r: max_isometric_force=1791.885 optimal_fiber_length=0.1698425
        tendon_slack_length=0.05751173 pennation_angle_at_optimal=0.2073076 ignore_tendon_compliance=true
      PathPoint P1: pelvis (-0.05041804 -0.09837927 0.02672863)
      PathPoint P2: femur_r (0.00279099 -0.1922171 0.03369948)
      PathWrap: wrap_object=AMmid_at_femshaft_r method=hybrid
    DeGrooteFregly2016Muscle addmagProx_r: max_isometric_force=1791.885 optimal_fiber_length=0.1158485
        tendon_slack_length=0.04423758 pennation_angle_at_optimal=0.3114833 ignore_tendon_compliance=true
      PathPoint P1: pelvis (-0.02966105 -0.08762476 0.01278366)
      PathPoint P2: femur_r (-0.01761092 -0.09333892 0.03692873)
      PathWrap: wrap_object=AMprox_at_femshaft_r method=hybrid
    DeGrooteFregly2016Muscle bflh140_r: max_isometric_force=3939.551 optimal_fiber_length=0.1177957
        tendon_slack_length=0.4013021 pennation_angle_at_optimal=0.1759182 ignore_tendon_compliance=true
      PathPoint bflh_r-P1: pelvis (-0.09957229 -0.09703495 0.05488078)
      PathPoint bflh_r-P2: tibia_r (-0.03514906 -0.04076779 0.03701085)
      PathPoint bflh_r-P3: tibia_r (-0.02766096 -0.05596631 0.03555824)
    DeGrooteFregly2016Muscle bfsh140_r: max_isometric_force=1671.344 optimal_fiber_length=0.1293532
        tendon_slack_length=0.1240961 pennation_angle_at_optimal=0.2642232 ignore_tendon_compliance=true
      PathPoint bfsh_r-P1: femur_r (0.005766509 -0.2498585 0.02698726)
      PathPoint bfsh_r-P2: tibia_r (-0.02931816 -0.03669995 0.03277578)
      PathWrap: wrap_object=BF140_at_gastroc_r method=hybrid
    DeGrooteFregly2016Muscle edl_r: max_isometric_force=1810.494 optimal_fiber_length=0.07288281
        tendon_slack_length=0.3879461 pennation_angle_at_optimal=0.2182582 ignore_tendon_compliance=true
      PathPoint P1: tibia_r (-0.01636743 -0.1292992 0.02097077)
      PathPoint P2: tibia_r (0.01677662 -0.4201944 0.0114572)
      PathPoint P3: calcn_r (0.08664829 0.05208009 0.001154181)
      PathPoint P4: calcn_r (0.1523652 0.00795668 0.01875545)
      PathPoint P5: toes_r (0.0002828562 0.006799345 0.02207372)
      PathPoint P6: toes_r (0.04176844 -0.0005786676 0.03606817)
    DeGrooteFregly2016Muscle ehl_r: max_isometric_force=857.6026 optimal_fiber_length=0.07833139
        tendon_slack_length=0.3422236 pennation_angle_at_optimal=0.1972681 ignore_tendon_compliance=true
      PathPoint P1: tibia_r (-0.0143215 -0.1732184 0.01933403)
      PathPoint P2: tibia_r (0.007263047 -0.3250919 0.01677662)
      PathPoint P3: tibia_r (0.02045929 -0.4127069 -0.0028643)
      PathPoint P4: calcn_r (0.09145685 0.05627543 -0.03044154)
      PathPoint P5: calcn_r (0.121911 0.04470207 -0.03707808)
      PathPoint P6: calcn_r (0.1634909 0.0201087 -0.04039635)
      PathPoint P7: toes_r (0.02809705 0.005931343 -0.03534681)
      PathPoint P8: toes_r (0.05308269 0.004918675 -0.02683472)
    DeGrooteFregly2016Muscle fdl_r: max_isometric_force=1269.531 optimal_fiber_length=0.04743297
        tendon_slack_length=0.4028323 pennation_angle_at_optimal=0.2248391 ignore_tendon_compliance=true
      PathPoint P1: tibia_r (-0.002352818 -0.204733 -0.001841336)
      PathPoint P2: tibia_r (-0.01800417 -0.4073427 -0.01268476)
      PathPoint P3: calcn_r (0.04110844 0.04557008 -0.04039635)
      PathPoint P4: calcn_r (0.06675407 0.02546138 -0.03794372)
      PathPoint P5: calcn_r (0.1563252 -0.01171802 0.01673563)
      PathPoint P6: toes_r (-0.001791423 -0.01128402 0.02120808)
      PathPoint P7: toes_r (0.02687134 -0.01027135 0.03101863)
      PathPoint P8: toes_r (0.04157987 -0.008680014 0.03491399)
    DeGrooteFregly2016Muscle fhl_r: max_isometric_force=2723.518 optimal_fiber_length=0.05430081
        tendon_slack_length=0.3651031 pennation_angle_at_optimal=0.2580255 ignore_tendon_compliance=true
      PathPoint P1: tibia_r (-0.0317119 -0.2417235 0.02045929)
      PathPoint P2: tibia_r (-0.02475574 -0.4102483 -0.00777453)
      PathPoint P3: calcn_r (0.03526274 0.03992807 -0.03476972)
      PathPoint P4: calcn_r (0.09786826 0.00983735 -0.03693381)
      PathPoint P5: calcn_r (0.1627366 -0.007667346 -0.03880935)
      PathPoint P6: toes_r (0.01461424 -0.009258682 -0.03823226)
      PathPoint P7: toes_r (0.0529884 -0.01475602 -0.02611336)
    DeGrooteFregly2016Muscle gaslat140_r: max_isometric_force=4725.177 optimal_fiber_length=0.07556275
        tendon_slack_length=0.409572 pennation_angle_at_optimal=0.2102268
      PathPoint gaslat_r-P1: femur_r (0.002306604 -0.4509527 0.02374649)
      PathPoint gaslat_r-P2: calcn_r (0.004148558 0.04484674 -0.007646452)
      PathWrap: wrap_object=GasLat_at_shank_r method=hybrid
      PathWrap pathwrap_0: wrap_object=GasLat_at_condyles_r method=hybrid
    DeGrooteFregly2016Muscle gasmed_r: max_isometric_force=9346.544 optimal_fiber_length=0.06452976
        tendon_slack_length=0.4232715 pennation_angle_at_optimal=0.1656816
      PathPoint P1: femur_r (0.006919811 -0.4556871 -0.02537264)
      PathPoint P2: calcn_r (0.004148558 0.04484674 -0.007646452)
      PathWrap: wrap_object=GasMed_at_shank_r method=hybrid
      PathWrap pathwrap_0: wrap_object=GasMed_at_condyles_r method=hybrid
    DeGrooteFregly2016Muscle glmax1_r: max_isometric_force=2951.351 optimal_fiber_length=0.1399727
        tendon_slack_length=0.08312665 pennation_angle_at_optimal=0.3540118 ignore_tendon_compliance=true
      PathPoint P1: pelvis (-0.1178591 0.02810836 0.05272676)
      PathPoint P2: pelvis (-0.1203484 -0.01971659 0.07295585)
      PathPoint P3: femur_r (-0.0512066 -0.03858545 0.03482972)
      PathPoint P4: femur_r (-0.03194646 -0.06699192 0.05420519)
      PathWrap: wrap_object=Gmax1_at_pelvis_r method=hybrid
    DeGrooteFregly2016Muscle glmax2_r: max_isometric_force=4218.138 optimal_fiber_length=0.1581835
        tendon_slack_length=0.1098217 pennation_angle_at_optimal=0.3673821 ignore_tendon_compliance=true
      PathPoint P1: pelvis (-0.126093 0.007088196 0.04326778)
      PathPoint P2: pelvis (-0.128678 -0.04961737 0.07614006)
      PathPoint P3: femur_r (-0.05189858 -0.0691224 0.02906321)
      PathPoint P4: femur_r (-0.01799151 -0.120254 0.04832335)
      PathWrap: wrap_object=Gmax2_at_pelvis_r method=hybrid
    DeGrooteFregly2016Muscle glmax3_r: max_isometric_force=2843.262 optimal_fiber_length=0.1786317
        tendon_slack_length=0.110174 pennation_angle_at_optimal=0.3824161 ignore_tendon_compliance=true
      PathPoint P1: pelvis (-0.1244654 -0.04277359 0.008428789)
      PathPoint P2: pelvis (-0.1218803 -0.102901 0.04073915)
      PathPoint P3: femur_r (-0.03240778 -0.1331553 0.01084104)
      PathPoint P4: femur_r (-0.006919811 -0.1679532 0.04740071)
      PathWrap: wrap_object=Gmax3_at_pelvis_r method=hybrid
    DeGrooteFregly2016Muscle glmed1_r: max_isometric_force=3280.4 optimal_fiber_length=0.06521408
        tendon_slack_length=0.04986361 pennation_angle_at_optimal=0.3165559 ignore_tendon_compliance=true
      PathPoint P1: pelvis (-0.04260545 0.01996101 0.1097616)
      PathPoint P2: femur_r (-0.02514198 -0.01384815 0.06400825)
    DeGrooteFregly2016Muscle glmed2_r: max_isometric_force=2295.275 optimal_fiber_length=0.06610069
        tendon_slack_length=0.05908208 pennation_angle_at_optimal=0.3165559 ignore_tendon_compliance=true
      PathPoint P1: pelvis (-0.0813812 0.02574563 0.06321592)
      PathPoint P2: femur_r (-0.02975519 -0.006864896 0.06077901)
    DeGrooteFregly2016Muscle glmed3_r: max_isometric_force=2613.598 optimal_fiber_length=0.06981736
        tendon_slack_length=0.04326079 pennation_angle_at_optimal=0.3165559 ignore_tendon_compliance=true
      PathPoint P1: pelvis (-0.1102955 -0.005947566 0.04926159)
      PathPoint P2: femur_r (-0.03563703 -0.005562933 0.05974104)
    DeGrooteFregly2016Muscle glmin1_r: max_isometric_force=1122.138 optimal_fiber_length=0.06465036
        tendon_slack_length=0.01534285 pennation_angle_at_optimal=0.1745329 ignore_tendon_compliance=true
      PathPoint P1: pelvis (-0.04442456 -0.01213955 0.09758664)
      PathPoint P2: femur_r (-0.008303773 -0.01230947 0.0645849)
    DeGrooteFregly2016Muscle glmin2_r: max_isometric_force=1184.459 optimal_fiber_length=0.05364833
        tendon_slack_length=0.02500304 pennation_angle_at_optimal=0 ignore_tendon_compliance=true
      PathPoint P1: pelvis (-0.05897743 -0.01156924 0.09093726)
      PathPoint P2: femur_r (-0.0110717 -0.01230947 0.0645849)
    DeGrooteFregly2016Muscle glmin3_r: max_isometric_force=1340.321 optimal_fiber_length=0.03699215
        tendon_slack_length=0.04952324 pennation_angle_at_optimal=0.01745329 ignore_tendon_compliance=true
      PathPoint P1: pelvis (-0.0755409 -0.01262839 0.07473526)
      PathPoint P2: femur_r (-0.01556958 -0.009823903 0.0634316)
    DeGrooteFregly2016Muscle grac_r: max_isometric_force=843.9344 optimal_fiber_length=0.2755725
        tendon_slack_length=0.2080872 pennation_angle_at_optimal=0.1720016 ignore_tendon_compliance=true
      PathPoint P1: pelvis (-0.04534369 -0.1053615 0.02300123)
      PathPoint P2: tibia_r (-0.018843 -0.05313894 -0.03028998)
      PathPoint P3: tibia_r (0.001820877 -0.07780301 -0.01609123)
      PathWrap: wrap_object=GR_at_condyles_r method=hybrid
    DeGrooteFregly2016Muscle iliacus_r: max_isometric_force=3063.423 optimal_fiber_length=0.1015017
        tendon_slack_length=0.09152362 pennation_angle_at_optimal=0.279914 ignore_tendon_compliance=true
      PathPoint P1: pelvis (-0.05792426 0.02517532 0.07894965)
      PathPoint P2: pelvis (-0.01292525 -0.04538075 0.07080182)
      PathPoint P3: femur_r (-0.002652594 -0.06687356 0.0160309)
      PathPoint P4: femur_r (-0.01407028 -0.0753955 0.02260472)
      PathWrap: wrap_object=IL_at_brim_r method=hybrid range=(2 3)
    DeGrooteFregly2016Muscle perbrev_r: max_isometric_force=1563.605 optimal_fiber_length=0.04966373
        tendon_slack_length=0.1613825 pennation_angle_at_optimal=0.2052361 ignore_tendon_compliance=true
      PathPoint P1: tibia_r (-0.02485804 -0.2829607 0.02567641)
      PathPoint P2: tibia_r (-0.03467849 -0.4350576 0.02547181)
      PathPoint P3: tibia_r (-0.02915449 -0.4474623 0.02608559)
      PathPoint P4: calcn_r (0.04440843 0.03906006 0.03361554)
      PathPoint P5: calcn_r (0.06383122 0.03168205 0.04948553)
    DeGrooteFregly2016Muscle perlong_r: max_isometric_force=3346.114 optimal_fiber_length=0.05691539
        tendon_slack_length=0.3722141 pennation_angle_at_optimal=0.2479525 ignore_tendon_compliance=true
      PathPoint P1: tibia_r (-0.02045929 -0.153438 0.0288476)
      PathPoint P2: tibia_r (-0.03242797 -0.4358399 0.02424426)
      PathPoint P3: tibia_r (-0.02782463 -0.4485798 0.02455115)
      PathPoint P4: calcn_r (0.04129701 0.03327339 0.03188426)
      PathPoint P5: calcn_r (0.06420836 0.01533469 0.04097344)
      PathPoint P6: calcn_r (0.08033117 0.009982017 0.01702418)
      PathPoint P7: calcn_r (0.1134253 0.01229669 -0.02654617)
    DeGrooteFregly2016Muscle piri_r: max_isometric_force=3089.361 optimal_fiber_length=0.02478203
        tendon_slack_length=0.1095235 pennation_angle_at_optimal=0.1745329 ignore_tendon_compliance=true
      PathPoint P1: pelvis (-0.09747552 -0.00532022 0.01265255)
      PathPoint P2: pelvis (-0.09767658 -0.02497978 0.05705353)
      PathPoint P3: femur_r (-0.01706887 -0.00426097 0.05039929)
    DeGrooteFregly2016Muscle psoas_r: max_isometric_force=4280.37 optimal_fiber_length=0.1083336
        tendon_slack_length=0.09224863 pennation_angle_at_optimal=0.2155251 ignore_tendon_compliance=true
      PathPoint P1: pelvis (-0.05802001 0.05051358 0.03652475)
      PathPoint P2: pelvis (-0.01962723 -0.05328368 0.0614365)
      PathPoint P3: femur_r (-0.01522358 -0.05527425 0.005305189)
      PathPoint P4: femur_r (-0.02710259 -0.06202079 0.01014906)
      PathWrap: wrap_object=PS_at_brim_r method=hybrid range=(2 3)
    DeGrooteFregly2016Muscle recfem_r: max_isometric_force=6575.223 optimal_fiber_length=0.08736237
        tendon_slack_length=0.5184191 pennation_angle_at_optimal=0.2170149 ignore_tendon_compliance=true
      PathPoint P1: pelvis (-0.02297822 -0.03161172 0.08737844)
      PathPoint P2: patella_r (0.01183603 0.05799654 0.000828522)
      PathPoint P3: patella_r (0.01432159 0.05172344 -0.001183603)
      PathPoint P4: patella_r (0.005918014 0.002923499 3.550808e-5)
      PathPoint P5: tibia_r (0.03334864 -0.07053901 -0.0004807933)
      PathWrap: wrap_object=KnExt_at_fem_r method=hybrid
    DeGrooteFregly2016Muscle sart_r: max_isometric_force=748.2393 optimal_fiber_length=0.452467
        tendon_slack_length=0.1392204 pennation_angle_at_optimal=0.02613542 ignore_tendon_compliance=true
      PathPoint P1: pelvis (-0.0186698 -0.01270987 0.09889779)
      PathPoint P2: femur_r (-0.003459906 -0.4223095 -0.04855401)
      PathPoint P3: tibia_r (-0.02567641 -0.04481328 -0.0373382)
      PathPoint P4: tibia_r (-0.01626513 -0.06694054 -0.02700626)
      PathPoint P5: tibia_r (0.01391232 -0.09052059 -0.002659707)
    DeGrooteFregly2016Muscle semimem_r: max_isometric_force=6602.961 optimal_fiber_length=0.103678
        tendon_slack_length=0.4038621 pennation_angle_at_optimal=0.2545615 ignore_tendon_compliance=true
      PathPoint P1: pelvis (-0.09449793 -0.0928798 0.05750307)
      PathPoint P2: tibia_r (-0.02762004 -0.04581907 -0.0200501)
      PathWrap: wrap_object=SM_at_condyles_r method=hybrid
    DeGrooteFregly2016Muscle semiten_r: max_isometric_force=1773.885 optimal_fiber_length=0.2321821
        tendon_slack_length=0.2973843 pennation_angle_at_optimal=0.241295 ignore_tendon_compliance=true
      PathPoint P1: pelvis (-0.0993808 -0.1020863 0.0482314)
      PathPoint P2: tibia_r (-0.03191649 -0.05677094 -0.02342588)
      PathPoint P3: tibia_r (0.001943632 -0.0863857 -0.01196868)
      PathWrap: wrap_object=ST_at_condyles_r method=hybrid
    DeGrooteFregly2016Muscle soleus_r: max_isometric_force=18584.53 optimal_fiber_length=0.0477223
        tendon_slack_length=0.3051516 pennation_angle_at_optimal=0.3814289
      PathPoint P1: tibia_r (-0.00777453 -0.1023665 0.01002505)
      PathPoint P2: calcn_r (0.004148558 0.04484674 -0.007646452)
    DeGrooteFregly2016Muscle tfl_r: max_isometric_force=1233.62 optimal_fiber_length=0.1058169
        tendon_slack_length=0.5006779 pennation_angle_at_optimal=0.05235988 ignore_tendon_compliance=true
      PathPoint P1: pelvis (-0.02977594 0.01743533 0.1162236)
      PathPoint P2: femur_r (0.03390707 -0.1177685 0.06885212)
      PathPoint P3: femur_r (0.01234033 -0.4793591 0.03736698)
      PathPoint P4: tibia_r (0.01104802 -0.04581907 0.03539457)
    DeGrooteFregly2016Muscle tibant_r: max_isometric_force=3682.357 optimal_fiber_length=0.07444102
        tendon_slack_length=0.2620815 pennation_angle_at_optimal=0.1951828 ignore_tendon_compliance=true
      PathPoint P1: tibia_r (0.01575365 -0.146621 0.01657202)
      PathPoint P2: tibia_r (0.02567641 -0.2130028 0.01309394)
      PathPoint P3: tibia_r (0.02383507 -0.4089072 -0.01350313)
      PathPoint P4: calcn_r (0.1099368 0.02575071 -0.04400317)
    DeGrooteFregly2016Muscle tibpost_r: max_isometric_force=5190.462 optimal_fiber_length=0.04099849
        tendon_slack_length=0.3045381 pennation_angle_at_optimal=0.2264891 ignore_tendon_compliance=true
      PathPoint P1: tibia_r (-0.004194154 -0.145727 0.01053653)
      PathPoint P2: tibia_r (-0.01677662 -0.4084602 -0.01790188)
      PathPoint P3: calcn_r (0.03931702 0.04831875 -0.04126199)
      PathPoint P4: calcn_r (0.07278834 0.02300204 -0.04054063)
    DeGrooteFregly2016Muscle vasint_r: max_isometric_force=5092.082 optimal_fiber_length=0.1374201
        tendon_slack_length=0.2407788 pennation_angle_at_optimal=0.06309973 ignore_tendon_compliance=true
      PathPoint P1: femur_r (0.03344575 -0.2277252 0.03575236)
      PathPoint P2: femur_r (0.03863561 -0.2466628 0.0328691)
      PathPoint P3: patella_r (0.006864896 0.05681293 -0.0007101617)
      PathPoint P4: patella_r (0.005918014 0.002923499 -0.0004616051)
      PathPoint P5: tibia_r (0.03331795 -0.07062841 0.0004398747)
      PathWrap: wrap_object=KnExt_at_fem_r method=hybrid
    DeGrooteFregly2016Muscle vaslat140_r: max_isometric_force=15446.3 optimal_fiber_length=0.1373459
        tendon_slack_length=0.2594311 pennation_angle_at_optimal=0.2528673 ignore_tendon_compliance=true
      PathPoint vaslat_r-P1: femur_r (0.005535849 -0.21944 0.04025023)
      PathPoint vaslat_r-P2: femur_r (0.03102382 -0.3066715 0.04717005)
      PathPoint vaslat_r-P3: patella_r (0.01219111 0.0500664 0.0166888)
      PathPoint vaslat_r-P4: patella_r (0.005918014 0.002923499 0.008675808)
      PathPoint vaslat_r-P5: tibia_r (0.03328726 -0.07082957 0.005227348)
      PathWrap: wrap_object=KnExtVL_at_fem_r method=hybrid
    DeGrooteFregly2016Muscle vasmed_r: max_isometric_force=8243.469 optimal_fiber_length=0.1291115
        tendon_slack_length=0.2441382 pennation_angle_at_optimal=0.4222225 ignore_tendon_compliance=true
      PathPoint P1: femur_r (0.01614623 -0.2484382 0.02168207)
      PathPoint P2: femur_r (0.04105755 -0.3277396 0.001037972)
      PathPoint P3: patella_r (0.007456698 0.05267032 -0.02012125)
      PathPoint P4: patella_r (0.005918014 0.002923499 -0.01006062)
      PathPoint P5: tibia_r (0.03263256 -0.0710419 -0.006935699)
      PathWrap: wrap_object=KnExt_at_fem_r method=hybrid
  ContactGeometrySet:
    ContactHalfSpace floor: socket_frame=/ground orientation=(0 0 -1.570796)
    ContactSphere heel_r: socket_frame=/bodyset/calcn_r location=(0.03166356 0.01723335 0) radius=0.035
    ContactSphere midfoot_r: socket_frame=/bodyset/calcn_r location=(0.1307371 0.00723335 0) radius=0.025
    ContactSphere toe_r: socket_frame=/bodyset/calcn_r location=(0.2111907 0.00723335 0) radius=0.025
    ContactSphere heel_l: socket_frame=/bodyset/calcn_l location=(0.03130753 0.0105 0) radius=0.035
    ContactSphere midfoot_l: socket_frame=/bodyset/calcn_l location=(0.1311895 0.00723335 0) radius=0.025
    ContactSphere toe_l: socket_frame=/bodyset/calcn_l location=(0.2119215 0.00723335 0) radius=0.025
