# OpenSim document version 40000
Model gaitModel2D:
  gravity: 0 -9.80665 0
  length_units: meters
  force_units: N
  credits:
    A planar reduced gait model with 9 degrees of freedom and 18 muscles by Ajay Seth. Adjusted by Carmichael Ong to follow muscle strengths of Handsfield/Rajagopal and changed hamstrings to follow semimembranosus. Ankle passive mechanics based on Weiss, Kearney, and Hunter 1986. Closely based on Delp S.L., Loan J.P., Hoy M.G., Zajac F.E., Topp E.L., Rosen J.M., Thelen D.G., Anderson F.C., Seth A. Notes: 3D, 23 DOF gait model created by D.G. Thelen, Univ. of Wisconsin-Madison, and Ajay Seth, Frank C. Anderson, and Scott L. Delp, Stanford University. Lower extremity joint defintions based on Delp et al. (1990). Low back joint and anthropometry based on Anderson and Pandy (1999, 2001). Planar knee model of Yamaguchi and Zajac (1989). Seth replaced tibia translation constraints with a CustomJoint for the knee and removed the patella to eliminate all kinematic constraints; insertions of the quadrucepts are handled with moving points in the tibia frame as defined by Delp 1990. Number of muscles was reduced by Anderson to improve simulation speed for demonstrations and is not intended to be used in research. License: Creative Commons (CCBY 3.0). You are free to distribute, remix, tweak, and build upon this work, even commercially, as long as you credit us for the original creation. http://creativecommons.org/licenses/by/3.0/ More Information: http://simtk-confluence.stanford.edu:8080/display/OpenSim/Gait+2392+and+2354+Models
  publications:
    Delp, S.L., Loan, J.P., Hoy, M.G., Zajac, F.E., Topp E.L., Rosen, J.M.: An interactive graphics-based model of the lower extremity to study orthopaedic surgical procedures, IEEE Transactions on Biomedical Engineering, vol. 37, pp. 757-767, 1990. Yamaguchi G.T., Zajac F.E.: A planar model of the knee joint to characterize the knee extensor mechanism." J . Biomech. vol. 22. pp. 1-10. 1989. Anderson F.C., Pandy M.G.: A dynamic optimization solution for vertical jumping in three dimensions. Computer Methods in Biomechanics and Biomedical Engineering 2:201-231, 1999. Anderson F.C., Pandy M.G.: Dynamic optimization of human walking. Journal of Biomechanical Engineering 123:381-390, 2001.
  Bhargava2004SmoothedMuscleMetabolics metabolicCost: use_smoothing=true
    muscle_parameters:
      Bhargava2004SmoothedMuscleMetabolics_MuscleParameters hamstrings_r: socket_muscle=/forceset/hamstrings_r
          use_provided_muscle_mass=false
      Bhargava2004SmoothedMuscleMetabolics_MuscleParameters bifemsh_r: socket_muscle=/forceset/bifemsh_r
          use_provided_muscle_mass=false
      Bhargava2004SmoothedMuscleMetabolics_MuscleParameters glut_max_r: socket_muscle=/forceset/glut_max_r
          use_provided_muscle_mass=false
      Bhargava2004SmoothedMuscleMetabolics_MuscleParameters iliopsoas_r: socket_muscle=/forceset/iliopsoas_r
          use_provided_muscle_mass=false
      Bhargava2004SmoothedMuscleMetabolics_MuscleParameters rect_fem_r: socket_muscle=/forceset/rect_fem_r
          use_provided_muscle_mass=false
      Bhargava2004SmoothedMuscleMetabolics_MuscleParameters vasti_r: socket_muscle=/forceset/vasti_r
          use_provided_muscle_mass=false
      Bhargava2004SmoothedMuscleMetabolics_MuscleParameters gastroc_r: socket_muscle=/forceset/gastroc_r
          use_provided_muscle_mass=false
      Bhargava2004SmoothedMuscleMetabolics_MuscleParameters soleus_r: socket_muscle=/forceset/soleus_r
          use_provided_muscle_mass=false
      Bhargava2004SmoothedMuscleMetabolics_MuscleParameters tib_ant_r: socket_muscle=/forceset/tib_ant_r
          use_provided_muscle_mass=false
      Bhargava2004SmoothedMuscleMetabolics_MuscleParameters hamstrings_l: socket_muscle=/forceset/hamstrings_l
          use_provided_muscle_mass=false
      Bhargava2004SmoothedMuscleMetabolics_MuscleParameters bifemsh_l: socket_muscle=/forceset/bifemsh_l
          use_provided_muscle_mass=false
      Bhargava2004SmoothedMuscleMetabolics_MuscleParameters glut_max_l: socket_muscle=/forceset/glut_max_l
          use_provided_muscle_mass=false
      Bhargava2004SmoothedMuscleMetabolics_MuscleParameters iliopsoas_l: socket_muscle=/forceset/iliopsoas_l
          use_provided_muscle_mass=false
      Bhargava2004SmoothedMuscleMetabolics_MuscleParameters rect_fem_l: socket_muscle=/forceset/rect_fem_l
          use_provided_muscle_mass=false
      Bhargava2004SmoothedMuscleMetabolics_MuscleParameters vasti_l: socket_muscle=/forceset/vasti_l
          use_provided_muscle_mass=false
      Bhargava2004SmoothedMuscleMetabolics_MuscleParameters gastroc_l: socket_muscle=/forceset/gastroc_l
          use_provided_muscle_mass=false
      Bhargava2004SmoothedMuscleMetabolics_MuscleParameters soleus_l: socket_muscle=/forceset/soleus_l
          use_provided_muscle_mass=false
      Bhargava2004SmoothedMuscleMetabolics_MuscleParameters tib_ant_l: socket_muscle=/forceset/tib_ant_l
          use_provided_muscle_mass=false
  Ground
  BodySet:
    Body pelvis: mass=9.842426 [kg] mass_center=(-0.06537093 0 0) inertia=(0.07902504 0.07902504 0.04187145 0 0 0)
        meshes=(r_pelvis.vtp l_pelvis.vtp sacrum.vtp)
    Body femur_l: mass=7.773486 mass_center=(0 -0.2072535 0) inertia=(0.1813448 0.04364571 0.1813448 0 0 0)
        meshes=femur_l.vtp
    Body femur_r: mass=7.773486 mass_center=(0 -0.2017652 0) inertia=(0.172837 0.04330359 0.172837 0 0 0)
        meshes=femur_r.vtp
    Body tibia_l: mass=3.09848 mass_center=(0 -0.204676 0) inertia=(0.05532868 0.004559588 0.05532868 0 0 0)
        meshes=(tibia_l.vtp l_fibula.vtp)
    Body tibia_r: mass=3.09848 mass_center=(0 -0.2064137 0) inertia=(0.05625403 0.004601012 0.05625403 0 0 0)
        meshes=(tibia_r.vtp r_fibula.vtp)
    Body talus_l: mass=0.08357329 mass_center=(0 0 0) inertia=(0.0008897808 0.0008444059 0.0008444059 0 0 0)
        meshes=l_talus.vtp
    Body talus_r: mass=0.08357329 mass_center=(0 0 0) inertia=(0.0009014024 0.0008538463 0.0008538463 0 0 0)
        meshes=r_talus.vtp
    Body calcn_l: mass=1.044666 mass_center=(0.09222889 0.03992767 0)
        inertia=(0.002282898 0.003652376 0.003652376 0 0 0) meshes=l_foot.vtp
    Body calcn_r: mass=1.044666 mass_center=(0.09191019 0.03966434 0)
        inertia=(0.002251395 0.003619301 0.003619301 0 0 0) meshes=r_foot.vtp
    Body toes_l: mass=0.1810197 mass_center=(0.03191123 0.007985548 0.0232431)
        inertia=(0.0001630641 0.0001992318 0.0001992318 0 0 0) meshes=l_bofoot.vtp
    Body toes_r: mass=0.1810197 mass_center=(0.03180096 0.007932882 -0.02307454)
        inertia=(0.0001608139 0.0001972946 0.0001972946 0 0 0) meshes=r_bofoot.vtp
    Body torso: mass=28.61265 mass_center=(-0.03032672 0.3098183 0) inertia=(1.372399 0.8480894 1.372399 0 0 0)
        meshes=(hat_spine.vtp hat_jaw.vtp hat_skull.vtp hat_ribs.vtp)
  JointSet:
    PlanarJoint ground_pelvis: socket_parent_frame=ground_offset socket_child_frame=pelvis_offset
      Coordinate pelvis_tilt: range=(-1.570796 1.570796)
      Coordinate pelvis_tx: range=(-5 5)
      Coordinate pelvis_ty: range=(-3 3)
      PhysicalOffsetFrame ground_offset: socket_parent=/ground translation=(0 0 0) [meters]
      PhysicalOffsetFrame pelvis_offset: socket_parent=/bodyset/pelvis translation=(0 0 0)
    PinJoint hip_l: socket_parent_frame=pelvis_offset socket_child_frame=femur_l_offset
      Coordinate hip_flexion_l: range=(-2.094395 2.094395)
      PhysicalOffsetFrame pelvis_offset: socket_parent=/bodyset/pelvis
          translation=(-0.06537093 -0.05604358 -0.07710534)
      PhysicalOffsetFrame femur_l_offset: socket_parent=/bodyset/femur_l translation=(0 0 0)
    PinJoint hip_r: socket_parent_frame=pelvis_offset socket_child_frame=femur_r_offset
      Coordinate hip_flexion_r: range=(-2.094395 2.094395)
      PhysicalOffsetFrame pelvis_offset: socket_parent=/bodyset/pelvis translation=(-0.06537093 -0.05604358 0.07710534)
      PhysicalOffsetFrame femur_r_offset: socket_parent=/bodyset/femur_r translation=(0 0 0)
    PinJoint knee_l: socket_parent_frame=femur_l_offset socket_child_frame=tibia_l_offset
      Coordinate knee_angle_l: range=(-2.094395 0.1745329)
      PhysicalOffsetFrame femur_l_offset: socket_parent=/bodyset/femur_l translation=(-0.005224459 -0.4825592 0)
      PhysicalOffsetFrame tibia_l_offset: socket_parent=/bodyset/tibia_l translation=(0 0 0)
    PinJoint knee_r: socket_parent_frame=femur_r_offset socket_child_frame=tibia_r_offset
      Coordinate knee_angle_r: range=(-2.094395 0.1745329)
      PhysicalOffsetFrame femur_r_offset: socket_parent=/bodyset/femur_r translation=(-0.005203943 -0.4697805 0)
      PhysicalOffsetFrame tibia_r_offset: socket_parent=/bodyset/tibia_r translation=(0 0 0)
    PinJoint ankle_l: socket_parent_frame=tibia_l_offset socket_child_frame=talus_l_offset
      Coordinate ankle_angle_l: range=(-1.047198 1.047198)
      PhysicalOffsetFrame tibia_l_offset: socket_parent=/bodyset/tibia_l translation=(0 -0.4714012 0)
      PhysicalOffsetFrame talus_l_offset: socket_parent=/bodyset/talus_l translation=(0 0 0)
    PinJoint ankle_r: socket_parent_frame=tibia_r_offset socket_child_frame=talus_r_offset
      Coordinate ankle_angle_r: range=(-1.047198 1.047198)
      PhysicalOffsetFrame tibia_r_offset: socket_parent=/bodyset/tibia_r translation=(0 -0.4754036 0)
      PhysicalOffsetFrame talus_r_offset: socket_parent=/bodyset/talus_r translation=(0 0 0)
    WeldJoint subtalar_l: socket_parent_frame=talus_l_offset socket_child_frame=calcn_l_offset
      PhysicalOffsetFrame talus_l_offset: socket_parent=/bodyset/talus_l
          translation=(-0.04538994 -0.04347688 -0.007371096)
      PhysicalOffsetFrame calcn_l_offset: socket_parent=/bodyset/calcn_l translation=(0 0 0)
    WeldJoint subtalar_r: socket_parent_frame=talus_r_offset socket_child_frame=calcn_r_offset
      PhysicalOffsetFrame talus_r_offset: socket_parent=/bodyset/talus_r
          translation=(-0.04559566 -0.04384601 0.007404504)
      PhysicalOffsetFrame calcn_r_offset: socket_parent=/bodyset/calcn_r translation=(0 0 0)
    WeldJoint mtp_l: socket_parent_frame=calcn_l_offset socket_child_frame=toes_l_offset
      PhysicalOffsetFrame calcn_l_offset: socket_parent=/bodyset/calcn_l
          translation=(0.1649053 -0.002661848 -0.001434429)
      PhysicalOffsetFrame toes_l_offset: socket_parent=/bodyset/toes_l translation=(0 0 0)
    WeldJoint mtp_r: socket_parent_frame=calcn_r_offset socket_child_frame=toes_r_offset
      PhysicalOffsetFrame calcn_r_offset: socket_parent=/bodyset/calcn_r
          translation=(0.1643355 -0.002644292 0.001424027)
      PhysicalOffsetFrame toes_r_offset: socket_parent=/bodyset/toes_r translation=(0 0 0)
    PinJoint back: socket_parent_frame=pelvis_offset socket_child_frame=torso_offset
      Coordinate lumbar_extension: range=(-1.570796 1.570796)
      PhysicalOffsetFrame pelvis_offset: socket_parent=/bodyset/pelvis translation=(-0.09310965 0.06910063 0)
      PhysicalOffsetFrame torso_offset: socket_parent=/bodyset/torso translation=(0 0 0)
  ConstraintSet:
    RollingOnSurfaceConstraint toes_ground_l: socket_rolling_body=/bodyset/toes_l socket_surface_body=/ground
        surface_normal=(0 1 0) surface_height=0 friction_coefficient=0.5 contact_radius=0.025
    RollingOnSurfaceConstraint calcn_ground_l: socket_rolling_body=/bodyset/calcn_l socket_surface_body=/ground
        surface_normal=(0 1 0) surface_height=0 friction_coefficient=0.5 contact_radius=0.025
    RollingOnSurfaceConstraint toes_ground_r: socket_rolling_body=/bodyset/toes_r socket_surface_body=/ground
        surface_normal=(0 1 0) surface_height=0 friction_coefficient=0.5 contact_radius=0.025
    RollingOnSurfaceConstraint calcn_ground_r: socket_rolling_body=/bodyset/calcn_r socket_surface_body=/ground
        surface_normal=(0 1 0) surface_height=0 friction_coefficient=0.5 contact_radius=0.025
  ForceSet:
    SmoothSphereHalfSpaceForce [values shared by the 6 below unless stated]: socket_half_space=/contactgeometryset/floor
        stiffness=3067776 [N/m^2] dissipation=2 [s/m] static_friction=0.5 dynamic_friction=0.5 viscous_friction=0.5
        hertz_smoothing=300 hunt_crossley_smoothing=50 transition_velocity=0.2 [m/s]
    SmoothSphereHalfSpaceForce contactHeel_r: socket_sphere=/contactgeometryset/heel_r transition_velocity=0.001
    SmoothSphereHalfSpaceForce contactMidfoot_r: socket_sphere=/contactgeometryset/midfoot_r
    SmoothSphereHalfSpaceForce contactToe_r: socket_sphere=/contactgeometryset/toe_r
    SmoothSphereHalfSpaceForce contactHeel_l: socket_sphere=/contactgeometryset/heel_l
    SmoothSphereHalfSpaceForce contactMidfoot_l: socket_sphere=/contactgeometryset/midfoot_l
    SmoothSphereHalfSpaceForce contactToe_l: socket_sphere=/contactgeometryset/toe_l
    CoordinateActuator lumbarAct: coordinate=lumbar_extension optimal_force=300
    DeGrooteFregly2016Muscle [values shared by the 18 below unless stated]: min_control=0.01 max_control=1
        max_contraction_velocity=50 activation_time_constant=0.01 deactivation_time_constant=0.04
        default_activation=0.01 active_force_width_scale=3 fiber_damping=0.01 tendon_strain_at_one_norm_force=0.049
        ignore_passive_fiber_force=true
    DeGrooteFregly2016Muscle hamstrings_r: max_isometric_force=9367.844 optimal_fiber_length=0.069
        tendon_slack_length=0.349 pennation_angle_at_optimal=0.2617994 [radians] ignore_tendon_compliance=true
      PathPoint bifemlh_r-P1: pelvis (-0.1164661 -0.08696503 0.0641221)
      PathPoint bifemlh_r-P2: tibia_r (-0.02976683 -0.03980128 0.02910426)
      PathPoint bifemlh_r-P3: tibia_r (-0.02314099 -0.06224469 0.03392037)
    DeGrooteFregly2016Muscle bifemsh_r: max_isometric_force=1271.223 optimal_fiber_length=0.11
        tendon_slack_length=0.117 pennation_angle_at_optimal=0.4014257 ignore_tendon_compliance=true
      PathPoint P1: femur_r (0.005782344 -0.2505439 0.02706131)
      PathPoint P2: tibia_r (-0.02976683 -0.03980128 0.02910426)
      PathPoint P3: tibia_r (-0.02314099 -0.06224469 0.03392037)
    DeGrooteFregly2016Muscle glut_max_r: max_isometric_force=7615.692 optimal_fiber_length=0.157
        tendon_slack_length=0.048 pennation_angle_at_optimal=0 ignore_tendon_compliance=true
      PathPoint P1: pelvis (-0.1217731 0.00737639 0.04266185)
      PathPoint P2: pelvis (-0.1242691 -0.05163475 0.07507382)
      PathPoint P3: femur_r (-0.05204102 -0.06931213 0.02914302)
      PathPoint P4: femur_r (-0.01804087 -0.1205843 0.04845598)
    DeGrooteFregly2016Muscle iliopsoas_r: max_isometric_force=6154.795 optimal_fiber_length=0.117
        tendon_slack_length=0.13 pennation_angle_at_optimal=0.1396263 ignore_tendon_compliance=true
      PathPoint psoas_r-P1: pelvis (-0.05982322 0.07520522 0.02668676)
      PathPoint psoas_r-P2: pelvis (-0.02200605 -0.04832808 0.07008734)
      ConditionalPathPoint psoas_r-P3: pelvis (-0.02662917 -0.06825273 0.07535084)
          socket_coordinate=/jointset/hip_r/hip_flexion_r range=(-1.5708 0.785398) [radians]
      PathPoint psoas_r-P4: femur_r (0.001850346 -0.06017342 0.004394576)
      PathPoint psoas_r-P5: femur_r (-0.02174159 -0.07085508 0.01202721)
    DeGrooteFregly2016Muscle rect_fem_r: max_isometric_force=5001.111 optimal_fiber_length=0.076
        tendon_slack_length=0.346 pennation_angle_at_optimal=0.08726646 ignore_tendon_compliance=true
      PathPoint P1: pelvis (-0.02727639 -0.02636846 0.08938674)
      ConditionalPathPoint P2: femur_r (0.03862604 -0.478301 0.002197294)
          socket_coordinate=/jointset/knee_r/knee_angle_r range=(-2.61799 -1.45997)
      MovingPathPoint P3: tibia_r socket_x_coordinate=/jointset/knee_r/knee_angle_r
          socket_y_coordinate=/jointset/knee_r/knee_angle_r socket_z_coordinate=/jointset/knee_r/knee_angle_r
        x_location: MultiplierFunction: scale=0.9889326
          SimmSpline: x=(-2.0944 -1.99997 -1.5708 -1.45752 -1.39626 -1.0472 -0.698132 -0.526391 -0.349066 -0.174533 0 0.00017453 0.00034907 0.0279253 0.0872665 0.174533 2.0944)
              y=(0.0155805 0.0179938 0.0275081 0.0296564 0.0307615 0.0365695 0.0422074 0.0450902 0.048391 0.0534299 0.0617576 0.0617669 0.0617762 0.0633083 0.066994 0.0733035 0.0573481)
        y_location: MultiplierFunction: scale=1.10559
          SimmSpline: x=(-2.0944 -1.99997 -1.5708 -1.45752 -1.39626 -1.0472 -0.698132 -0.526391 -0.349066 -0.174533 0 0.00017453 0.00034907 0.0279253 0.0872665 0.174533 2.0944)
              y=(0.0234116 0.0237613 0.0251141 0.0252795 0.0253146 0.0249184 0.0242373 0.0238447 0.0234197 0.0227644 0.020984 0.0209814 0.0209788 0.0205225 0.0191754 0.0159554 -0.0673774)
        z_location: MultiplierFunction: scale=0.9889326
          SimmSpline: x=(-2.0944 0.1745) y=(0.0014 0.0014)
    DeGrooteFregly2016Muscle vasti_r: max_isometric_force=21891.46 optimal_fiber_length=0.099 tendon_slack_length=0.102
        pennation_angle_at_optimal=0.05235988 ignore_tendon_compliance=true
      PathPoint vas_int_r-P1: femur_r (0.03353756 -0.2283501 0.0358505)
      PathPoint vas_int_r-P2: femur_r (0.03874172 -0.2473398 0.03295929)
      ConditionalPathPoint vas_int_r-P3: femur_r (0.03966689 -0.478301 0.006360575)
          socket_coordinate=/jointset/knee_r/knee_angle_r range=(-2.61799 -1.42)
      MovingPathPoint vas_int_r-P4: tibia_r socket_x_coordinate=/jointset/knee_r/knee_angle_r
          socket_y_coordinate=/jointset/knee_r/knee_angle_r socket_z_coordinate=/jointset/knee_r/knee_angle_r
        x_location: MultiplierFunction: scale=0.9889326
          SimmSpline: x=(-2.0944 -1.99997 -1.5708 -1.45752 -1.39626 -1.0472 -0.698132 -0.526391 -0.349066 -0.174533 0 0.00017453 0.00034907 0.0279253 0.0872665 0.174533 2.0944)
              y=(0.0082733 0.0106866 0.0202042 0.022353 0.0234583 0.0292715 0.0349465 0.037871 0.0412569 0.0465287 0.0554632 0.0554735 0.0554837 0.0571717 0.061272 0.0684368 0.0648818)
        y_location: MultiplierFunction: scale=1.10559
          SimmSpline: x=(-2.0944 -1.99997 -1.5708 -1.45752 -1.39626 -1.0472 -0.698132 -0.526391 -0.349066 -0.174533 0 0.00017453 0.00034907 0.0279253 0.0872665 0.174533 2.0944)
              y=(0.025599 0.0259487 0.0273124 0.0274796 0.0275151 0.0271363 0.0265737 0.0263073 0.0261187 0.0260129 0.0252923 0.0252911 0.0252898 0.0250526 0.0242191 0.0218288 -0.0685706)
        z_location: MultiplierFunction: scale=0.9889326
          SimmSpline: x=(-2.0944 2.0944) y=(0.0018 0.0018)
    DeGrooteFregly2016Muscle gastroc_r: max_isometric_force=10702.94 optimal_fiber_length=0.051
        tendon_slack_length=0.384 pennation_angle_at_optimal=0.296706 tendon_strain_at_one_norm_force=0.1
      PathPoint med_gas_r-P1: femur_r (-0.02197294 -0.4663146 -0.02717698)
      ConditionalPathPoint med_gas_r-P2: femur_r (-0.03469409 -0.4773517 -0.02983684)
          socket_coordinate=/jointset/knee_r/knee_angle_r range=(-0.785398 0.174533)
      PathPoint med_gas_r-P3: calcn_r (0 0.04098659 -0.00698828)
    DeGrooteFregly2016Muscle soleus_r: max_isometric_force=18083.24 optimal_fiber_length=0.044
        tendon_slack_length=0.244 pennation_angle_at_optimal=0.4363323 tendon_strain_at_one_norm_force=0.1
      PathPoint P1: tibia_r (-0.002373441 -0.1694869 0.007021423)
      PathPoint P2: calcn_r (0 0.04098659 -0.00698828)
    DeGrooteFregly2016Muscle tib_ant_r: max_isometric_force=4830.152 optimal_fiber_length=0.068
        tendon_slack_length=0.238 pennation_angle_at_optimal=0.08726646 ignore_tendon_compliance=true
      PathPoint P1: tibia_r (0.01770189 -0.1795474 0.0113727)
      PathPoint P2: tibia_r (0.03253589 -0.4368187 -0.01750415)
      PathPoint P3: calcn_r (0.1071677 0.02353427 -0.04021558)
    DeGrooteFregly2016Muscle hamstrings_l: max_isometric_force=9367.844 optimal_fiber_length=0.069
        tendon_slack_length=0.349 pennation_angle_at_optimal=0.2617994 ignore_tendon_compliance=true
      PathPoint bifemlh_l-P1: pelvis (-0.1164661 -0.08696503 -0.0641221)
      PathPoint bifemlh_l-P2: tibia_l (-0.02963253 -0.0394662 -0.02897294)
      PathPoint bifemlh_l-P3: tibia_l (-0.02303658 -0.06172065 -0.03376733)
    DeGrooteFregly2016Muscle bifemsh_l: max_isometric_force=1271.223 optimal_fiber_length=0.11
        tendon_slack_length=0.117 pennation_angle_at_optimal=0.4014257 ignore_tendon_compliance=true
      PathPoint P1: femur_l (0.005805141 -0.257359 -0.02716799)
      PathPoint P2: tibia_l (-0.02963253 -0.0394662 -0.02897294)
      PathPoint P3: tibia_l (-0.02303658 -0.06172065 -0.03376733)
    DeGrooteFregly2016Muscle glut_max_l: max_isometric_force=7615.692 optimal_fiber_length=0.157
        tendon_slack_length=0.048 pennation_angle_at_optimal=0 ignore_tendon_compliance=true
      PathPoint P1: pelvis (-0.1217731 0.00737639 -0.04266185)
      PathPoint P2: pelvis (-0.1242691 -0.05163475 -0.07507382)
      PathPoint P3: femur_l (-0.05224619 -0.07119752 -0.02925791)
      PathPoint P4: femur_l (-0.018112 -0.1238643 -0.04864701)
    DeGrooteFregly2016Muscle iliopsoas_l: max_isometric_force=6154.795 optimal_fiber_length=0.117
        tendon_slack_length=0.13 pennation_angle_at_optimal=0.1396263 ignore_tendon_compliance=true
      PathPoint psoas_l-P1: pelvis (-0.05982322 0.07520522 -0.02668676)
      PathPoint psoas_l-P2: pelvis (-0.02200605 -0.04832808 -0.07008734)
      ConditionalPathPoint psoas_l-P3: pelvis (-0.02662917 -0.06825273 -0.07535084)
          socket_coordinate=/jointset/hip_l/hip_flexion_l range=(-1.5708 0.785398)
      PathPoint psoas_l-P4: femur_l (0.001857641 -0.06181022 -0.004411901)
      PathPoint psoas_l-P5: femur_l (-0.0218273 -0.07278244 -0.01207463)
    DeGrooteFregly2016Muscle rect_fem_l: max_isometric_force=5001.111 optimal_fiber_length=0.076
        tendon_slack_length=0.346 pennation_angle_at_optimal=0.08726646 ignore_tendon_compliance=true
      PathPoint P1: pelvis (-0.02727639 -0.02636846 -0.08938674)
      ConditionalPathPoint P2: femur_l (0.03877832 -0.4913115 -0.002205956)
          socket_coordinate=/jointset/knee_l/knee_angle_l range=(-2.61799 -1.45997)
      MovingPathPoint P3: tibia_l socket_x_coordinate=/jointset/knee_l/knee_angle_l
          socket_y_coordinate=/jointset/knee_l/knee_angle_l socket_z_coordinate=/jointset/knee_l/knee_angle_l
        x_location: MultiplierFunction: scale=0.9844707
          SimmSpline: x=(-2.0944 -1.99997 -1.5708 -1.45752 -1.39626 -1.0472 -0.698132 -0.526391 -0.349066 -0.174533 0 0.00017453 0.00034907 0.0279253 0.0872665 0.174533 2.0944)
              y=(0.0155805 0.0179938 0.0275081 0.0296564 0.0307615 0.0365695 0.0422074 0.0450902 0.048391 0.0534299 0.0617576 0.0617669 0.0617762 0.0633083 0.066994 0.0733035 0.0573481)
        y_location: MultiplierFunction: scale=1.096282
          SimmSpline: x=(-2.0944 -1.99997 -1.5708 -1.45752 -1.39626 -1.0472 -0.698132 -0.526391 -0.349066 -0.174533 0 0.00017453 0.00034907 0.0279253 0.0872665 0.174533 2.0944)
              y=(0.0234116 0.0237613 0.0251141 0.0252795 0.0253146 0.0249184 0.0242373 0.0238447 0.0234197 0.0227644 0.020984 0.0209814 0.0209788 0.0205225 0.0191754 0.0159554 -0.0673774)
        z_location: MultiplierFunction: scale=0.9844707
          SimmSpline: x=(-2.0944 0.1745) y=(-0.0014 -0.0014)
    DeGrooteFregly2016Muscle vasti_l: max_isometric_force=21891.46 optimal_fiber_length=0.099 tendon_slack_length=0.102
        pennation_angle_at_optimal=0.05235988 ignore_tendon_compliance=true
      PathPoint vas_int_l-P1: femur_l (0.03366978 -0.2345616 -0.03599184)
      PathPoint vas_int_l-P2: femur_l (0.03889445 -0.2540678 -0.03308923)
      ConditionalPathPoint vas_int_l-P3: femur_l (0.03982328 -0.4913115 -0.006385651)
          socket_coordinate=/jointset/knee_l/knee_angle_l range=(-2.61799 -1.42)
      MovingPathPoint vas_int_l-P4: tibia_l socket_x_coordinate=/jointset/knee_l/knee_angle_l
          socket_y_coordinate=/jointset/knee_l/knee_angle_l socket_z_coordinate=/jointset/knee_l/knee_angle_l
        x_location: MultiplierFunction: scale=0.9844707
          SimmSpline: x=(-2.0944 -1.99997 -1.5708 -1.45752 -1.39626 -1.0472 -0.698132 -0.526391 -0.349066 -0.174533 0 0.00017453 0.00034907 0.0279253 0.0872665 0.174533 2.0944)
              y=(0.0082733 0.0106866 0.0202042 0.022353 0.0234583 0.0292715 0.0349465 0.037871 0.0412569 0.0465287 0.0554632 0.0554735 0.0554837 0.0571717 0.061272 0.0684368 0.0648818)
        y_location: MultiplierFunction: scale=1.096282
          SimmSpline: x=(-2.0944 -1.99997 -1.5708 -1.45752 -1.39626 -1.0472 -0.698132 -0.526391 -0.349066 -0.174533 0 0.00017453 0.00034907 0.0279253 0.0872665 0.174533 2.0944)
              y=(0.025599 0.0259487 0.0273124 0.0274796 0.0275151 0.0271363 0.0265737 0.0263073 0.0261187 0.0260129 0.0252923 0.0252911 0.0252898 0.0250526 0.0242191 0.0218288 -0.0685706)
        z_location: MultiplierFunction: scale=0.9844707
          SimmSpline: x=(-2.0944 2.0944) y=(-0.0018 -0.0018)
    DeGrooteFregly2016Muscle gastroc_l: max_isometric_force=10702.94 optimal_fiber_length=0.051
        tendon_slack_length=0.384 pennation_angle_at_optimal=0.296706 tendon_strain_at_one_norm_force=0.1
      PathPoint med_gas_l-P1: femur_l (-0.02205956 -0.4789991 0.02728413)
      ConditionalPathPoint med_gas_l-P2: femur_l (-0.03483087 -0.4903364 0.02995447)
          socket_coordinate=/jointset/knee_l/knee_angle_l range=(-0.785398 0.174533)
      PathPoint med_gas_l-P3: calcn_l (0 0.0412587 0.00703933)
    DeGrooteFregly2016Muscle soleus_l: max_isometric_force=18083.24 optimal_fiber_length=0.044
        tendon_slack_length=0.244 pennation_angle_at_optimal=0.4363323 tendon_strain_at_one_norm_force=0.1
      PathPoint P1: tibia_l (-0.002362733 -0.16806 -0.006989744)
      PathPoint P2: calcn_l (0 0.0412587 0.00703933)
    DeGrooteFregly2016Muscle tib_ant_l: max_isometric_force=4830.152 optimal_fiber_length=0.068
        tendon_slack_length=0.238 pennation_angle_at_optimal=0.08726646 ignore_tendon_compliance=true
      PathPoint P1: tibia_l (0.01762202 -0.1780358 -0.01132139)
      PathPoint P2: tibia_l (0.0323891 -0.4331411 0.01742517)
      PathPoint P3: calcn_l (0.1075394 0.02369051 0.04050936)
  ContactGeometrySet:
    ContactHalfSpace floor: socket_frame=/ground orientation=(0 0 -1.570796)
    ContactSphere heel_r: socket_frame=/bodyset/calcn_r location=(0.03166356 0.01723335 0) radius=0.035
    ContactSphere midfoot_r: socket_frame=/bodyset/calcn_r location=(0.1307371 0.00723335 0) radius=0.025
    ContactSphere toe_r: socket_frame=/bodyset/calcn_r location=(0.2111907 0.00723335 0) radius=0.025
    ContactSphere heel_l: socket_frame=/bodyset/calcn_l location=(0.03130753 0.0105 0) radius=0.035
    ContactSphere midfoot_l: socket_frame=/bodyset/calcn_l location=(0.1311895 0.00723335 0) radius=0.025
    ContactSphere toe_l: socket_frame=/bodyset/calcn_l location=(0.2119215 0.00723335 0) radius=0.025
