# OpenSim document version 40000
Model gaitModel2D:
  gravity: 0 -9.80665 0
  length_units: meters
  force_units: N
  credits:
    A planar reduced gait model with 9 degrees of freedom and 18 muscles by Ajay Seth. Adjusted by Carmichael Ong to follow muscle strengths of Handsfield/Rajagopal and changed hamstrings to follow semimembranosus. Ankle passive mechanics based on Weiss, Kearney, and Hunter 1986. Closely based on Delp S.L., Loan J.P., Hoy M.G., Zajac F.E., Topp E.L., Rosen J.M., Thelen D.G., Anderson F.C., Seth A. Notes: 3D, 23 DOF gait model created by D.G. Thelen, Univ. of Wisconsin-Madison, and Ajay Seth, Frank C. Anderson, and Scott L. Delp, Stanford University. Lower extremity joint defintions based on Delp et al. (1990). Low back joint and anthropometry based on Anderson and Pandy (1999, 2001). Planar knee model of Yamaguchi and Zajac (1989). Seth replaced tibia translation constraints with a CustomJoint for the knee and removed the patella to eliminate all kinematic constraints; insertions of the quadrucepts are handled with moving points in the tibia frame as defined by Delp 1990. Number of muscles was reduced by Anderson to improve simulation speed for demonstrations and is not intended to be used in research. License: Creative Commons (CCBY 3.0). You are free to distribute, remix, tweak, and build upon this work, even commercially, as long as you credit us for the original creation. http://creativecommons.org/licenses/by/3.0/ More Information: http://simtk-confluence.stanford.edu:8080/display/OpenSim/Gait+2392+and+2354+Models
  publications:
    Delp, S.L., Loan, J.P., Hoy, M.G., Zajac, F.E., Topp E.L., Rosen, J.M.: An interactive graphics-based model of the lower extremity to study orthopaedic surgical procedures, IEEE Transactions on Biomedical Engineering, vol. 37, pp. 757-767, 1990. Yamaguchi G.T., Zajac F.E.: A planar model of the knee joint to characterize the knee extensor mechanism." J . Biomech. vol. 22. pp. 1-10. 1989. Anderson F.C., Pandy M.G.: A dynamic optimization solution for vertical jumping in three dimensions. Computer Methods in Biomechanics and Biomedical Engineering 2:201-231, 1999. Anderson F.C., Pandy M.G.: Dynamic optimization of human walking. Journal of Biomechanical Engineering 123:381-390, 2001.
  Ground
  BodySet:
    Body pelvis: mass=9.842426 [kg] mass_center=(-0.06537093 0 0) inertia=(0.07902504 0.07902504 0.04187145 0 0 0)
        meshes=(r_pelvis.vtp l_pelvis.vtp sacrum.vtp)
    Body femur_l: mass=7.773486 mass_center=(0 -0.2072535 0) inertia=(0.1813448 0.04364571 0.1813448 0 0 0)
        meshes=femur_l.vtp
    Body femur_r: mass=7.773486 mass_center=(0 -0.2017652 0) inertia=(0.172837 0.04330359 0.172837 0 0 0)
        meshes=femur_r.vtp
    Body tibia_l: mass=3.09848 mass_center=(0 -0.204676 0) inertia=(0.05532868 0.004559588 0.05532868 0 0 0)
        meshes=(tibia_l.vtp l_fibula.vtp)
    Body tibia_r: mass=3.09848 mass_center=(0 -0.2064137 0) inertia=(0.05625403 0.004601012 0.05625403 0 0 0)
        meshes=(tibia_r.vtp r_fibula.vtp)
    Body talus_l: mass=0.08357329 mass_center=(0 0 0) inertia=(0.0008897808 0.0008444059 0.0008444059 0 0 0)
        meshes=l_talus.vtp
    Body talus_r: mass=0.08357329 mass_center=(0 0 0) inertia=(0.0009014024 0.0008538463 0.0008538463 0 0 0)
        meshes=r_talus.vtp
    Body calcn_l: mass=1.044666 mass_center=(0.09222889 0.03992767 0)
        inertia=(0.002282898 0.003652376 0.003652376 0 0 0) meshes=l_foot.vtp
    Body calcn_r: mass=1.044666 mass_center=(0.09191019 0.03966434 0)
        inertia=(0.002251395 0.003619301 0.003619301 0 0 0) meshes=r_foot.vtp
    Body toes_l: mass=0.1810197 mass_center=(0.03191123 0.007985548 0.0232431)
        inertia=(0.0001630641 0.0001992318 0.0001992318 0 0 0) meshes=l_bofoot.vtp
    Body toes_r: mass=0.1810197 mass_center=(0.03180096 0.007932882 -0.02307454)
        inertia=(0.0001608139 0.0001972946 0.0001972946 0 0 0) meshes=r_bofoot.vtp
    Body torso: mass=28.61265 mass_center=(-0.03032672 0.3098183 0) inertia=(1.372399 0.8480894 1.372399 0 0 0)
        meshes=(hat_spine.vtp hat_jaw.vtp hat_skull.vtp hat_ribs.vtp)
  JointSet:
    PlanarJoint ground_pelvis: socket_parent_frame=ground_offset socket_child_frame=pelvis_offset
      Coordinate pelvis_tilt: range=(-1.570796 1.570796)
      Coordinate pelvis_tx: range=(-5 5)
      Coordinate pelvis_ty: range=(-3 3)
      PhysicalOffsetFrame ground_offset: socket_parent=/ground translation=(0 0 0) [meters]
      PhysicalOffsetFrame pelvis_offset: socket_parent=/bodyset/pelvis translation=(0 0 0)
    PinJoint hip_l: socket_parent_frame=pelvis_offset socket_child_frame=femur_l_offset
      Coordinate hip_flexion_l: range=(-2.094395 2.094395)
      PhysicalOffsetFrame pelvis_offset: socket_parent=/bodyset/pelvis
          translation=(-0.06537093 -0.05604358 -0.07710534)
      PhysicalOffsetFrame femur_l_offset: socket_parent=/bodyset/femur_l translation=(0 0 0)
    PinJoint hip_r: socket_parent_frame=pelvis_offset socket_child_frame=femur_r_offset
      Coordinate hip_flexion_r: range=(-2.094395 2.094395)
      PhysicalOffsetFrame pelvis_offset: socket_parent=/bodyset/pelvis translation=(-0.06537093 -0.05604358 0.07710534)
      PhysicalOffsetFrame femur_r_offset: socket_parent=/bodyset/femur_r translation=(0 0 0)
    PinJoint knee_l: socket_parent_frame=femur_l_offset socket_child_frame=tibia_l_offset
      Coordinate knee_angle_l: range=(-2.094395 0.1745329)
      PhysicalOffsetFrame femur_l_offset: socket_parent=/bodyset/femur_l translation=(-0.005224459 -0.4825592 0)
      PhysicalOffsetFrame tibia_l_offset: socket_parent=/bodyset/tibia_l translation=(0 0 0)
    PinJoint knee_r: socket_parent_frame=femur_r_offset socket_child_frame=tibia_r_offset
      Coordinate knee_angle_r: range=(-2.094395 0.1745329)
      PhysicalOffsetFrame femur_r_offset: socket_parent=/bodyset/femur_r translation=(-0.005203943 -0.4697805 0)
      PhysicalOffsetFrame tibia_r_offset: socket_parent=/bodyset/tibia_r translation=(0 0 0)
    PinJoint ankle_l: socket_parent_frame=tibia_l_offset socket_child_frame=talus_l_offset
      Coordinate ankle_angle_l: range=(-1.047198 1.047198)
      PhysicalOffsetFrame tibia_l_offset: socket_parent=/bodyset/tibia_l translation=(0 -0.4714012 0)
      PhysicalOffsetFrame talus_l_offset: socket_parent=/bodyset/talus_l translation=(0 0 0)
    PinJoint ankle_r: socket_parent_frame=tibia_r_offset socket_child_frame=talus_r_offset
      Coordinate ankle_angle_r: range=(-1.047198 1.047198)
      PhysicalOffsetFrame tibia_r_offset: socket_parent=/bodyset/tibia_r translation=(0 -0.4754036 0)
      PhysicalOffsetFrame talus_r_offset: socket_parent=/bodyset/talus_r translation=(0 0 0)
    WeldJoint subtalar_l: socket_parent_frame=talus_l_offset socket_child_frame=calcn_l_offset
      PhysicalOffsetFrame talus_l_offset: socket_parent=/bodyset/talus_l
          translation=(-0.04538994 -0.04347688 -0.007371096)
      PhysicalOffsetFrame calcn_l_offset: socket_parent=/bodyset/calcn_l translation=(0 0 0)
    WeldJoint subtalar_r: socket_parent_frame=talus_r_offset socket_child_frame=calcn_r_offset
      PhysicalOffsetFrame talus_r_offset: socket_parent=/bodyset/talus_r
          translation=(-0.04559566 -0.04384601 0.007404504)
      PhysicalOffsetFrame calcn_r_offset: socket_parent=/bodyset/calcn_r translation=(0 0 0)
    WeldJoint mtp_l: socket_parent_frame=calcn_l_offset socket_child_frame=toes_l_offset
      PhysicalOffsetFrame calcn_l_offset: socket_parent=/bodyset/calcn_l
          translation=(0.1649053 -0.002661848 -0.001434429)
      PhysicalOffsetFrame toes_l_offset: socket_parent=/bodyset/toes_l translation=(0 0 0)
    WeldJoint mtp_r: socket_parent_frame=calcn_r_offset socket_child_frame=toes_r_offset
      PhysicalOffsetFrame calcn_r_offset: socket_parent=/bodyset/calcn_r
          translation=(0.1643355 -0.002644292 0.001424027)
      PhysicalOffsetFrame toes_r_offset: socket_parent=/bodyset/toes_r translation=(0 0 0)
    PinJoint back: socket_parent_frame=pelvis_offset socket_child_frame=torso_offset
      Coordinate lumbar_extension: range=(-1.570796 1.570796)
      PhysicalOffsetFrame pelvis_offset: socket_parent=/bodyset/pelvis translation=(-0.09310965 0.06910063 0)
      PhysicalOffsetFrame torso_offset: socket_parent=/bodyset/torso translation=(0 0 0)
  ConstraintSet:
    RollingOnSurfaceConstraint toes_ground_l: socket_rolling_body=/bodyset/toes_l socket_surface_body=/ground
        surface_normal=(0 1 0) surface_height=0 friction_coefficient=0.5 contact_radius=0.025
    RollingOnSurfaceConstraint calcn_ground_l: socket_rolling_body=/bodyset/calcn_l socket_surface_body=/ground
        surface_normal=(0 1 0) surface_height=0 friction_coefficient=0.5 contact_radius=0.025
    RollingOnSurfaceConstraint toes_ground_r: socket_rolling_body=/bodyset/toes_r socket_surface_body=/ground
        surface_normal=(0 1 0) surface_height=0 friction_coefficient=0.5 contact_radius=0.025
    RollingOnSurfaceConstraint calcn_ground_r: socket_rolling_body=/bodyset/calcn_r socket_surface_body=/ground
        surface_normal=(0 1 0) surface_height=0 friction_coefficient=0.5 contact_radius=0.025
  ForceSet:
    SmoothSphereHalfSpaceForce [values shared by the 6 below unless stated]: socket_half_space=/contactgeometryset/floor
        stiffness=3067776 [N/m^2] dissipation=2 [s/m] static_friction=0.5 dynamic_friction=0.5 viscous_friction=0.5
        hertz_smoothing=300 hunt_crossley_smoothing=50 transition_velocity=0.2 [m/s]
    SmoothSphereHalfSpaceForce contactHeel_r: socket_sphere=/contactgeometryset/heel_r transition_velocity=0.001
    SmoothSphereHalfSpaceForce contactMidfoot_r: socket_sphere=/contactgeometryset/midfoot_r
    SmoothSphereHalfSpaceForce contactToe_r: socket_sphere=/contactgeometryset/toe_r
    SmoothSphereHalfSpaceForce contactHeel_l: socket_sphere=/contactgeometryset/heel_l
    SmoothSphereHalfSpaceForce contactMidfoot_l: socket_sphere=/contactgeometryset/midfoot_l
    SmoothSphereHalfSpaceForce contactToe_l: socket_sphere=/contactgeometryset/toe_l
    CoordinateActuator hip_flexion_r_actuator: coordinate=hip_flexion_r optimal_force=300
    CoordinateActuator hip_flexion_l_actuator: coordinate=hip_flexion_l optimal_force=300
    CoordinateActuator knee_angle_r_actuator: coordinate=knee_angle_r optimal_force=300
    CoordinateActuator ankle_angle_r_actuator: coordinate=ankle_angle_r optimal_force=300
    CoordinateActuator ankle_angle_l_actuator: coordinate=ankle_angle_l optimal_force=300
    CoordinateActuator lumbar_extension_actuator: coordinate=lumbar_extension optimal_force=300
  ContactGeometrySet:
    ContactHalfSpace floor: socket_frame=/ground orientation=(0 0 -1.570796)
    ContactSphere heel_r: socket_frame=/bodyset/calcn_r location=(0.03166356 0.01723335 0) radius=0.035
    ContactSphere midfoot_r: socket_frame=/bodyset/calcn_r location=(0.1307371 0.00723335 0) radius=0.025
    ContactSphere toe_r: socket_frame=/bodyset/calcn_r location=(0.2111907 0.00723335 0) radius=0.025
    ContactSphere heel_l: socket_frame=/bodyset/calcn_l location=(0.03130753 0.0105 0) radius=0.035
    ContactSphere midfoot_l: socket_frame=/bodyset/calcn_l location=(0.1311895 0.00723335 0) radius=0.025
    ContactSphere toe_l: socket_frame=/bodyset/calcn_l location=(0.2119215 0.00723335 0) radius=0.025
