# OpenSim document version 40000
Model scaledModel:
  gravity: 0 -9.80665 0
  length_units: meters
  force_units: N
  credits:
    Rajagopal Model w/ torso, updated knee, modified for movements involving high hip and knee flexion
  publications:
    Lai,A.K.M., Arnold, A.S., Wakeling, J.M. (2017) Why are antagonist muscles co-activated in my simulation? A musculoskeletal model for analysing human locomotor tasks. Annals of Biomedical Engineering
  Ground
  BodySet:
    Body pelvis: mass=10.18423 [kg] mass_center=(-0.06769001 0 0) inertia=(0.09506996 0.08055052 0.05354622 0 0 0)
        meshes=(r_pelvis.vtp l_pelvis.vtp sacrum.vtp)
      WrapCylinder Gmax1_at_pelvis_r: xyz_body_rotation=(-0.6 0.45 0) translation=(-0.07372179 -0.08065878 0.05712846)
          quadrant=-x radius=0.03604378 length=0.1366105
      WrapCylinder Gmax2_at_pelvis_r: xyz_body_rotation=(-0.75 0.39 0) translation=(-0.07659407 -0.06762302 0.06368418)
          quadrant=all radius=0.03640681 length=0.08933262
      WrapCylinder Gmax3_at_pelvis_r: xyz_body_rotation=(-0.1 0 0) translation=(-0.07946634 -0.07169669 0.06368418)
          quadrant=all radius=0.03546929 length=0.09353964
      WrapCylinder Gmax1_at_pelvis_l: xyz_body_rotation=(0.6 -0.45 0) translation=(-0.07372179 -0.08065878 -0.05712846)
          quadrant=-x radius=0.03604378 length=0.1366105
      WrapCylinder Gmax2_at_pelvis_l: xyz_body_rotation=(0.75 -0.39 0)
          translation=(-0.07659407 -0.06762302 -0.06368418) quadrant=all radius=0.03640681 length=0.08933262
      WrapCylinder Gmax3_at_pelvis_l: xyz_body_rotation=(0.1 0 0) translation=(-0.07946634 -0.07169669 -0.06368418)
          quadrant=all radius=0.03546929 length=0.09353964
      WrapCylinder PS_at_brim_r: xyz_body_rotation=(-0.25 -0.27 0.1) translation=(-0.07084951 -0.04888411 0.0614365)
          quadrant=-y radius=0.04446487 length=0.09315475
      WrapCylinder PS_at_brim_l: xyz_body_rotation=(0.25 0.27 0.1) translation=(-0.07084951 -0.04888411 -0.0614365)
          quadrant=-y radius=0.04446487 length=0.09315475
      WrapCylinder IL_at_brim_r: xyz_body_rotation=(-0.32 -0.24 0.9) translation=(-0.06797723 -0.05295778 0.07080182)
          quadrant=-y radius=0.04905952 length=0.09270461
      WrapCylinder IL_at_brim_l: xyz_body_rotation=(0.32 0.24 0.9) translation=(-0.06797723 -0.05295778 -0.07080182)
          quadrant=-y radius=0.04905952 length=0.09270461
    Body femur_r: mass=8.043442 mass_center=(0 -0.2012125 0) inertia=(0.1238314 0.03246066 0.1305825 0 0 0)
        meshes=r_femur.vtp
      WrapCylinder GasLat_at_condyles_r: translation=(0.005766509 -0.4852771 0) quadrant=all radius=0.03037976
          length=0.1153302
      WrapCylinder GasMed_at_condyles_r: translation=(0.005766509 -0.4852771 0) quadrant=all radius=0.02921131
          length=0.1153302
      WrapCylinder KnExt_at_fem_r: xyz_body_rotation=(-0.0623366 0.0507601 0)
          translation=(0.00413837 -0.4766747 0.002411681) quadrant=all radius=0.02920986 length=0.1153421
      WrapCylinder KnExtVL_at_fem_r: xyz_body_rotation=(-0.0623366 0.0507601 0)
          translation=(0.002177757 -0.4766747 0.002411681) quadrant=all radius=0.02920986 length=0.1153421
      WrapCylinder AB_at_femshaft_r: xyz_body_rotation=(1.66157 0.186644 0)
          translation=(0.01688826 -0.1332678 0.0269469) quadrant=all radius=0.01904021 length=0.08276343
      WrapCylinder AL_at_femshaft_r: xyz_body_rotation=(1.77711 0.136489 0)
          translation=(0.03544408 -0.2744881 0.01743066) quadrant=all radius=0.02319978 length=0.1181816
      WrapCylinder AMprox_at_femshaft_r: xyz_body_rotation=(1.61126 0.18656 0)
          translation=(0.005977552 -0.08627849 0.02929733) quadrant=all radius=0.02434632 length=0.08277682
      WrapCylinder AMmid_at_femshaft_r: xyz_body_rotation=(1.61139 0.13656 0)
          translation=(0.02654036 -0.190218 0.0237398) quadrant=all radius=0.02468728 length=0.14196
      WrapCylinder AMdist_at_femshaft_r: xyz_body_rotation=(1.71188 0.186636 0)
          translation=(0.03645184 -0.3086079 0.01080021) quadrant=all radius=0.02515988 length=0.2364001
      WrapCylinder AMisch_at_condyles_r: xyz_body_rotation=(1.71115 -0.463363 0)
          translation=(-0.02612356 -0.4460182 -0.003637941) quadrant=all radius=0.04626403 length=0.2825138
      WrapCylinder PECT_at_femshaft_r: xyz_body_rotation=(1.81295 0.276344 0)
          translation=(0.007018684 -0.1000179 0.03510709) quadrant=all radius=0.0173289 length=0.05898889
    Body tibia_r: mass=3.206083 mass_center=(0 -0.2086444 0) inertia=(0.04661018 0.004716506 0.04725754 0 0 0)
        meshes=(r_tibia.vtp r_fibula.vtp)
      WrapCylinder GasLat_at_shank_r: xyz_body_rotation=(2.96723 -0.279725 -1.47812)
          translation=(-0.007569937 -0.08269783 -0.003375783) quadrant=-y radius=0.05879874 length=0.1025712
      WrapCylinder GasMed_at_shank_r: xyz_body_rotation=(2.96723 0.0279725 -1.47812)
          translation=(-0.007569937 -0.08269783 -0.003375783) quadrant=-y radius=0.06306616 length=0.1025936
      WrapCylinder GR_at_condyles_r: xyz_body_rotation=(0 -0.4 0) translation=(-0.003068893 -0.02235076 0) quadrant=all
          radius=0.03852905 length=0.1022964
      WrapCylinder SM_at_condyles_r: xyz_body_rotation=(0 -0.1 0) translation=(-0.001022964 -0.02235076 0) quadrant=all
          radius=0.03692367 length=0.1022964
      WrapCylinder ST_at_condyles_r: xyz_body_rotation=(0 -0.2 0) translation=(-0.002045929 -0.02290953 0) quadrant=all
          radius=0.04548568 length=0.1022964
      WrapCylinder BF140_at_gastroc_r: translation=(-0.03989561 -0.06705229 0) quadrant=y radius=0.03103729
          length=0.1534447
    Body patella_r: mass=0.07454197 mass_center=(0.002130485 0.03124711 0)
        inertia=(3.718297e-6 1.698497e-5 1.698497e-5 0 0 0) meshes=r_patella.vtp
    Body talus_r: mass=0.0864756 mass_center=(0 0 0) inertia=(0.0009248051 0.0009248051 0.0009248051 0 0 0)
        meshes=r_talus.vtp
    Body calcn_r: mass=1.080945 mass_center=(0.09428541 0.04340007 0)
        inertia=(0.001294727 0.00360674 0.003791701 0 0 0) meshes=r_foot.vtp
    Body toes_r: mass=0.1873062 mass_center=(0.03262275 0.008680014 -0.02524772)
        inertia=(9.248051e-5 0.000184961 0.0009248051 0 0 0) meshes=r_bofoot.vtp
    Body femur_l: mass=8.043442 mass_center=(0 -0.2066857 0) inertia=(0.1238314 0.03246066 0.1305825 0 0 0)
        meshes=l_femur.vtp
      WrapCylinder GasLat_at_condyles_l: translation=(0.005789243 -0.4984774 0) quadrant=all radius=0.03085741
          length=0.1157849
      WrapCylinder GasMed_at_condyles_l: translation=(0.005789243 -0.4984774 0) quadrant=all radius=0.02967059
          length=0.1157849
      WrapCylinder KnExt_at_fem_l: xyz_body_rotation=(0.0623366 -0.0507601 0)
          translation=(0.004154685 -0.489641 -0.002421189) quadrant=all radius=0.02966785 length=0.1158079
      WrapCylinder KnExtVL_at_fem_l: xyz_body_rotation=(0.0623366 -0.0507601 0)
          translation=(0.002186343 -0.489641 -0.002421189) quadrant=all radius=0.02966785 length=0.1158079
      WrapCylinder AB_at_femshaft_l: xyz_body_rotation=(-1.66157 -0.186644 0)
          translation=(0.01695484 -0.1368928 -0.02705313) quadrant=all radius=0.01912525 length=0.08493796
      WrapCylinder AL_at_femshaft_l: xyz_body_rotation=(-1.77711 -0.136489 0)
          translation=(0.03558382 -0.2819546 -0.01749938) quadrant=all radius=0.02330837 length=0.1212417
      WrapCylinder AMprox_at_femshaft_l: xyz_body_rotation=(-1.61126 -0.18656 0)
          translation=(0.006001118 -0.08862539 -0.02941283) quadrant=all radius=0.02445314 length=0.08496329
      WrapCylinder AMmid_at_femshaft_l: xyz_body_rotation=(-1.61139 -0.13656 0)
          translation=(0.02664499 -0.1953922 -0.02383339) quadrant=all radius=0.02479076 length=0.145759
      WrapCylinder AMdist_at_femshaft_l: xyz_body_rotation=(-1.71188 -0.186636 0)
          translation=(0.03659554 -0.3170024 -0.01084279) quadrant=all radius=0.02527573 length=0.2425534
      WrapCylinder AMisch_at_condyles_l: xyz_body_rotation=(-1.71115 0.463363 0)
          translation=(-0.02622655 -0.4581506 0.003652283) quadrant=all radius=0.04656871 length=0.288852
      WrapCylinder PECT_at_femshaft_l: xyz_body_rotation=(-1.81295 -0.276344 0)
          translation=(0.007046355 -0.1027385 -0.03524549) quadrant=all radius=0.01742451 length=0.06042776
    Body tibia_l: mass=3.206083 mass_center=(0 -0.2068878 0) inertia=(0.04661018 0.004716506 0.04725754 0 0 0)
        meshes=(l_tibia.vtp l_fibula.vtp)
      WrapCylinder GasLat_at_shank_l: xyz_body_rotation=(-2.96723 0.279725 -1.47812)
          translation=(-0.007535782 -0.0820016 0.003360552) quadrant=-y radius=0.05841608 length=0.1020952
      WrapCylinder GasMed_at_shank_l: xyz_body_rotation=(-2.96723 -0.0279725 -1.47812)
          translation=(-0.007535782 -0.0820016 0.003360552) quadrant=-y radius=0.06265622 length=0.1021164
      WrapCylinder GR_at_condyles_l: xyz_body_rotation=(0 0.4 0) translation=(-0.003055047 -0.02216259 0) quadrant=all
          radius=0.03827662 length=0.1018349
      WrapCylinder SM_at_condyles_l: xyz_body_rotation=(0 0.1 0) translation=(-0.001018349 -0.02216259 0) quadrant=all
          radius=0.03668176 length=0.1018349
      WrapCylinder ST_at_condyles_l: xyz_body_rotation=(0 0.2 0) translation=(-0.002036698 -0.02271666 0) quadrant=all
          radius=0.04518767 length=0.1018349
      WrapCylinder BF140_at_gastroc_l: translation=(-0.03971561 -0.06648778 0) quadrant=all radius=0.03083394
          length=0.1527523
    Body patella_l: mass=0.07454197 mass_center=(0.002188437 0.03209708 0)
        inertia=(3.923334e-6 1.792157e-5 1.792157e-5 0 0 0) meshes=l_patella.vtp
    Body talus_l: mass=0.0864756 mass_center=(0 0 0) inertia=(0.0009248051 0.0009248051 0.0009248051 0 0 0)
        meshes=l_talus.vtp
    Body calcn_l: mass=1.080945 mass_center=(0.09482183 0.0436882 0) inertia=(0.001294727 0.00360674 0.003791701 0 0 0)
        meshes=l_foot.vtp
    Body toes_l: mass=0.1873062 mass_center=(0.03280835 0.008737641 0.02543216)
        inertia=(9.248051e-5 0.000184961 0.0009248051 0 0 0) meshes=l_bofoot.vtp
    Body torso: mass=29.31488 mass_center=(-0.03140257 0.3187234 0) inertia=(1.363625 0.6986903 1.323766 0 0 0)
        meshes=(hat_spine.vtp hat_jaw.vtp hat_skull.vtp hat_ribs_scap.vtp)
  JointSet:
    CustomJoint patellofemoral_r: socket_parent_frame=femur_r_offset socket_child_frame=patella_r_offset
      Coordinate knee_angle_r_beta: default_value=4.877666e-5 range=(-99999.9 99999.9) clamped=false
      PhysicalOffsetFrame femur_r_offset: socket_parent=/bodyset/femur_r
          translation=(-0.009330212 -0.4828626 -0.00317158) [meters]
      PhysicalOffsetFrame patella_r_offset: socket_parent=/bodyset/patella_r translation=(0 0 0)
      SpatialTransform: axes_held_at_zero=(rotation2 rotation3)
        TransformAxis rotation1: coordinates=knee_angle_r_beta axis=(0 0 1)
          SimmSpline: x=(0 0.174533 0.349066 0.523599 0.698132 0.872665 1.0472 1.22173 1.39626 1.5708 1.74533 1.91986 2.0944)
              y=(0.00113686 -0.00629212 -0.105582 -0.253683 -0.414245 -0.579047 -0.747244 -0.91799 -1.09044 -1.26379 -1.43763 -1.61186 -1.78634)
        TransformAxis translation1: coordinates=knee_angle_r_beta axis=(1 0 0)
          MultiplierFunction: scale=1.153302
            SimmSpline: x=(0 0.174533 0.349066 0.523599 0.698132 0.872665 1.0472 1.22173 1.39626 1.5708 1.74533 1.91986 2.0944)
                y=(0.0524 0.0488 0.0437 0.0371 0.0296 0.0216 0.0136 0.0057 -0.0019 -0.0088 -0.0148 -0.0196 -0.0227)
        TransformAxis translation2: coordinates=knee_angle_r_beta axis=(0 1 0)
          MultiplierFunction: scale=1.183603
            SimmSpline: x=(0 0.174533 0.349066 0.523599 0.698132 0.872665 1.0472 1.22173 1.39626 1.5708 1.74533 1.91986 2.0944)
                y=(-0.0108 -0.019 -0.0263 -0.0322 -0.0367 -0.0395 -0.0408 -0.0404 -0.0384 -0.0349 -0.0301 -0.0245 -0.0187)
        TransformAxis translation3: axis=(0 0 1) MultiplierFunction(scale=1.153302, Constant(value=0.00275))
    PinJoint ankle_r: socket_parent_frame=tibia_r_offset socket_child_frame=talus_r_offset
      Coordinate ankle_angle_r: default_value=-1.182866e-9 range=(-0.6981317 0.5235988) clamped=true
      PhysicalOffsetFrame tibia_r_offset: socket_parent=/bodyset/tibia_r translation=(-0.01022964 -0.4470153 0)
      PhysicalOffsetFrame talus_r_offset: socket_parent=/bodyset/talus_r translation=(0 0 0)
    CustomJoint patellofemoral_l: socket_parent_frame=femur_l_offset socket_child_frame=patella_l_offset
      Coordinate knee_angle_l_beta: default_value=4.877992e-5 range=(-99999.9 99999.9) clamped=false
      PhysicalOffsetFrame femur_l_offset: socket_parent=/bodyset/femur_l
          translation=(-0.009366996 -0.4959971 0.003184084)
      PhysicalOffsetFrame patella_l_offset: socket_parent=/bodyset/patella_l translation=(0 0 0)
      SpatialTransform: axes_held_at_zero=(rotation2 rotation3)
        TransformAxis rotation1: coordinates=knee_angle_l_beta axis=(0 0 1)
          SimmSpline: x=(0 0.174533 0.349066 0.523599 0.698132 0.872665 1.0472 1.22173 1.39626 1.5708 1.74533 1.91986 2.0944)
              y=(0.00113686 -0.00629212 -0.105582 -0.253683 -0.414245 -0.579047 -0.747244 -0.91799 -1.09044 -1.26379 -1.43763 -1.61186 -1.78634)
        TransformAxis translation1: coordinates=knee_angle_l_beta axis=(1 0 0)
          MultiplierFunction: scale=1.157849
            SimmSpline: x=(0 0.174533 0.349066 0.523599 0.698132 0.872665 1.0472 1.22173 1.39626 1.5708 1.74533 1.91986 2.0944)
                y=(0.0524 0.0488 0.0437 0.0371 0.0296 0.0216 0.0136 0.0057 -0.0019 -0.0088 -0.0148 -0.0196 -0.0227)
        TransformAxis translation2: coordinates=knee_angle_l_beta axis=(0 1 0)
          MultiplierFunction: scale=1.215798
            SimmSpline: x=(0 0.174533 0.349066 0.523599 0.698132 0.872665 1.0472 1.22173 1.39626 1.5708 1.74533 1.91986 2.0944)
                y=(-0.0108 -0.019 -0.0263 -0.0322 -0.0367 -0.0395 -0.0408 -0.0404 -0.0384 -0.0349 -0.0301 -0.0245 -0.0187)
        TransformAxis translation3: axis=(0 0 1) MultiplierFunction(scale=1.157849, Constant(value=-0.00275))
    PinJoint ankle_l: socket_parent_frame=tibia_l_offset socket_child_frame=talus_l_offset
      Coordinate ankle_angle_l: default_value=8.352658e-11 range=(-0.6981317 0.5235988) clamped=true
      PhysicalOffsetFrame tibia_l_offset: socket_parent=/bodyset/tibia_l translation=(-0.01018349 -0.4432519 0)
      PhysicalOffsetFrame talus_l_offset: socket_parent=/bodyset/talus_l translation=(0 0 0)
    PinJoint hip_r: socket_parent_frame=pelvis_offset socket_child_frame=femur_r_offset
      Coordinate hip_flexion_r: default_value=0 range=(-0.5235988 2.094395) clamped=true
      PhysicalOffsetFrame pelvis_offset: socket_parent=/bodyset/pelvis translation=(-0.0538801 -0.06394856 0.07235647)
      PhysicalOffsetFrame femur_r_offset: socket_parent=/bodyset/femur_r translation=(0 0 0)
    PinJoint hip_l: socket_parent_frame=pelvis_offset socket_child_frame=femur_l_offset
      Coordinate hip_flexion_l: default_value=0 range=(-0.5235988 2.094395) clamped=true
      PhysicalOffsetFrame pelvis_offset: socket_parent=/bodyset/pelvis translation=(-0.0538801 -0.06394856 -0.07235647)
      PhysicalOffsetFrame femur_l_offset: socket_parent=/bodyset/femur_l translation=(0 0 0)
    PinJoint walker_knee_r: socket_parent_frame=femur_r_offset socket_child_frame=tibia_r_offset
      Coordinate knee_angle_r: default_value=0 range=(0 2.443461) clamped=true
      PhysicalOffsetFrame femur_r_offset: socket_parent=/bodyset/femur_r
          translation=(-0.005189858 -0.4848037 -0.002018278) orientation=(-3.141593 1.224647e-16 -3.141593) [radians]
      PhysicalOffsetFrame tibia_r_offset: socket_parent=/bodyset/tibia_r
          translation=(-0.008275312 -0.003950274 -0.001518836) orientation=(-3.141593 1.224647e-16 -3.141593)
    PinJoint walker_knee_l: socket_parent_frame=femur_l_offset socket_child_frame=tibia_l_offset
      Coordinate knee_angle_l: default_value=0 range=(0 2.443461) clamped=true
      PhysicalOffsetFrame femur_l_offset: socket_parent=/bodyset/femur_l
          translation=(-0.005210319 -0.4979911 0.002026235) orientation=(-3.141593 1.224647e-16 -3.141593)
      PhysicalOffsetFrame tibia_l_offset: socket_parent=/bodyset/tibia_l
          translation=(-0.008237975 -0.003917017 0.001511983) orientation=(-3.141593 1.224647e-16 -3.141593)
    PinJoint back: socket_parent_frame=pelvis_offset socket_child_frame=torso_offset
      Coordinate lumbar_extension: default_value=0 range=(-1.570796 1.570796) clamped=true
      PhysicalOffsetFrame pelvis_offset: socket_parent=/bodyset/pelvis translation=(-0.09641278 0.06640091 0)
      PhysicalOffsetFrame torso_offset: socket_parent=/bodyset/torso translation=(0 0 0)
    PlanarJoint ground_pelvis: socket_parent_frame=ground_offset socket_child_frame=pelvis_offset
      Coordinate pelvis_tilt: default_value=0 range=(-1.570796 1.570796) clamped=true
      Coordinate pelvis_tx: default_value=0 range=(-5 5) clamped=true
      Coordinate pelvis_ty: default_value=0.95 range=(-1 2) clamped=true
      PhysicalOffsetFrame ground_offset: socket_parent=/ground translation=(0 0 0)
      PhysicalOffsetFrame pelvis_offset: socket_parent=/bodyset/pelvis translation=(0 0 0)
    WeldJoint subtalar_r: socket_parent_frame=talus_r_offset socket_child_frame=calcn_r_offset
      PhysicalOffsetFrame talus_r_offset: socket_parent=/bodyset/talus_r
          translation=(-0.04988997 -0.04688073 0.008101878) orientation=(-3.141593 1.224647e-16 -3.141593)
      PhysicalOffsetFrame calcn_r_offset: socket_parent=/bodyset/calcn_r translation=(0 0 0)
          orientation=(-3.141593 1.224647e-16 -3.141593)
    WeldJoint subtalar_l: socket_parent_frame=talus_l_offset socket_child_frame=calcn_l_offset
      PhysicalOffsetFrame talus_l_offset: socket_parent=/bodyset/talus_l
          translation=(-0.04966488 -0.04648604 -0.008065324) orientation=(-3.141593 1.224647e-16 -3.141593)
      PhysicalOffsetFrame calcn_l_offset: socket_parent=/bodyset/calcn_l translation=(0 0 0)
          orientation=(-3.141593 1.224647e-16 -3.141593)
    WeldJoint mtp_r: socket_parent_frame=calcn_r_offset socket_child_frame=toes_r_offset
      PhysicalOffsetFrame calcn_r_offset: socket_parent=/bodyset/calcn_r
          translation=(0.1685823 -0.002893338 0.001558145) orientation=(-3.141593 1.224647e-16 -3.141593)
      PhysicalOffsetFrame toes_r_offset: socket_parent=/bodyset/toes_r translation=(0 0 0)
          orientation=(-3.141593 1.224647e-16 -3.141593)
    WeldJoint mtp_l: socket_parent_frame=calcn_l_offset socket_child_frame=toes_l_offset
      PhysicalOffsetFrame calcn_l_offset: socket_parent=/bodyset/calcn_l
          translation=(0.1695414 -0.002912547 -0.001569527) orientation=(-3.141593 1.224647e-16 -3.141593)
      PhysicalOffsetFrame toes_l_offset: socket_parent=/bodyset/toes_l translation=(0 0 0)
          orientation=(-3.141593 1.224647e-16 -3.141593)
  ConstraintSet:
    CoordinateCouplerConstraint patellofemoral_knee_angle_r_con: independent_coordinate_names=knee_angle_r
        dependent_coordinate_name=knee_angle_r_beta scale_factor=1
        coupled_coordinates_function=LinearFunction(coefficients=1 0)
    CoordinateCouplerConstraint patellofemoral_knee_angle_l_con: independent_coordinate_names=knee_angle_l
        dependent_coordinate_name=knee_angle_l_beta scale_factor=1
        coupled_coordinates_function=LinearFunction(coefficients=1 0)
  ForceSet:
    SmoothSphereHalfSpaceForce [values shared by the 12 below unless stated]: socket_half_space=/contactgeometryset/floor
        stiffness=3067776 [N/m^2] dissipation=2 [s/m] static_friction=0.8 dynamic_friction=0.8 viscous_friction=0.5
        transition_velocity=0.2 [m/s] hertz_smoothing=300 hunt_crossley_smoothing=50
    SmoothSphereHalfSpaceForce contactHeel_r: socket_sphere=/contactgeometryset/heel_r
    SmoothSphereHalfSpaceForce contactMH1_r: socket_sphere=/contactgeometryset/mh1_r
    SmoothSphereHalfSpaceForce contactMH3_r: socket_sphere=/contactgeometryset/mh3_r
    SmoothSphereHalfSpaceForce contactMH5_r: socket_sphere=/contactgeometryset/mh5_r
    SmoothSphereHalfSpaceForce contactHallux_r: socket_sphere=/contactgeometryset/hallux_r
    SmoothSphereHalfSpaceForce contactOtherToes_r: socket_sphere=/contactgeometryset/othertoes_r stiffness=306777.6
    SmoothSphereHalfSpaceForce contactHeel_l: socket_sphere=/contactgeometryset/heel_l
    SmoothSphereHalfSpaceForce contactMH1_l: socket_sphere=/contactgeometryset/mh1_l
    SmoothSphereHalfSpaceForce contactMH3_l: socket_sphere=/contactgeometryset/mh3_l
    SmoothSphereHalfSpaceForce contactMH5_l: socket_sphere=/contactgeometryset/mh5_l
    SmoothSphereHalfSpaceForce contactHallux_l: socket_sphere=/contactgeometryset/hallux_l
    SmoothSphereHalfSpaceForce contactOtherToes_l: socket_sphere=/contactgeometryset/othertoes_l stiffness=306777.6
    CoordinateActuator tau_lumbar_ext: coordinate=lumbar_extension optimal_force=10
    DeGrooteFregly2016Muscle [values shared by the 80 below unless stated]: min_control=0.01 max_control=1
        max_contraction_velocity=20 activation_time_constant=0.01 deactivation_time_constant=0.04
        default_activation=0.01 fiber_damping=0.01 passive_fiber_strain_at_one_norm_force=0.7
        tendon_strain_at_one_norm_force=0.049
    DeGrooteFregly2016Muscle addbrev_r: max_isometric_force=540.7705 optimal_fiber_length=0.1167386
        tendon_slack_length=0.04013984 pennation_angle_at_optimal=0.1147809 [radians] ignore_tendon_compliance=true
      PathPoint P1: pelvis (-0.01828683 -0.0765851 0.01442259)
      PathPoint P2: femur_r (-0.002306604 -0.1396651 0.02871722)
      PathWrap: wrap_object=AB_at_femshaft_r method=hybrid
    DeGrooteFregly2016Muscle addlong_r: max_isometric_force=763.269 optimal_fiber_length=0.1271581
        tendon_slack_length=0.1548923 pennation_angle_at_optimal=0.1377704
      PathPoint P1: pelvis (-0.007257288 -0.07242995 0.01768173)
      PathPoint P2: femur_r (0.01298618 -0.283319 0.01825677)
      PathWrap: wrap_object=AL_at_femshaft_r method=hybrid
    DeGrooteFregly2016Muscle addmagDist_r: max_isometric_force=467.4058 optimal_fiber_length=0.2215533
        tendon_slack_length=0.1092521 pennation_angle_at_optimal=0.194705 ignore_tendon_compliance=true
      PathPoint P1: pelvis (-0.07088781 -0.1040172 0.03729271)
      PathPoint P2: femur_r (0.01297465 -0.3106957 0.02225873)
      PathWrap: wrap_object=AMdist_at_femshaft_r method=hybrid
    DeGrooteFregly2016Muscle addmagIsch_r: max_isometric_force=472.4159 optimal_fiber_length=0.1932258
        tendon_slack_length=0.2676252 pennation_angle_at_optimal=0.1680443
      PathPoint P1: pelvis (-0.0858045 -0.10572 0.03906275)
      PathPoint P2: femur_r (0.005547382 -0.4592024 -0.03774757)
      PathWrap: wrap_object=AMisch_at_condyles_r method=hybrid
    DeGrooteFregly2016Muscle addmagMid_r: max_isometric_force=473.8012 optimal_fiber_length=0.1698425
        tendon_slack_length=0.05751173 pennation_angle_at_optimal=0.2073076 ignore_tendon_compliance=true
      PathPoint P1: pelvis (-0.05041804 -0.09837927 0.02672863)
      PathPoint P2: femur_r (0.00279099 -0.1922171 0.03369948)
      PathWrap: wrap_object=AMmid_at_femshaft_r method=hybrid
    DeGrooteFregly2016Muscle addmagProx_r: max_isometric_force=532.6991 optimal_fiber_length=0.1158485
        tendon_slack_length=0.04423758 pennation_angle_at_optimal=0.3114833 ignore_tendon_compliance=true
      PathPoint P1: pelvis (-0.02966105 -0.08762476 0.01278366)
      PathPoint P2: femur_r (-0.01761092 -0.09333892 0.03692873)
      PathWrap: wrap_object=AMprox_at_femshaft_r method=hybrid
    DeGrooteFregly2016Muscle bflh140_r: max_isometric_force=1064.548 optimal_fiber_length=0.1177957
        tendon_slack_length=0.4013021 pennation_angle_at_optimal=0.1759182
      PathPoint bflh_r-P1: pelvis (-0.09957229 -0.09703495 0.05488078)
      PathPoint bflh_r-P2: tibia_r (-0.03514906 -0.04076779 0.03701085)
      PathPoint bflh_r-P3: tibia_r (-0.02766096 -0.05596631 0.03555824)
    DeGrooteFregly2016Muscle bfsh140_r: max_isometric_force=464.7963 optimal_fiber_length=0.1293532
        tendon_slack_length=0.1240961 pennation_angle_at_optimal=0.2642232 ignore_tendon_compliance=true
      PathPoint bfsh_r-P1: femur_r (0.005766509 -0.2498585 0.02698726)
      PathPoint bfsh_r-P2: tibia_r (-0.02931816 -0.03669995 0.03277578)
      PathWrap: wrap_object=BF140_at_gastroc_r method=hybrid
    DeGrooteFregly2016Muscle edl_r: max_isometric_force=561.4405 optimal_fiber_length=0.07288281
        tendon_slack_length=0.3879461 pennation_angle_at_optimal=0.2182582
      PathPoint P1: tibia_r (-0.01636743 -0.1292992 0.02097077)
      PathPoint P2: tibia_r (0.01677662 -0.4201944 0.0114572)
      PathPoint P3: calcn_r (0.08664829 0.05208009 0.001154181)
      PathPoint P4: calcn_r (0.1523652 0.00795668 0.01875545)
      PathPoint P5: toes_r (0.0002828562 0.006799345 0.02207372)
      PathPoint P6: toes_r (0.04176844 -0.0005786676 0.03606817)
    DeGrooteFregly2016Muscle ehl_r: max_isometric_force=267.0855 optimal_fiber_length=0.07833139
        tendon_slack_length=0.3422236 pennation_angle_at_optimal=0.1972681
      PathPoint P1: tibia_r (-0.0143215 -0.1732184 0.01933403)
      PathPoint P2: tibia_r (0.007263047 -0.3250919 0.01677662)
      PathPoint P3: tibia_r (0.02045929 -0.4127069 -0.0028643)
      PathPoint P4: calcn_r (0.09145685 0.05627543 -0.03044154)
      PathPoint P5: calcn_r (0.121911 0.04470207 -0.03707808)
      PathPoint P6: calcn_r (0.1634909 0.0201087 -0.04039635)
      PathPoint P7: toes_r (0.02809705 0.005931343 -0.03534681)
      PathPoint P8: toes_r (0.05308269 0.004918675 -0.02683472)
    DeGrooteFregly2016Muscle fdl_r: max_isometric_force=389.3107 optimal_fiber_length=0.04743297
        tendon_slack_length=0.4028323 pennation_angle_at_optimal=0.2248391
      PathPoint P1: tibia_r (-0.002352818 -0.204733 -0.001841336)
      PathPoint P2: tibia_r (-0.01800417 -0.4073427 -0.01268476)
      PathPoint P3: calcn_r (0.04110844 0.04557008 -0.04039635)
      PathPoint P4: calcn_r (0.06675407 0.02546138 -0.03794372)
      PathPoint P5: calcn_r (0.1563252 -0.01171802 0.01673563)
      PathPoint P6: toes_r (-0.001791423 -0.01128402 0.02120808)
      PathPoint P7: toes_r (0.02687134 -0.01027135 0.03101863)
      PathPoint P8: toes_r (0.04157987 -0.008680014 0.03491399)
    DeGrooteFregly2016Muscle fhl_r: max_isometric_force=862.051 optimal_fiber_length=0.05430081
        tendon_slack_length=0.3651031 pennation_angle_at_optimal=0.2580255
      PathPoint P1: tibia_r (-0.0317119 -0.2417235 0.02045929)
      PathPoint P2: tibia_r (-0.02475574 -0.4102483 -0.00777453)
      PathPoint P3: calcn_r (0.03526274 0.03992807 -0.03476972)
      PathPoint P4: calcn_r (0.09786826 0.00983735 -0.03693381)
      PathPoint P5: calcn_r (0.1627366 -0.007667346 -0.03880935)
      PathPoint P6: toes_r (0.01461424 -0.009258682 -0.03823226)
      PathPoint P7: toes_r (0.0529884 -0.01475602 -0.02611336)
    DeGrooteFregly2016Muscle gaslat140_r: max_isometric_force=1407.207 optimal_fiber_length=0.07556275
        tendon_slack_length=0.409572 pennation_angle_at_optimal=0.2102268
      PathPoint gaslat_r-P1: femur_r (0.002306604 -0.4509527 0.02374649)
      PathPoint gaslat_r-P2: calcn_r (0.004148558 0.04484674 -0.007646452)
      PathWrap: wrap_object=GasLat_at_shank_r method=hybrid
      PathWrap pathwrap_0: wrap_object=GasLat_at_condyles_r method=hybrid
    DeGrooteFregly2016Muscle gasmed_r: max_isometric_force=2787.029 optimal_fiber_length=0.06452976
        tendon_slack_length=0.4232715 pennation_angle_at_optimal=0.1656816
      PathPoint P1: femur_r (0.006919811 -0.4556871 -0.02537264)
      PathPoint P2: calcn_r (0.004148558 0.04484674 -0.007646452)
      PathWrap: wrap_object=GasMed_at_shank_r method=hybrid
      PathWrap pathwrap_0: wrap_object=GasMed_at_condyles_r method=hybrid
    DeGrooteFregly2016Muscle glmax1_r: max_isometric_force=1010.865 optimal_fiber_length=0.1399727
        tendon_slack_length=0.08312665 pennation_angle_at_optimal=0.3540118 ignore_tendon_compliance=true
      PathPoint P1: pelvis (-0.1178591 0.02810836 0.05272676)
      PathPoint P2: pelvis (-0.1203484 -0.01971659 0.07295585)
      PathPoint P3: femur_r (-0.0512066 -0.03858545 0.03482972)
      PathPoint P4: femur_r (-0.03194646 -0.06699192 0.05420519)
      PathWrap: wrap_object=Gmax1_at_pelvis_r method=hybrid
    DeGrooteFregly2016Muscle glmax2_r: max_isometric_force=1365.393 optimal_fiber_length=0.1581835
        tendon_slack_length=0.1098217 pennation_angle_at_optimal=0.3673821 ignore_tendon_compliance=true
      PathPoint P1: pelvis (-0.126093 0.007088196 0.04326778)
      PathPoint P2: pelvis (-0.128678 -0.04961737 0.07614006)
      PathPoint P3: femur_r (-0.05189858 -0.0691224 0.02906321)
      PathPoint P4: femur_r (-0.01799151 -0.120254 0.04832335)
      PathWrap: wrap_object=Gmax2_at_pelvis_r method=hybrid
    DeGrooteFregly2016Muscle glmax3_r: max_isometric_force=866.9087 optimal_fiber_length=0.1786317
        tendon_slack_length=0.110174 pennation_angle_at_optimal=0.3824161 ignore_tendon_compliance=true
      PathPoint P1: pelvis (-0.1244654 -0.04277359 0.008428789)
      PathPoint P2: pelvis (-0.1218803 -0.102901 0.04073915)
      PathPoint P3: femur_r (-0.03240778 -0.1331553 0.01084104)
      PathPoint P4: femur_r (-0.006919811 -0.1679532 0.04740071)
      PathWrap: wrap_object=Gmax3_at_pelvis_r method=hybrid
    DeGrooteFregly2016Muscle glmed1_r: max_isometric_force=1197.586 optimal_fiber_length=0.06521408
        tendon_slack_length=0.04986361 pennation_angle_at_optimal=0.3165559 ignore_tendon_compliance=true
      PathPoint P1: pelvis (-0.04260545 0.01996101 0.1097616)
      PathPoint P2: femur_r (-0.02514198 -0.01384815 0.06400825)
    DeGrooteFregly2016Muscle glmed2_r: max_isometric_force=826.7039 optimal_fiber_length=0.06610069
        tendon_slack_length=0.05908208 pennation_angle_at_optimal=0.3165559 ignore_tendon_compliance=true
      PathPoint P1: pelvis (-0.0813812 0.02574563 0.06321592)
      PathPoint P2: femur_r (-0.02975519 -0.006864896 0.06077901)
    DeGrooteFregly2016Muscle glmed3_r: max_isometric_force=891.2439 optimal_fiber_length=0.06981736
        tendon_slack_length=0.04326079 pennation_angle_at_optimal=0.3165559 ignore_tendon_compliance=true
      PathPoint P1: pelvis (-0.1102955 -0.005947566 0.04926159)
      PathPoint P2: femur_r (-0.03563703 -0.005562933 0.05974104)
    DeGrooteFregly2016Muscle glmin1_r: max_isometric_force=384.9307 optimal_fiber_length=0.06465036
        tendon_slack_length=0.01534285 pennation_angle_at_optimal=0.1745329 ignore_tendon_compliance=true
      PathPoint P1: pelvis (-0.04442456 -0.01213955 0.09758664)
      PathPoint P2: femur_r (-0.008303773 -0.01230947 0.0645849)
    DeGrooteFregly2016Muscle glmin2_r: max_isometric_force=403.2276 optimal_fiber_length=0.05364833
        tendon_slack_length=0.02500304 pennation_angle_at_optimal=0 ignore_tendon_compliance=true
      PathPoint P1: pelvis (-0.05897743 -0.01156924 0.09093726)
      PathPoint P2: femur_r (-0.0110717 -0.01230947 0.0645849)
    DeGrooteFregly2016Muscle glmin3_r: max_isometric_force=449.0362 optimal_fiber_length=0.03699215
        tendon_slack_length=0.04952324 pennation_angle_at_optimal=0.01745329
      PathPoint P1: pelvis (-0.0755409 -0.01262839 0.07473526)
      PathPoint P2: femur_r (-0.01556958 -0.009823903 0.0634316)
    DeGrooteFregly2016Muscle grac_r: max_isometric_force=227.5228 optimal_fiber_length=0.2755725
        tendon_slack_length=0.2080872 pennation_angle_at_optimal=0.1720016 ignore_tendon_compliance=true
      PathPoint P1: pelvis (-0.04534369 -0.1053615 0.02300123)
      PathPoint P2: tibia_r (-0.018843 -0.05313894 -0.03028998)
      PathPoint P3: tibia_r (0.001820877 -0.07780301 -0.01609123)
      PathWrap: wrap_object=GR_at_condyles_r method=hybrid
    DeGrooteFregly2016Muscle iliacus_r: max_isometric_force=1049.275 optimal_fiber_length=0.1015017
        tendon_slack_length=0.09152362 pennation_angle_at_optimal=0.279914 ignore_tendon_compliance=true
      PathPoint P1: pelvis (-0.05792426 0.02517532 0.07894965)
      PathPoint P2: pelvis (-0.01292525 -0.04538075 0.07080182)
      PathPoint P3: femur_r (-0.002652594 -0.06687356 0.0160309)
      PathPoint P4: femur_r (-0.01407028 -0.0753955 0.02260472)
      PathWrap: wrap_object=IL_at_brim_r method=hybrid range=(2 3)
    DeGrooteFregly2016Muscle perbrev_r: max_isometric_force=466.1674 optimal_fiber_length=0.04966373
        tendon_slack_length=0.1613825 pennation_angle_at_optimal=0.2052361
      PathPoint P1: tibia_r (-0.02485804 -0.2829607 0.02567641)
      PathPoint P2: tibia_r (-0.03467849 -0.4350576 0.02547181)
      PathPoint P3: tibia_r (-0.02915449 -0.4474623 0.02608559)
      PathPoint P4: calcn_r (0.04440843 0.03906006 0.03361554)
      PathPoint P5: calcn_r (0.06383122 0.03168205 0.04948553)
    DeGrooteFregly2016Muscle perlong_r: max_isometric_force=974.0319 optimal_fiber_length=0.05691539
        tendon_slack_length=0.3722141 pennation_angle_at_optimal=0.2479525
      PathPoint P1: tibia_r (-0.02045929 -0.153438 0.0288476)
      PathPoint P2: tibia_r (-0.03242797 -0.4358399 0.02424426)
      PathPoint P3: tibia_r (-0.02782463 -0.4485798 0.02455115)
      PathPoint P4: calcn_r (0.04129701 0.03327339 0.03188426)
      PathPoint P5: calcn_r (0.06420836 0.01533469 0.04097344)
      PathPoint P6: calcn_r (0.08033117 0.009982017 0.01702418)
      PathPoint P7: calcn_r (0.1134253 0.01229669 -0.02654617)
    DeGrooteFregly2016Muscle piri_r: max_isometric_force=1057.069 optimal_fiber_length=0.02478203
        tendon_slack_length=0.1095235 pennation_angle_at_optimal=0.1745329
      PathPoint P1: pelvis (-0.09747552 -0.00532022 0.01265255)
      PathPoint P2: pelvis (-0.09767658 -0.02497978 0.05705353)
      PathPoint P3: femur_r (-0.01706887 -0.00426097 0.05039929)
    DeGrooteFregly2016Muscle psoas_r: max_isometric_force=1506.369 optimal_fiber_length=0.1083336
        tendon_slack_length=0.09224863 pennation_angle_at_optimal=0.2155251 ignore_tendon_compliance=true
      PathPoint P1: pelvis (-0.05802001 0.05051358 0.03652475)
      PathPoint P2: pelvis (-0.01962723 -0.05328368 0.0614365)
      PathPoint P3: femur_r (-0.01522358 -0.05527425 0.005305189)
      PathPoint P4: femur_r (-0.02710259 -0.06202079 0.01014906)
      PathWrap: wrap_object=PS_at_brim_r method=hybrid range=(2 3)
    DeGrooteFregly2016Muscle recfem_r: max_isometric_force=1863.057 optimal_fiber_length=0.08736237
        tendon_slack_length=0.5184191 pennation_angle_at_optimal=0.2170149
      PathPoint P1: pelvis (-0.02297822 -0.03161172 0.08737844)
      PathPoint P2: patella_r (0.01183603 0.05799654 0.000828522)
      PathPoint P3: patella_r (0.01432159 0.05172344 -0.001183603)
      PathPoint P4: patella_r (0.005918014 0.002923499 3.550808e-5)
      PathPoint P5: tibia_r (0.03334864 -0.07053901 -0.0004807933)
      PathWrap: wrap_object=KnExt_at_fem_r method=hybrid
    DeGrooteFregly2016Muscle sart_r: max_isometric_force=217.3487 optimal_fiber_length=0.452467
        tendon_slack_length=0.1392204 pennation_angle_at_optimal=0.02613542 ignore_tendon_compliance=true
      PathPoint P1: pelvis (-0.0186698 -0.01270987 0.09889779)
      PathPoint P2: femur_r (-0.003459906 -0.4223095 -0.04855401)
      PathPoint P3: tibia_r (-0.02567641 -0.04481328 -0.0373382)
      PathPoint P4: tibia_r (-0.01626513 -0.06694054 -0.02700626)
      PathPoint P5: tibia_r (0.01391232 -0.09052059 -0.002659707)
    DeGrooteFregly2016Muscle semimem_r: max_isometric_force=1786.277 optimal_fiber_length=0.103678
        tendon_slack_length=0.4038621 pennation_angle_at_optimal=0.2545615
      PathPoint P1: pelvis (-0.09449793 -0.0928798 0.05750307)
      PathPoint P2: tibia_r (-0.02762004 -0.04581907 -0.0200501)
      PathWrap: wrap_object=SM_at_condyles_r method=hybrid
    DeGrooteFregly2016Muscle semiten_r: max_isometric_force=480.8976 optimal_fiber_length=0.2321821
        tendon_slack_length=0.2973843 pennation_angle_at_optimal=0.241295
      PathPoint P1: pelvis (-0.0993808 -0.1020863 0.0482314)
      PathPoint P2: tibia_r (-0.03191649 -0.05677094 -0.02342588)
      PathPoint P3: tibia_r (0.001943632 -0.0863857 -0.01196868)
      PathWrap: wrap_object=ST_at_condyles_r method=hybrid
    DeGrooteFregly2016Muscle soleus_r: max_isometric_force=5588.32 optimal_fiber_length=0.0477223
        tendon_slack_length=0.3051516 pennation_angle_at_optimal=0.3814289
      PathPoint P1: tibia_r (-0.00777453 -0.1023665 0.01002505)
      PathPoint P2: calcn_r (0.004148558 0.04484674 -0.007646452)
    DeGrooteFregly2016Muscle tfl_r: max_isometric_force=361.2003 optimal_fiber_length=0.1058169
        tendon_slack_length=0.5006779 pennation_angle_at_optimal=0.05235988
      PathPoint P1: pelvis (-0.02977594 0.01743533 0.1162236)
      PathPoint P2: femur_r (0.03390707 -0.1177685 0.06885212)
      PathPoint P3: femur_r (0.01234033 -0.4793591 0.03736698)
      PathPoint P4: tibia_r (0.01104802 -0.04581907 0.03539457)
    DeGrooteFregly2016Muscle tibant_r: max_isometric_force=1101.876 optimal_fiber_length=0.07444102
        tendon_slack_length=0.2620815 pennation_angle_at_optimal=0.1951828
      PathPoint P1: tibia_r (0.01575365 -0.146621 0.01657202)
      PathPoint P2: tibia_r (0.02567641 -0.2130028 0.01309394)
      PathPoint P3: tibia_r (0.02383507 -0.4089072 -0.01350313)
      PathPoint P4: calcn_r (0.1099368 0.02575071 -0.04400317)
    DeGrooteFregly2016Muscle tibpost_r: max_isometric_force=1560.732 optimal_fiber_length=0.04099849
        tendon_slack_length=0.3045381 pennation_angle_at_optimal=0.2264891
      PathPoint P1: tibia_r (-0.004194154 -0.145727 0.01053653)
      PathPoint P2: tibia_r (-0.01677662 -0.4084602 -0.01790188)
      PathPoint P3: calcn_r (0.03931702 0.04831875 -0.04126199)
      PathPoint P4: calcn_r (0.07278834 0.02300204 -0.04054063)
    DeGrooteFregly2016Muscle vasint_r: max_isometric_force=1413.935 optimal_fiber_length=0.1374201
        tendon_slack_length=0.2407788 pennation_angle_at_optimal=0.06309973
      PathPoint P1: femur_r (0.03344575 -0.2277252 0.03575236)
      PathPoint P2: femur_r (0.03863561 -0.2466628 0.0328691)
      PathPoint P3: patella_r (0.006864896 0.05681293 -0.0007101617)
      PathPoint P4: patella_r (0.005918014 0.002923499 -0.0004616051)
      PathPoint P5: tibia_r (0.03331795 -0.07062841 0.0004398747)
      PathWrap: wrap_object=KnExt_at_fem_r method=hybrid
    DeGrooteFregly2016Muscle vaslat140_r: max_isometric_force=4291.342 optimal_fiber_length=0.1373459
        tendon_slack_length=0.2594311 pennation_angle_at_optimal=0.2528673
      PathPoint vaslat_r-P1: femur_r (0.005535849 -0.21944 0.04025023)
      PathPoint vaslat_r-P2: femur_r (0.03102382 -0.3066715 0.04717005)
      PathPoint vaslat_r-P3: patella_r (0.01219111 0.0500664 0.0166888)
      PathPoint vaslat_r-P4: patella_r (0.005918014 0.002923499 0.008675808)
      PathPoint vaslat_r-P5: tibia_r (0.03328726 -0.07082957 0.005227348)
      PathWrap: wrap_object=KnExtVL_at_fem_r method=hybrid
    DeGrooteFregly2016Muscle vasmed_r: max_isometric_force=2290.53 optimal_fiber_length=0.1291115
        tendon_slack_length=0.2441382 pennation_angle_at_optimal=0.4222225
      PathPoint P1: femur_r (0.01614623 -0.2484382 0.02168207)
      PathPoint P2: femur_r (0.04105755 -0.3277396 0.001037972)
      PathPoint P3: patella_r (0.007456698 0.05267032 -0.02012125)
      PathPoint P4: patella_r (0.005918014 0.002923499 -0.01006062)
      PathPoint P5: tibia_r (0.03263256 -0.0710419 -0.006935699)
      PathWrap: wrap_object=KnExt_at_fem_r method=hybrid
    DeGrooteFregly2016Muscle addbrev_l: max_isometric_force=530.3194 optimal_fiber_length=0.1190392
        tendon_slack_length=0.04093089 pennation_angle_at_optimal=0.1147809 ignore_tendon_compliance=true
      PathPoint P1: pelvis (-0.01828683 -0.0765851 -0.01442259)
      PathPoint P2: femur_l (-0.002315697 -0.1434642 -0.02883043)
      PathWrap: wrap_object=AB_at_femshaft_l method=hybrid
    DeGrooteFregly2016Muscle addlong_l: max_isometric_force=744.0236 optimal_fiber_length=0.1304472
        tendon_slack_length=0.1588989 pennation_angle_at_optimal=0.1377704
      PathPoint P1: pelvis (-0.007257288 -0.07242995 -0.01768173)
      PathPoint P2: femur_l (0.01303738 -0.2910257 -0.01832874)
      PathWrap: wrap_object=AL_at_femshaft_l method=hybrid
    DeGrooteFregly2016Muscle addmagDist_l: max_isometric_force=453.9278 optimal_fiber_length=0.2281316
        tendon_slack_length=0.1124961 pennation_angle_at_optimal=0.194705 ignore_tendon_compliance=true
      PathPoint P1: pelvis (-0.07088781 -0.1040172 -0.03729271)
      PathPoint P2: femur_l (0.0130258 -0.3191471 -0.02234648)
      PathWrap: wrap_object=AMdist_at_femshaft_l method=hybrid
    DeGrooteFregly2016Muscle addmagIsch_l: max_isometric_force=458.7941 optimal_fiber_length=0.1989628
        tendon_slack_length=0.2755711 pennation_angle_at_optimal=0.1680443
      PathPoint P1: pelvis (-0.0858045 -0.10572 -0.03906275)
      PathPoint P2: femur_l (0.005569252 -0.4716933 0.03789639)
      PathWrap: wrap_object=AMisch_at_condyles_l method=hybrid
    DeGrooteFregly2016Muscle addmagMid_l: max_isometric_force=461.4048 optimal_fiber_length=0.1744056
        tendon_slack_length=0.05905688 pennation_angle_at_optimal=0.2073076 ignore_tendon_compliance=true
      PathPoint P1: pelvis (-0.05041804 -0.09837927 -0.02672863)
      PathPoint P2: femur_l (0.002801994 -0.1974457 -0.03383234)
      PathWrap: wrap_object=AMmid_at_femshaft_l method=hybrid
    DeGrooteFregly2016Muscle addmagProx_l: max_isometric_force=526.2606 optimal_fiber_length=0.1172659
        tendon_slack_length=0.04477879 pennation_angle_at_optimal=0.3114833 ignore_tendon_compliance=true
      PathPoint P1: pelvis (-0.02966105 -0.08762476 -0.01278366)
      PathPoint P2: femur_l (-0.01768035 -0.09587787 -0.03707432)
      PathWrap: wrap_object=AMprox_at_femshaft_l method=hybrid
    DeGrooteFregly2016Muscle bflh140_l: max_isometric_force=1038.718 optimal_fiber_length=0.120725
        tendon_slack_length=0.4112815 pennation_angle_at_optimal=0.1759182
      PathPoint bflh_l-P1: pelvis (-0.09957229 -0.09703495 -0.05488078)
      PathPoint bflh_l-P2: tibia_l (-0.03499047 -0.04042457 -0.03684387)
      PathPoint bflh_l-P3: tibia_l (-0.02753616 -0.05549513 -0.03539781)
    DeGrooteFregly2016Muscle bfsh140_l: max_isometric_force=454.5792 optimal_fiber_length=0.1322605
        tendon_slack_length=0.1268852 pennation_angle_at_optimal=0.2642232 ignore_tendon_compliance=true
      PathPoint bfsh_l-P1: femur_l (0.005789243 -0.2566551 -0.02709366)
      PathPoint bfsh_l-P2: tibia_l (-0.02918588 -0.03639098 -0.0326279)
      PathWrap: wrap_object=BF140_at_gastroc_l method=hybrid
    DeGrooteFregly2016Muscle edl_l: max_isometric_force=564.018 optimal_fiber_length=0.07254975
        tendon_slack_length=0.3861733 pennation_angle_at_optimal=0.2182582
      PathPoint P1: tibia_l (-0.01629358 -0.1282106 -0.02087615)
      PathPoint P2: tibia_l (0.01670092 -0.4166568 -0.01140551)
      PathPoint P3: calcn_l (0.08714127 0.05242584 -0.001162613)
      PathPoint P4: calcn_l (0.1532321 0.008009504 -0.01889246)
      PathPoint P5: toes_l (0.0002844655 0.006844485 -0.02223497)
      PathPoint P6: toes_l (0.04200607 -0.0005825094 -0.03633165)
    DeGrooteFregly2016Muscle ehl_l: max_isometric_force=268.0161 optimal_fiber_length=0.07805942
        tendon_slack_length=0.3410354 pennation_angle_at_optimal=0.1972681
      PathPoint P1: tibia_l (-0.01425689 -0.1717601 -0.0192468)
      PathPoint P2: tibia_l (0.007230278 -0.3223549 -0.01670092)
      PathPoint P3: tibia_l (0.02036698 -0.4092323 0.002851377)
      PathPoint P4: calcn_l (0.09197718 0.05664904 0.03066391)
      PathPoint P5: calcn_l (0.1226046 0.04499885 0.03734894)
      PathPoint P6: calcn_l (0.1644211 0.0202422 0.04069145)
      PathPoint P7: toes_l (0.02825691 0.005970721 0.03560502)
      PathPoint P8: toes_l (0.05338469 0.00495133 0.02703075)
    DeGrooteFregly2016Muscle fdl_l: max_isometric_force=390.3847 optimal_fiber_length=0.04730247
        tendon_slack_length=0.401724 pennation_angle_at_optimal=0.2248391
      PathPoint P1: tibia_l (-0.002342203 -0.2030094 0.001833028)
      PathPoint P2: tibia_l (-0.01792294 -0.4039133 0.01262753)
      PathPoint P3: calcn_l (0.04134232 0.04587261 0.04069145)
      PathPoint P4: calcn_l (0.06713386 0.02563041 0.0382209)
      PathPoint P5: calcn_l (0.1572146 -0.01179582 -0.01685789)
      PathPoint P6: toes_l (-0.001801615 -0.01135893 -0.02136301)
      PathPoint P7: toes_l (0.02702422 -0.01033954 -0.03124522)
      PathPoint P8: toes_l (0.04181643 -0.008737641 -0.03516904)
    DeGrooteFregly2016Muscle fhl_l: max_isometric_force=864.169 optimal_fiber_length=0.05416773
        tendon_slack_length=0.3642083 pennation_angle_at_optimal=0.2580255
      PathPoint P1: tibia_l (-0.03156882 -0.2396885 -0.02036698)
      PathPoint P2: tibia_l (-0.02464405 -0.4067944 0.007739452)
      PathPoint P3: calcn_l (0.03546337 0.04019315 0.03502371)
      PathPoint P4: calcn_l (0.09842506 0.00990266 0.03720361)
      PathPoint P5: calcn_l (0.1636625 -0.007718249 0.03909286)
      PathPoint P6: toes_l (0.01469738 -0.00932015 0.03851155)
      PathPoint P7: toes_l (0.05328987 -0.01485399 0.02630412)
    DeGrooteFregly2016Muscle gaslat140_l: max_isometric_force=1418.345 optimal_fiber_length=0.07496934
        tendon_slack_length=0.4063555 pennation_angle_at_optimal=0.2102268
      PathPoint gaslat_l-P1: femur_l (0.002315697 -0.4632192 -0.0238401)
      PathPoint gaslat_l-P2: calcn_l (0.004172161 0.04514448 0.00770231)
      PathWrap: wrap_object=GasLat_at_shank_l method=hybrid
      PathWrap pathwrap_0: wrap_object=GasLat_at_condyles_l method=hybrid
    DeGrooteFregly2016Muscle gasmed_l: max_isometric_force=2810.061 optimal_fiber_length=0.06400085
        tendon_slack_length=0.4198022 pennation_angle_at_optimal=0.1656816
      PathPoint P1: femur_l (0.006947092 -0.4680824 0.02547267)
      PathPoint P2: calcn_l (0.004172161 0.04514448 0.00770231)
      PathWrap: wrap_object=GasMed_at_shank_l method=hybrid
      PathWrap pathwrap_0: wrap_object=GasMed_at_condyles_l method=hybrid
    DeGrooteFregly2016Muscle glmax1_l: max_isometric_force=1002.019 optimal_fiber_length=0.1412084
        tendon_slack_length=0.08386051 pennation_angle_at_optimal=0.3540118 ignore_tendon_compliance=true
      PathPoint P1: pelvis (-0.1178591 0.02810836 -0.05272676)
      PathPoint P2: pelvis (-0.1203484 -0.01971659 -0.07295585)
      PathPoint P3: femur_l (-0.05140848 -0.03963503 -0.03496703)
      PathPoint P4: femur_l (-0.03207241 -0.06881419 -0.05441889)
      PathWrap: wrap_object=Gmax1_at_pelvis_l method=hybrid
    DeGrooteFregly2016Muscle glmax2_l: max_isometric_force=1347.469 optimal_fiber_length=0.1602877
        tendon_slack_length=0.1112825 pennation_angle_at_optimal=0.3673821 ignore_tendon_compliance=true
      PathPoint P1: pelvis (-0.126093 0.007088196 -0.04326778)
      PathPoint P2: pelvis (-0.128678 -0.04961737 -0.07614006)
      PathPoint P3: femur_l (-0.05210319 -0.07100263 -0.02917779)
      PathPoint P4: femur_l (-0.01806244 -0.1235251 -0.04851386)
      PathWrap: wrap_object=Gmax2_at_pelvis_l method=hybrid
    DeGrooteFregly2016Muscle glmax3_l: max_isometric_force=852.9296 optimal_fiber_length=0.1815594
        tendon_slack_length=0.1119797 pennation_angle_at_optimal=0.3824161 ignore_tendon_compliance=true
      PathPoint P1: pelvis (-0.1244654 -0.04277359 -0.008428789)
      PathPoint P2: pelvis (-0.1218803 -0.102901 -0.04073915)
      PathPoint P3: femur_l (-0.03253555 -0.1367773 -0.01088378)
      PathPoint P4: femur_l (-0.006947092 -0.1725218 -0.04758758)
      PathWrap: wrap_object=Gmax3_at_pelvis_l method=hybrid
    DeGrooteFregly2016Muscle glmed1_l: max_isometric_force=1192.733 optimal_fiber_length=0.06547942
        tendon_slack_length=0.05006649 pennation_angle_at_optimal=0.3165559 ignore_tendon_compliance=true
      PathPoint P1: pelvis (-0.04260545 0.01996101 -0.1097616)
      PathPoint P2: femur_l (-0.0252411 -0.01422484 -0.0642606)
    DeGrooteFregly2016Muscle glmed2_l: max_isometric_force=824.6703 optimal_fiber_length=0.06626369
        tendon_slack_length=0.05922777 pennation_angle_at_optimal=0.3165559 ignore_tendon_compliance=true
      PathPoint P1: pelvis (-0.0813812 0.02574563 -0.06321592)
      PathPoint P2: femur_l (-0.0298725 -0.007051631 -0.06101863)
    DeGrooteFregly2016Muscle glmed3_l: max_isometric_force=889.1862 optimal_fiber_length=0.06997893
        tendon_slack_length=0.0433609 pennation_angle_at_optimal=0.3165559 ignore_tendon_compliance=true
      PathPoint P1: pelvis (-0.1102955 -0.005947566 -0.04926159)
      PathPoint P2: femur_l (-0.03577752 -0.005714253 -0.05997656)
    DeGrooteFregly2016Muscle glmin1_l: max_isometric_force=382.8755 optimal_fiber_length=0.06499739
        tendon_slack_length=0.0154252 pennation_angle_at_optimal=0.1745329 ignore_tendon_compliance=true
      PathPoint P1: pelvis (-0.04442456 -0.01213955 -0.09758664)
      PathPoint P2: femur_l (-0.008336511 -0.0126443 -0.06483953)
    DeGrooteFregly2016Muscle glmin2_l: max_isometric_force=401.0986 optimal_fiber_length=0.05393309
        tendon_slack_length=0.02513576 pennation_angle_at_optimal=0 ignore_tendon_compliance=true
      PathPoint P1: pelvis (-0.05897743 -0.01156924 -0.09093726)
      PathPoint P2: femur_l (-0.01111535 -0.0126443 -0.06483953)
    DeGrooteFregly2016Muscle glmin3_l: max_isometric_force=447.1746 optimal_fiber_length=0.03714615
        tendon_slack_length=0.04972941 pennation_angle_at_optimal=0.01745329
      PathPoint P1: pelvis (-0.0755409 -0.01262839 -0.07473526)
      PathPoint P2: femur_l (-0.01563096 -0.01009113 -0.06368168)
    DeGrooteFregly2016Muscle grac_l: max_isometric_force=222.3167 optimal_fiber_length=0.2820258
        tendon_slack_length=0.2129602 pennation_angle_at_optimal=0.1720016 ignore_tendon_compliance=true
      PathPoint P1: pelvis (-0.04534369 -0.1053615 -0.02300123)
      PathPoint P2: tibia_l (-0.01875799 -0.05269157 0.03015331)
      PathPoint P3: tibia_l (0.001812661 -0.07714799 0.01601863)
      PathWrap: wrap_object=GR_at_condyles_l method=hybrid
    DeGrooteFregly2016Muscle iliacus_l: max_isometric_force=1040.141 optimal_fiber_length=0.102393
        tendon_slack_length=0.09232728 pennation_angle_at_optimal=0.279914 ignore_tendon_compliance=true
      PathPoint P1: pelvis (-0.05792426 0.02517532 -0.07894965)
      PathPoint P2: pelvis (-0.01292525 -0.04538075 -0.07080182)
      PathPoint P3: femur_l (-0.002663052 -0.06869261 -0.0160941)
      PathPoint P4: femur_l (-0.01412575 -0.07744636 -0.02269383)
      PathWrap: wrap_object=IL_at_brim_l method=hybrid range=(2 3)
    DeGrooteFregly2016Muscle perbrev_l: max_isometric_force=468.2474 optimal_fiber_length=0.04944312
        tendon_slack_length=0.1606657 pennation_angle_at_optimal=0.2052361
      PathPoint P1: tibia_l (-0.02474588 -0.2805784 -0.02556056)
      PathPoint P2: tibia_l (-0.03452203 -0.4313949 -0.02535689)
      PathPoint P3: tibia_l (-0.02902295 -0.4436951 -0.0259679)
      PathPoint P4: calcn_l (0.04466108 0.03931938 -0.0338611)
      PathPoint P5: calcn_l (0.06419438 0.03189239 -0.04984703)
    DeGrooteFregly2016Muscle perlong_l: max_isometric_force=977.8181 optimal_fiber_length=0.05669501
        tendon_slack_length=0.3707728 pennation_angle_at_optimal=0.2479525
      PathPoint P1: tibia_l (-0.02036698 -0.1521462 -0.02871744)
      PathPoint P2: tibia_l (-0.03228166 -0.4321706 -0.02413487)
      PathPoint P3: tibia_l (-0.02769909 -0.4448033 -0.02444038)
      PathPoint P4: calcn_l (0.04153196 0.03349429 -0.03211718)
      PathPoint P5: calcn_l (0.06457367 0.0154365 -0.04127276)
      PathPoint P6: calcn_l (0.0807882 0.01004829 -0.01714854)
      PathPoint P7: calcn_l (0.1140707 0.01237832 0.0267401)
    DeGrooteFregly2016Muscle piri_l: max_isometric_force=1055.498 optimal_fiber_length=0.02481892
        tendon_slack_length=0.1096865 pennation_angle_at_optimal=0.1745329
      PathPoint P1: pelvis (-0.09747552 -0.00532022 -0.01265255)
      PathPoint P2: pelvis (-0.09767658 -0.02497978 -0.05705353)
      PathPoint P3: femur_l (-0.01713616 -0.004376875 -0.05059799)
    DeGrooteFregly2016Muscle psoas_l: max_isometric_force=1496.961 optimal_fiber_length=0.1090144
        tendon_slack_length=0.09282839 pennation_angle_at_optimal=0.2155251 ignore_tendon_compliance=true
      PathPoint P1: pelvis (-0.05802001 0.05051358 -0.03652475)
      PathPoint P2: pelvis (-0.01962723 -0.05328368 -0.0614365)
      PathPoint P3: femur_l (-0.0152836 -0.05677779 -0.005326104)
      PathPoint P4: femur_l (-0.02720944 -0.06370784 -0.01018907)
      PathWrap: wrap_object=PS_at_brim_l method=hybrid range=(2 3)
    DeGrooteFregly2016Muscle recfem_l: max_isometric_force=1823.174 optimal_fiber_length=0.08927349
        tendon_slack_length=0.5297599 pennation_angle_at_optimal=0.2170149
      PathPoint P1: pelvis (-0.02297822 -0.03161172 -0.08737844)
      PathPoint P2: patella_l (0.01215798 0.05957413 -0.0008510589)
      PathPoint P3: patella_l (0.01471116 0.05313039 0.001215798)
      PathPoint P4: patella_l (0.006078992 0.003003022 -3.647395e-5)
      PathPoint P5: tibia_l (0.03319818 -0.06994515 0.000478624)
      PathWrap: wrap_object=KnExt_at_fem_l method=hybrid
    DeGrooteFregly2016Muscle sart_l: max_isometric_force=213.3781 optimal_fiber_length=0.4608868
        tendon_slack_length=0.1418111 pennation_angle_at_optimal=0.02613542 ignore_tendon_compliance=true
      PathPoint P1: pelvis (-0.0186698 -0.01270987 -0.09889779)
      PathPoint P2: femur_l (-0.003473546 -0.4337969 0.04874543)
      PathPoint P3: tibia_l (-0.02556056 -0.044436 0.03716974)
      PathPoint P4: tibia_l (-0.01619175 -0.06637697 0.02688441)
      PathPoint P5: tibia_l (0.01384955 -0.0897585 0.002647707)
    DeGrooteFregly2016Muscle semimem_l: max_isometric_force=1741.42 optimal_fiber_length=0.1063487
        tendon_slack_length=0.4142651 pennation_angle_at_optimal=0.2545615
      PathPoint P1: pelvis (-0.09449793 -0.0928798 -0.05750307)
      PathPoint P2: tibia_l (-0.02749542 -0.04543332 0.01995964)
      PathWrap: wrap_object=SM_at_condyles_l method=hybrid
    DeGrooteFregly2016Muscle semiten_l: max_isometric_force=470.2443 optimal_fiber_length=0.2374421
        tendon_slack_length=0.3041214 pennation_angle_at_optimal=0.241295
      PathPoint P1: pelvis (-0.0993808 -0.1020863 -0.0482314)
      PathPoint P2: tibia_l (-0.03177249 -0.05629299 0.02332019)
      PathPoint P3: tibia_l (0.001934863 -0.08565842 0.01191468)
      PathWrap: wrap_object=ST_at_condyles_l method=hybrid
    DeGrooteFregly2016Muscle soleus_l: max_isometric_force=5646.255 optimal_fiber_length=0.04723263
        tendon_slack_length=0.3020205 pennation_angle_at_optimal=0.3814289
      PathPoint P1: tibia_l (-0.007739452 -0.1015047 -0.00997982)
      PathPoint P2: calcn_l (0.004172161 0.04514448 0.00770231)
    DeGrooteFregly2016Muscle tfl_l: max_isometric_force=353.7879 optimal_fiber_length=0.108034
        tendon_slack_length=0.5111679 pennation_angle_at_optimal=0.05235988
      PathPoint P1: pelvis (-0.02977594 0.01743533 -0.1162236)
      PathPoint P2: femur_l (0.03404075 -0.1209719 -0.06912357)
      PathPoint P3: femur_l (0.01238898 -0.4923984 -0.0375143)
      PathPoint P4: tibia_l (0.01099817 -0.04543332 -0.03523487)
    DeGrooteFregly2016Muscle tibant_l: max_isometric_force=1110.016 optimal_fiber_length=0.07389512
        tendon_slack_length=0.2601595 pennation_angle_at_optimal=0.1951828
      PathPoint P1: tibia_l (0.01568257 -0.1453866 -0.01649725)
      PathPoint P2: tibia_l (0.02556056 -0.2112095 -0.01303487)
      PathPoint P3: tibia_l (0.02372753 -0.4054647 0.01344221)
      PathPoint P4: calcn_l (0.1105623 0.02592167 0.04432462)
    DeGrooteFregly2016Muscle tibpost_l: max_isometric_force=1573.393 optimal_fiber_length=0.04066859
        tendon_slack_length=0.3020876 pennation_angle_at_optimal=0.2264891
      PathPoint P1: tibia_l (-0.004175231 -0.1445001 -0.01048899)
      PathPoint P2: tibia_l (-0.01670092 -0.4050214 0.01782111)
      PathPoint P3: calcn_l (0.0395407 0.04863953 0.04156341)
      PathPoint P4: calcn_l (0.07320246 0.02315475 0.04083678)
    DeGrooteFregly2016Muscle vasint_l: max_isometric_force=1386.376 optimal_fiber_length=0.1401517
        tendon_slack_length=0.245565 pennation_angle_at_optimal=0.06309973
      PathPoint P1: femur_l (0.03357761 -0.2339196 -0.03589331)
      PathPoint P2: femur_l (0.03878793 -0.2533724 -0.03299869)
      PathPoint P3: patella_l (0.007051631 0.05835833 0.0007294791)
      PathPoint P4: patella_l (0.006078992 0.003003022 0.0004741614)
      PathPoint P5: tibia_l (0.03316763 -0.0700338 -0.0004378901)
      PathWrap: wrap_object=KnExt_at_fem_l method=hybrid
    DeGrooteFregly2016Muscle vaslat140_l: max_isometric_force=4209.863 optimal_fiber_length=0.1400041
        tendon_slack_length=0.2644522 pennation_angle_at_optimal=0.2528673
      PathPoint vaslat_l-P1: femur_l (0.005557674 -0.225409 -0.04040892)
      PathPoint vaslat_l-P2: femur_l (0.03114613 -0.3150134 -0.04735601)
      PathPoint vaslat_l-P3: patella_l (0.01252272 0.05142828 -0.01714276)
      PathPoint vaslat_l-P4: patella_l (0.006078992 0.003003022 -0.008911803)
      PathPoint vaslat_l-P5: tibia_l (0.03313708 -0.07023326 -0.005203763)
      PathWrap: wrap_object=KnExtVL_at_fem_l method=hybrid
    DeGrooteFregly2016Muscle vasmed_l: max_isometric_force=2247.469 optimal_fiber_length=0.1315853
        tendon_slack_length=0.2488159 pennation_angle_at_optimal=0.4222225
      PathPoint P1: femur_l (0.01620988 -0.2551961 -0.02176756)
      PathPoint P2: femur_l (0.04121941 -0.3366546 -0.001042064)
      PathPoint P3: patella_l (0.00765953 0.05410303 0.02066857)
      PathPoint P4: patella_l (0.006078992 0.003003022 0.01033429)
      PathPoint P5: tibia_l (0.03248533 -0.0704438 0.006904406)
      PathWrap: wrap_object=KnExt_at_fem_l method=hybrid
    ObjectGroup right_leg
    ObjectGroup left_leg
    ObjectGroup hip_add_r
    ObjectGroup hip_abd_r
    ObjectGroup hip_flex_r
    ObjectGroup hip_ext_r
    ObjectGroup hip_inrot_r
    ObjectGroup hip_exrot_r
    ObjectGroup knee_flex_r
    ObjectGroup knee_ext_r
    ObjectGroup ankle_df_r
    ObjectGroup ankle_pf_r
    ObjectGroup everter_r
    ObjectGroup inverter_r
    ObjectGroup hip_add_l
    ObjectGroup hip_abd_l
    ObjectGroup hip_flex_l
    ObjectGroup hip_ext_l
    ObjectGroup hip_exrot_l
    ObjectGroup hip_inrot_l
    ObjectGroup knee_flex_l
    ObjectGroup knee_ext_l
    ObjectGroup ankle_df_l
    ObjectGroup ankle_pf_l
    ObjectGroup everter_l
    ObjectGroup inverter_l
  ContactGeometrySet:
    ContactSphere heel_r: socket_frame=/bodyset/calcn_r location=(0.02951843 0.005146046 0) radius=0.04
    ContactSphere mh1_r: socket_frame=/bodyset/calcn_r location=(0.1715994 -0.01485395 -0.03318279) radius=0.02
    ContactSphere mh3_r: socket_frame=/bodyset/calcn_r location=(0.1563252 -0.01485395 0.01673567) radius=0.02
    ContactSphere mh5_r: socket_frame=/bodyset/calcn_r location=(0.1348281 -0.01485395 0.05338101) radius=0.02
    ContactSphere hallux_r: socket_frame=/bodyset/toes_r location=(0.05298839 -0.01485395 -0.02611341) radius=0.02
    ContactSphere othertoes_r: socket_frame=/bodyset/toes_r location=(0.04157986 -0.01485395 0.03491407) radius=0.02
    ContactSphere heel_l: socket_frame=/bodyset/calcn_l location=(0.02968636 0.005146046 0) radius=0.04
    ContactSphere mh1_l: socket_frame=/bodyset/calcn_l location=(0.1725757 -0.01485395 0.03342521) radius=0.02
    ContactSphere mh3_l: socket_frame=/bodyset/calcn_l location=(0.1572145 -0.01485395 -0.01685793) radius=0.02
    ContactSphere mh5_l: socket_frame=/bodyset/calcn_l location=(0.1355952 -0.01485395 -0.05377099) radius=0.02
    ContactSphere hallux_l: socket_frame=/bodyset/toes_l location=(0.05328985 -0.01485395 0.02630419) radius=0.02
    ContactSphere othertoes_l: socket_frame=/bodyset/toes_l location=(0.04181641 -0.01485395 -0.03516913) radius=0.02
    ContactHalfSpace floor: socket_frame=/ground orientation=(0 0 -1.570796)
