# OpenSim document version 40000
ExternalLoads:
  datafile: refGRF.mot
  ExternalForce RightGRF1: applied_to_body=calcn_r force_expressed_in_body=ground point_expressed_in_body=ground
      force_identifier=ground_force_7_v point_identifier=ground_force_7_p torque_identifier=ground_force_7_m
  ExternalForce RightGRF2: applied_to_body=calcn_r force_expressed_in_body=ground point_expressed_in_body=ground
      force_identifier=ground_force_3_v point_identifier=ground_force_3_p torque_identifier=ground_force_3_m
  ExternalForce LeftGRF1: applied_to_body=calcn_l force_expressed_in_body=ground point_expressed_in_body=ground
      force_identifier=ground_force_5_v point_identifier=ground_force_5_p torque_identifier=ground_force_5_m
  ExternalForce LeftGRF2: applied_to_body=calcn_l force_expressed_in_body=ground point_expressed_in_body=ground
      force_identifier=ground_force_1_v point_identifier=ground_force_1_p torque_identifier=ground_force_1_m
