# OpenSim document version 20001
# Generated from Matlab OSIM Model Tree v1.0
Model JA1_SCALED:
  length_units: meters
  force_units: N
  gravity: 0 -9.8066 0
  credits:
    Delp S.L., Loan J.P., Hoy M.G., Zajac F.E., Topp E.L., Rosen J.M., Thelen D.G., Anderson F.C., Seth A., Hamner S.R.
  publications:
    Notes: 3D, 23 DOF gait model created by D.G. Thelen, Univ. of Wisconsin-Madison, and Ajay Seth, Frank C. Anderson, and Scott L. Delp, Stanford University. Lower extremity joint defintions based on Delp et al. (1990). Low back joint and anthropometry based on Anderson and Pandy (1999, 2001). Planar knee model of Yamaguchi and Zajac (1989). Seth removed the patella to avoid kinematic constraints; insertions of the quadrucepts are handled with moving points in the tibia frame. Delp, S.L., Loan, J.P., Hoy, M.G., Zajac, F.E., Topp E.L., Rosen, J.M.: An interactive graphics-based model of the lower extremity to study orthopaedic surgical procedures, IEEE Transactions on Biomedical Engineering, vol. 37, pp. 757-767, 1990. Yamaguchi G.T., Zajac F.E.: A planar model of the knee joint to characterize the knee extensor mechanism." J . Biomecl7. vol. 21. pp. 1-10. 1989. Anderson F.C., Pandy M.G.: A dynamic optimization solution for vertical jumping in three dimensions. Computer Methods in Biomechanics and Biomedical Engineering 2:201-231, 1999. Anderson F.C., Pandy M.G.: Dynamic optimization of human walking. Journal of Biomechanical Engineering 123:381-390, 2001.
  defaults: Thelen2003Muscle default: max_isometric_force=0 optimal_fiber_length=0 tendon_slack_length=0
      pennation_angle=0 activation_time_constant=0.01 deactivation_time_constant=0.04 Vmax=20 Vmax0=10
      FmaxTendonStrain=0.033 FmaxMuscleStrain=0.6 KshapeActive=0.55 KshapePassive=3.3 damping=0.05 Af=0.75 Flen=2.4
      min_control=0.01 minimum_activation=0.01 max_control=1
    # maximum isometric force of the muscle fibers
    # optimal length of the muscle fibers
    # resting length of the tendon
    # angle between tendon and fibers at optimal fiber length
    # time constant for ramping up of muscle activation
    # time constant for ramping down of muscle activation
    # maximum contraction velocity at full activation in fiber lengths per
    # second
    # maximum contraction velocity at low activation in fiber lengths per
    # second
    # tendon strain due to maximum isometric muscle force
    # passive muscle strain due to maximum isometric muscle force
    # shape factor for Gaussian active muscle force-length relationship
    # exponential shape factor for passive force-length relationship
    # passive damping in the force-velocity relationship
    # force-velocity shape factor
  BodySet:
    Body ground: mass=0 mass_center=(0 0 0) inertia_xx=0 inertia_yy=0 inertia_zz=0 meshes=platform_800x85cm.vtp
    Body pelvis: mass=11.8962 mass_center=(-0.059934 0 0) inertia_xx=0.074625 inertia_yy=0.063228 inertia_zz=0.042031
        meshes=(sacrum.vtp pelvis.vtp l_pelvis.vtp)
      CustomJoint ground_pelvis: parent_body=ground location_in_parent=(0 0 0) location=(0 0 0)
        SpatialTransform:
          # 3 Axes for rotations are listed first.
          TransformAxis rotation1: coordinates=pelvis_tilt axis=(0 0 1) LinearFunction(coefficients=1 0)
          TransformAxis rotation2: coordinates=pelvis_list axis=(1 0 0) LinearFunction(coefficients=1 0)
          TransformAxis rotation3: coordinates=pelvis_rotation axis=(0 1 0) LinearFunction(coefficients=1 0)
          TransformAxis translation1: coordinates=pelvis_tx axis=(1 0 0)
              MultiplierFunction(scale=1, LinearFunction(coefficients=1 0))
          TransformAxis translation2: coordinates=pelvis_ty axis=(0 1 0)
              MultiplierFunction(scale=1, LinearFunction(coefficients=1 0))
          TransformAxis translation3: coordinates=pelvis_tz axis=(0 0 1)
              MultiplierFunction(scale=1, LinearFunction(coefficients=1 0))
        Coordinate pelvis_tilt: motion_type=rotational default_value=0.046444 initial_value=0.046444
            range=(-1.5708 1.5708) clamped=true
        Coordinate pelvis_list: motion_type=rotational default_value=-0.077712 initial_value=-0.077712
            range=(-1.5708 1.5708) clamped=true
        Coordinate pelvis_rotation: motion_type=rotational default_value=0.10907 initial_value=0.10907
            range=(-1.5708 1.5708) clamped=true
        Coordinate pelvis_tx: motion_type=translational default_value=7.3232 initial_value=7.3232 range=(-20 20)
            clamped=true
        Coordinate pelvis_ty: motion_type=translational default_value=1.0203 initial_value=1.0203 range=(-2 4)
            clamped=true
        Coordinate pelvis_tz: motion_type=translational default_value=-0.016299 initial_value=-0.016299 range=(-5 5)
            clamped=true
    Body femur_r: mass=9.3956 mass_center=(0 -0.18169 0) inertia_xx=0.15833 inertia_yy=0.048143 inertia_zz=0.15833
        meshes=femur.vtp
      CustomJoint hip_r: parent_body=pelvis location_in_parent=(-0.059934 -0.056035 0.070785) location=(0 0 0)
        SpatialTransform: axes_held_at_zero=(translation1 translation2 translation3)
          # 3 Axes for rotations are listed first.
          TransformAxis rotation1: coordinates=hip_flexion_r axis=(0 0 1) LinearFunction(coefficients=1 0)
          TransformAxis rotation2: coordinates=hip_adduction_r axis=(1 0 0) LinearFunction(coefficients=1 0)
          TransformAxis rotation3: coordinates=hip_rotation_r axis=(0 1 0) LinearFunction(coefficients=1 0)
        Coordinate hip_flexion_r: motion_type=rotational default_value=0.31507 initial_value=0.31507
            range=(-0.69813 1.7453) clamped=true
        Coordinate hip_adduction_r: motion_type=rotational default_value=0.073435 initial_value=0.073435
            range=(-0.5236 0.5236) clamped=true
        Coordinate hip_rotation_r: motion_type=rotational default_value=-0.23431 initial_value=-0.23431
            range=(-0.5236 0.5236) clamped=true
    Body tibia_r: mass=3.745 mass_center=(0 -0.2131 0) inertia_xx=0.066131 inertia_yy=0.0063251 inertia_zz=0.066131
        meshes=(tibia.vtp fibula.vtp)
      CustomJoint knee_r: parent_body=femur_r location_in_parent=(0 0 0) location=(0 0 0)
        SpatialTransform: axes_held_at_zero=(rotation2 rotation3 translation3)
          # 3 Axes for rotations are listed first.
          TransformAxis rotation1: coordinates=knee_angle_r axis=(0 0 1) LinearFunction(coefficients=1 0)
          TransformAxis translation1: coordinates=knee_angle_r axis=(1 0 0)
            MultiplierFunction: scale=1.0688
              NaturalCubicSpline: x=(-2.0944 -1.7453 -1.3963 -1.0472 -0.69813 -0.34907 -0.17453 0.19734 0.33739 0.49018 1.5215 2.0944)
                  y=(-0.0032 0.00179 0.00411 0.0041 0.00212 -0.001 -0.0031 -0.005227 -0.005435 -0.005574 -0.005435 -0.00525)
          TransformAxis translation2: coordinates=knee_angle_r axis=(0 1 0)
            MultiplierFunction: scale=1.0688
              NaturalCubicSpline: x=(-2.0944 -1.2217 -0.5236 -0.34907 -0.17453 0.15915 2.0944)
                  y=(-0.4226 -0.4082 -0.399 -0.3976 -0.3966 -0.39526 -0.396)
        Coordinate knee_angle_r: motion_type=rotational default_value=-0.22783 initial_value=-0.22783
            range=(-2.7925 0.17453) clamped=true
    Body talus_r: mass=0.10101 mass_center=(0 0 0) inertia_xx=0.0012402 inertia_yy=0.0012781 inertia_zz=0.0012781
        meshes=talus.vtp
      CustomJoint ankle_r: parent_body=tibia_r location_in_parent=(0 -0.4908 0) location=(0 0 0)
        SpatialTransform: axes_held_at_zero=(rotation2 rotation3 translation1 translation2 translation3)
          # 3 Axes for rotations are listed first.
          TransformAxis rotation1: coordinates=ankle_angle_r axis=(-0.10501 -0.17402 0.97913)
              LinearFunction(coefficients=1 0)
        Coordinate ankle_angle_r: motion_type=rotational default_value=-0.053216 initial_value=-0.053216
            range=(-1.0472 0.69813) clamped=true
    Body calcn_r: mass=1.2627 mass_center=(0.096187 0.028856 0) inertia_xx=0.0016498 inertia_yy=0.0038155
        inertia_zz=0.0038155 meshes=foot.vtp
      CustomJoint subtalar_r: parent_body=talus_r location_in_parent=(-0.055666 -0.047881 0.0085195) location=(0 0 0)
        SpatialTransform: axes_held_at_zero=(rotation2 rotation3 translation1 translation2 translation3)
          # 3 Axes for rotations are listed first.
          TransformAxis rotation1: coordinates=subtalar_angle_r axis=(0.78718 0.60475 -0.12095)
              LinearFunction(coefficients=1 0)
        Coordinate subtalar_angle_r: motion_type=rotational default_value=0.19028 initial_value=0.19028
            range=(-0.87266 0.87266) clamped=true
    Body toes_r: mass=0.21879 mass_center=(0.033281 0.0057712 -0.021225) inertia_xx=0.00011784 inertia_yy=0.00019911
        inertia_zz=0.00019911 meshes=bofoot.vtp
      CustomJoint mtp_r: parent_body=calcn_r location_in_parent=(0.17198 -0.0019237 0.0013099) location=(0 0 0)
        SpatialTransform: axes_held_at_zero=(rotation2 rotation3 translation1 translation2 translation3)
          # 3 Axes for rotations are listed first.
          TransformAxis rotation1: coordinates=mtp_angle_r axis=(-0.58095 0 0.81394) LinearFunction(coefficients=1 0)
        Coordinate mtp_angle_r: motion_type=rotational default_value=0 initial_value=0 range=(-1.0472 1.0472)
            clamped=true
    Body femur_l: mass=9.3956 mass_center=(0 -0.18169 0) inertia_xx=0.15833 inertia_yy=0.048143 inertia_zz=0.15833
        meshes=l_femur.vtp
      CustomJoint hip_l: parent_body=pelvis location_in_parent=(-0.059934 -0.056035 -0.070785) location=(0 0 0)
        SpatialTransform: axes_held_at_zero=(translation1 translation2 translation3)
          # 3 Axes for rotations are listed first.
          TransformAxis rotation1: coordinates=hip_flexion_l axis=(0 0 1) LinearFunction(coefficients=1 0)
          TransformAxis rotation2: coordinates=hip_adduction_l axis=(-1 0 0) LinearFunction(coefficients=1 0)
          TransformAxis rotation3: coordinates=hip_rotation_l axis=(0 -1 0) LinearFunction(coefficients=1 0)
        Coordinate hip_flexion_l: motion_type=rotational default_value=-0.19084 initial_value=-0.19084
            range=(-0.69813 1.7453) clamped=true
        Coordinate hip_adduction_l: motion_type=rotational default_value=-0.094209 initial_value=-0.094209
            range=(-0.5236 0.5236) clamped=true
        Coordinate hip_rotation_l: motion_type=rotational default_value=0.10552 initial_value=0.10552
            range=(-0.5236 0.5236) clamped=true
    Body tibia_l: mass=3.745 mass_center=(0 -0.2131 0) inertia_xx=0.066131 inertia_yy=0.0063251 inertia_zz=0.066131
        meshes=(l_tibia.vtp l_fibula.vtp)
      CustomJoint knee_l: parent_body=femur_l location_in_parent=(0 0 0) location=(0 0 0)
        SpatialTransform: axes_held_at_zero=(rotation2 rotation3 translation3)
          # 3 Axes for rotations are listed first.
          TransformAxis rotation1: coordinates=knee_angle_l axis=(0 0 1) LinearFunction(coefficients=1 0)
          TransformAxis translation1: coordinates=knee_angle_l axis=(1 0 0)
            MultiplierFunction: scale=1.0688
              NaturalCubicSpline: x=(-2.0944 -1.7453 -1.3963 -1.0472 -0.69813 -0.34907 -0.17453 0.19734 0.33739 0.49018 1.5215 2.0944)
                  y=(-0.0032 0.00179 0.00411 0.0041 0.00212 -0.001 -0.0031 -0.005227 -0.005435 -0.005574 -0.005435 -0.00525)
          TransformAxis translation2: coordinates=knee_angle_l axis=(0 1 0)
            MultiplierFunction: scale=1.0688
              NaturalCubicSpline: x=(-2.0944 -1.2217 -0.5236 -0.34907 -0.17453 0.15915 2.0944)
                  y=(-0.4226 -0.4082 -0.399 -0.3976 -0.3966 -0.39526 -0.396)
        Coordinate knee_angle_l: motion_type=rotational default_value=-1.2243 initial_value=-1.2243
            range=(-2.7925 0.17453) clamped=true
    Body talus_l: mass=0.10101 mass_center=(0 0 0) inertia_xx=0.0012402 inertia_yy=0.0012781 inertia_zz=0.0012781
        meshes=l_talus.vtp
      CustomJoint ankle_l: parent_body=tibia_l location_in_parent=(0 -0.4908 0) location=(0 0 0)
        SpatialTransform: axes_held_at_zero=(rotation2 rotation3 translation1 translation2 translation3)
          # 3 Axes for rotations are listed first.
          TransformAxis rotation1: coordinates=ankle_angle_l axis=(0.10501 0.17402 0.97913)
              LinearFunction(coefficients=1 0)
        Coordinate ankle_angle_l: motion_type=rotational default_value=-0.27974 initial_value=-0.27974
            range=(-1.0472 0.69813) clamped=true
    Body calcn_l: mass=1.2627 mass_center=(0.096187 0.028856 0) inertia_xx=0.0016498 inertia_yy=0.0038155
        inertia_zz=0.0038155 meshes=l_foot.vtp
      CustomJoint subtalar_l: parent_body=talus_l location_in_parent=(-0.055666 -0.047881 -0.0085195) location=(0 0 0)
        SpatialTransform: axes_held_at_zero=(rotation2 rotation3 translation1 translation2 translation3)
          # 3 Axes for rotations are listed first.
          TransformAxis rotation1: coordinates=subtalar_angle_l axis=(-0.78718 -0.60475 -0.12095)
              LinearFunction(coefficients=1 0)
        Coordinate subtalar_angle_l: motion_type=rotational default_value=-0.13824 initial_value=-0.13824
            range=(-0.87266 0.87266) clamped=true
    Body toes_l: mass=0.21879 mass_center=(0.033281 0.0057712 0.021225) inertia_xx=0.00011784 inertia_yy=0.00019911
        inertia_zz=0.00019911 meshes=l_bofoot.vtp
      CustomJoint mtp_l: parent_body=calcn_l location_in_parent=(0.17198 -0.0019237 -0.0013099) location=(0 0 0)
        SpatialTransform: axes_held_at_zero=(rotation2 rotation3 translation1 translation2 translation3)
          # 3 Axes for rotations are listed first.
          TransformAxis rotation1: coordinates=mtp_angle_l axis=(0.58095 0 0.81394) LinearFunction(coefficients=1 0)
        Coordinate mtp_angle_l: motion_type=rotational default_value=0 initial_value=0 range=(-1.0472 1.0472)
            clamped=true
    Body torso: mass=27.0982 mass_center=(-0.01429 0.30939 0.0022247) inertia_xx=1.3923 inertia_yy=0.71336
        inertia_zz=1.3516
        meshes=(hat_spine.vtp hat_jaw.vtp hat_skull.vtp hat_ribs.vtp scapula_lv1.vtp scapula_rv1.vtp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)
      CustomJoint back: parent_body=pelvis location_in_parent=(-0.085366 0.06909 0) location=(0 0 0)
        SpatialTransform: axes_held_at_zero=(translation1 translation2 translation3)
          # 3 Axes for rotations are listed first.
          TransformAxis rotation1: coordinates=lumbar_extension axis=(0 0 1) LinearFunction(coefficients=1 0)
          TransformAxis rotation2: coordinates=lumbar_bending axis=(1 0 0) LinearFunction(coefficients=1 0)
          TransformAxis rotation3: coordinates=lumbar_rotation axis=(0 1 0) LinearFunction(coefficients=1 0)
        Coordinate lumbar_extension: motion_type=rotational default_value=-0.18993 initial_value=-0.18993
            range=(-0.7854 0.17453) clamped=true
        Coordinate lumbar_bending: motion_type=rotational default_value=0.094841 initial_value=0.094841
            range=(-0.34907 0.34907) clamped=true
        Coordinate lumbar_rotation: motion_type=rotational default_value=-0.11573 initial_value=-0.11573
            range=(-0.5236 0.5236) clamped=true
    Body humerus_r: mass=2.0531 mass_center=(0 -0.16394 0) inertia_xx=0.011986 inertia_yy=0.0041347 inertia_zz=0.013453
        meshes=humerus_rv.vtp
      CustomJoint acromial_r: parent_body=torso location_in_parent=(0.0030504 0.35918 0.16436) location=(0 0 0)
        SpatialTransform: axes_held_at_zero=(translation1 translation2 translation3)
          # 3 Axes for rotations are listed first.
          TransformAxis rotation1: coordinates=arm_flex_r axis=(0 0 1) LinearFunction(coefficients=1 0)
          TransformAxis rotation2: coordinates=arm_add_r axis=(1 0 0) LinearFunction(coefficients=1 0)
          TransformAxis rotation3: coordinates=arm_rot_r axis=(0 1 0) LinearFunction(coefficients=1 0)
        Coordinate arm_flex_r: motion_type=rotational default_value=-0.93612 initial_value=-0.93612
            range=(-1.5708 1.5708) clamped=true
        Coordinate arm_add_r: motion_type=rotational default_value=-0.32216 initial_value=-0.32216
            range=(-2.0944 1.5708) clamped=true
        Coordinate arm_rot_r: motion_type=rotational default_value=-0.1982 initial_value=-0.1982 range=(-1.5708 1.5708)
            clamped=true
    Body ulna_r: mass=0.61365 mass_center=(0 -0.13738 0) inertia_xx=0.0038879 inertia_yy=0.00081118
        inertia_zz=0.0042173 meshes=ulna_rv.vtp
      CustomJoint elbow_r: parent_body=humerus_r location_in_parent=(0.0131 -0.2853 -0.0095626) location=(0 0 0)
        SpatialTransform: axes_held_at_zero=(rotation2 rotation3 translation1 translation2 translation3)
          # 3 Axes for rotations are listed first.
          TransformAxis rotation1: coordinates=elbow_flex_r axis=(0.22605 0.022269 0.97386)
              LinearFunction(coefficients=1 0)
        Coordinate elbow_flex_r: motion_type=rotational default_value=1.5869 initial_value=1.5869
            range=(-0.17453 2.618) clamped=true
    Body radius_r: mass=0.61365 mass_center=(0 -0.13738 0) inertia_xx=0.0038879 inertia_yy=0.00081118
        inertia_zz=0.0042173 meshes=radius_rv.vtp
      CustomJoint radioulnar_r: parent_body=ulna_r location_in_parent=(-0.0076683 -0.014827 0.029733) location=(0 0 0)
        SpatialTransform: axes_held_at_zero=(rotation2 rotation3 translation1 translation2 translation3)
          # 3 Axes for rotations are listed first.
          TransformAxis rotation1: coordinates=pro_sup_r axis=(0.056398 0.99841 0.001952)
              LinearFunction(coefficients=1 0)
        Coordinate pro_sup_r: motion_type=rotational default_value=1.0473 initial_value=1.0473 range=(0 3.1416)
            clamped=true
    Body hand_r: mass=0.46213 mass_center=(0 -0.077623 0) inertia_xx=0.0011708 inertia_yy=0.00071799
        inertia_zz=0.0017589
        meshes=(pisiform_rvs.vtp lunate_rvs.vtp scaphoid_rvs.vtp triquetrum_rvs.vtp hamate_rvs.vtp capitate_rvs.vtp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)
      CustomJoint radius_hand_r: parent_body=radius_r location_in_parent=(-0.010028 -0.26884 0.015514) location=(0 0 0)
        SpatialTransform: axes_held_at_zero=(rotation3 translation1 translation2 translation3)
          # 3 Axes for rotations are listed first.
          TransformAxis rotation1: coordinates=wrist_flex_r axis=(0 0 1) LinearFunction(coefficients=1 0)
          TransformAxis rotation2: coordinates=wrist_dev_r axis=(1 0 0) LinearFunction(coefficients=1 0)
        Coordinate wrist_flex_r: motion_type=rotational default_value=0 initial_value=0 range=(-1.2217 1.2217)
            clamped=true
        Coordinate wrist_dev_r: motion_type=rotational default_value=0 initial_value=0 range=(-0.43633 0.61087)
            clamped=true
    Body humerus_l: mass=2.0531 mass_center=(0 -0.16394 0) inertia_xx=0.011986 inertia_yy=0.0041347 inertia_zz=0.013453
        meshes=humerus_lv.vtp
      CustomJoint acromial_l: parent_body=torso location_in_parent=(0.0030504 0.35918 -0.16436) location=(0 0 0)
        SpatialTransform: axes_held_at_zero=(translation1 translation2 translation3)
          # 3 Axes for rotations are listed first.
          TransformAxis rotation1: coordinates=arm_flex_l axis=(0 0 1) LinearFunction(coefficients=1 0)
          TransformAxis rotation2: coordinates=arm_add_l axis=(-1 0 0) LinearFunction(coefficients=1 0)
          TransformAxis rotation3: coordinates=arm_rot_l axis=(0 -1 0) LinearFunction(coefficients=1 0)
        Coordinate arm_flex_l: motion_type=rotational default_value=-0.34247 initial_value=-0.34247
            range=(-1.5708 1.5708) clamped=true
        Coordinate arm_add_l: motion_type=rotational default_value=-0.38132 initial_value=-0.38132
            range=(-2.0944 1.5708) clamped=true
        Coordinate arm_rot_l: motion_type=rotational default_value=0.062076 initial_value=0.062076
            range=(-1.5708 1.5708) clamped=true
    Body ulna_l: mass=0.61365 mass_center=(0 -0.13738 0) inertia_xx=0.0038879 inertia_yy=0.00081118
        inertia_zz=0.0042173 meshes=ulna_lv.vtp
      CustomJoint elbow_l: parent_body=humerus_l location_in_parent=(0.0131 -0.2853 0.0095626) location=(0 0 0)
        SpatialTransform: axes_held_at_zero=(rotation2 rotation3 translation1 translation2 translation3)
          # 3 Axes for rotations are listed first.
          TransformAxis rotation1: coordinates=elbow_flex_l axis=(-0.22605 -0.022269 0.97386)
              LinearFunction(coefficients=1 0)
        Coordinate elbow_flex_l: motion_type=rotational default_value=2.0907 initial_value=2.0907
            range=(-0.17453 2.618) clamped=true
    Body radius_l: mass=0.61365 mass_center=(0 -0.13738 0) inertia_xx=0.0038879 inertia_yy=0.00081118
        inertia_zz=0.0042173 meshes=radius_lv.vtp
      CustomJoint radioulnar_l: parent_body=ulna_l location_in_parent=(-0.0076683 -0.014827 -0.029733) location=(0 0 0)
        SpatialTransform: axes_held_at_zero=(rotation2 rotation3 translation1 translation2 translation3)
          # 3 Axes for rotations are listed first.
          TransformAxis rotation1: coordinates=pro_sup_l axis=(-0.056398 -0.99841 0.001952)
              LinearFunction(coefficients=1 0)
        Coordinate pro_sup_l: motion_type=rotational default_value=1.0472 initial_value=1.0472 range=(0 3.1416)
            clamped=true
    Body hand_l: mass=0.46213 mass_center=(0 -0.077623 0) inertia_xx=0.0011708 inertia_yy=0.00071799
        inertia_zz=0.0017589
        meshes=(pisiform_lvs.vtp lunate_lvs.vtp scaphoid_lvs.vtp triquetrum_lvs.vtp hamate_lvs.vtp capitate_lvs.vtp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)
      CustomJoint radius_hand_l: parent_body=radius_l location_in_parent=(-0.010028 -0.26884 -0.015514)
          location=(0 0 0)
        SpatialTransform: axes_held_at_zero=(rotation3 translation1 translation2 translation3)
          # 3 Axes for rotations are listed first.
          TransformAxis rotation1: coordinates=wrist_flex_l axis=(0 0 1) LinearFunction(coefficients=1 0)
          TransformAxis rotation2: coordinates=wrist_dev_l axis=(-1 0 0) LinearFunction(coefficients=1 0)
        Coordinate wrist_flex_l: motion_type=rotational default_value=0 initial_value=0 range=(-1.2217 1.2217)
            clamped=true
        Coordinate wrist_dev_l: motion_type=rotational default_value=0 initial_value=0 range=(-0.43633 0.61087)
            clamped=true
  MarkerSet:
    Marker RSH: torso (-0.042706 0.43466 0.16207)
    Marker LSH: torso (-0.039996 0.42799 -0.15958)
    Marker C7: torso (-0.06578 0.44214 -0.00605)
    Marker T7: torso (-0.10596 0.24405 -0.0039799)
    Marker MAN: torso (0.093354 0.3681 0.010041)
    Marker RASI: pelvis (0.027628 0.031464 0.10512)
    Marker LASI: pelvis (0.029193 0.035725 -0.11185)
    Marker SACR: pelvis (-0.15671 0.081672 -0.00092459)
    Marker RTHAP: femur_r (0.11317 -0.20783 0.036642)
    Marker RTHAD: femur_r (0.10236 -0.30531 0.025423)
    Marker RTHLD: femur_r (0.010313 -0.29504 0.11094)
    Marker RTHLP: femur_r (0.0017237 -0.18223 0.12393)
    Marker RLEPI: femur_r (0.009409 -0.44604 0.080508)
    Marker RMEPI: femur_r (-0.015762 -0.4559 -0.045144)
    Marker RTIAP: tibia_r (0.019959 -0.2345 -0.004359)
    Marker RTIAD: tibia_r (0.010577 -0.36033 -0.019176)
    Marker RTILAT: tibia_r (-0.019846 -0.24736 0.079752)
    Marker RLMAL: tibia_r (-0.010091 -0.4806 0.038811)
    Marker RMMAL: tibia_r (0.0050897 -0.46371 -0.05347)
    Marker RHEEL: calcn_r (-0.022593 0.020447 -0.018678)
    Marker RMFS: calcn_r (0.15173 0.052624 -0.011051)
    Marker RMFL: calcn_r (0.10843 0.025397 0.04395)
    Marker RP1MT: calcn_r (0.19202 0.002474 -0.051151)
    Marker RP5MT: calcn_r (0.16415 -0.0059433 0.073912)
    Marker RTOE: toes_r (0.076768 0.011904 -0.0093149)
    Marker LTHAP: femur_l (0.11732 -0.21565 -0.031036)
    Marker LTHAD: femur_l (0.098113 -0.3242 -0.017148)
    Marker LTHLD: femur_l (-0.00080824 -0.32389 -0.097826)
    Marker LTHLP: femur_l (-0.0063228 -0.21099 -0.11477)
    Marker LLEPI: femur_l (0.0059805 -0.44786 -0.075822)
    Marker LMEPI: femur_l (-0.010777 -0.45405 0.050007)
    Marker LTIAP: tibia_l (0.026827 -0.19444 0.0069953)
    Marker LTIAD: tibia_l (0.018827 -0.33319 0.010335)
    Marker LTILAT: tibia_l (-0.010274 -0.26459 -0.073198)
    Marker LLMAL: tibia_l (-0.0075709 -0.48119 -0.041435)
    Marker LMMAL: tibia_l (0.00027684 -0.46185 0.052073)
    Marker LHEEL: calcn_l (-0.021365 0.022057 0.012673)
    Marker LMFS: calcn_l (0.1446 0.050063 0.018591)
    Marker LMFL: calcn_l (0.11586 0.030843 -0.045601)
    Marker LP1MT: calcn_l (0.19016 -0.0020434 0.047887)
    Marker LP5MT: calcn_l (0.16684 -0.0021984 -0.076527)
    Marker LTOE: toes_l (0.074095 0.013336 0.011765)
    Marker RARM: humerus_r (-0.0061745 -0.15199 0.04168)
    Marker RELB: humerus_r (0.011633 -0.293 0.021684)
    Marker RFOREARM: radius_r (-0.040365 -0.12649 0.007551)
    Marker RWR: radius_r (-0.044397 -0.26518 0.010181)
    Marker LARM: humerus_l (-0.0061646 -0.15609 -0.040588)
    Marker LELB: humerus_l (0.0097855 -0.29233 -0.022575)
    Marker LFOREARM: radius_l (-0.042134 -0.1262 -0.0076254)
    Marker LWR: radius_l (-0.043407 -0.26608 -0.010087)
    Marker r_fp_heel1: calcn_r (0.01 0 -0.05)
    Marker r_fp_heel2: calcn_r (0 0 0.03)
    Marker r_fp_mt1: calcn_r (0.135 0 0.07)
    Marker r_fp_mt2: calcn_r (0.205 0 -0.05)
    Marker r_fp_toe: calcn_r (0.275 0 0.02)
    Marker l_fp_heel1: calcn_l (0.01 0 0.05)
    Marker l_fp_heel2: calcn_l (0 0 -0.03)
    Marker l_fp_mt1: calcn_l (0.135 0 -0.07)
    Marker l_fp_mt2: calcn_l (0.205 0 0.05)
    Marker l_fp_toe: calcn_l (0.275 0 -0.02)
  ForceSet:
    Thelen2003Muscle [values shared by the 92 below unless stated]: activation_time_constant=0.01
        deactivation_time_constant=0.04 Vmax=20 Vmax0=10 FmaxTendonStrain=0.033 KshapeActive=0.55 KshapePassive=3.3
        damping=0.05 Af=0.75 Flen=2.4
    Thelen2003Muscle glut_med1_r: max_isometric_force=2457 optimal_fiber_length=0.049845 tendon_slack_length=0.072671
        pennation_angle=0.13963 FmaxMuscleStrain=2
      PathPoint P1: pelvis (-0.034587 0.025771 0.10249)
      PathPoint P2: femur_r (-0.0233 -0.012505 0.07051)
      # maximum isometric force of the muscle fibers
      # optimal length of the muscle fibers
      # resting length of the tendon
      # angle between tendon and fibers at optimal fiber length
      # time constant for ramping up of muscle activation
      # time constant for ramping down of muscle activation
      # maximum contraction velocity at full activation in fiber lengths per
      # second
      # maximum contraction velocity at low activation in fiber lengths per
      # second
      # tendon strain due to maximum isometric muscle force
      # passive muscle strain due to maximum isometric muscle force
      # shape factor for Gaussian active muscle force-length relationship
      # exponential shape factor for passive force-length relationship
      # passive damping in the force-velocity relationship
      # force-velocity shape factor
    Thelen2003Muscle glut_med2_r: max_isometric_force=1719 optimal_fiber_length=0.080209 tendon_slack_length=0.050309
        pennation_angle=0 FmaxMuscleStrain=2
      PathPoint P1: pelvis (-0.072481 0.037724 0.064936)
      PathPoint P2: femur_r (-0.027575 -0.006199 0.066952)
      # maximum isometric force of the muscle fibers
      # optimal length of the muscle fibers
      # resting length of the tendon
      # angle between tendon and fibers at optimal fiber length
      # time constant for ramping up of muscle activation
      # time constant for ramping down of muscle activation
      # maximum contraction velocity at full activation in fiber lengths per
      # second
      # maximum contraction velocity at low activation in fiber lengths per
      # second
      # tendon strain due to maximum isometric muscle force
      # passive muscle strain due to maximum isometric muscle force
      # shape factor for Gaussian active muscle force-length relationship
      # exponential shape factor for passive force-length relationship
      # passive damping in the force-velocity relationship
      # force-velocity shape factor
    Thelen2003Muscle glut_med3_r: max_isometric_force=1959 optimal_fiber_length=0.063704 tendon_slack_length=0.052265
        pennation_angle=0.3578 FmaxMuscleStrain=2
      PathPoint P1: pelvis (-0.10368 0.0089012 0.054933)
      PathPoint P2: femur_r (-0.033026 -0.0050233 0.065809)
      # maximum isometric force of the muscle fibers
      # optimal length of the muscle fibers
      # resting length of the tendon
      # angle between tendon and fibers at optimal fiber length
      # time constant for ramping up of muscle activation
      # time constant for ramping down of muscle activation
      # maximum contraction velocity at full activation in fiber lengths per
      # second
      # maximum contraction velocity at low activation in fiber lengths per
      # second
      # tendon strain due to maximum isometric muscle force
      # passive muscle strain due to maximum isometric muscle force
      # shape factor for Gaussian active muscle force-length relationship
      # exponential shape factor for passive force-length relationship
      # passive damping in the force-velocity relationship
      # force-velocity shape factor
    Thelen2003Muscle glut_min1_r: max_isometric_force=810 optimal_fiber_length=0.069785 tendon_slack_length=0.01642
        pennation_angle=0.17453 FmaxMuscleStrain=0.6
      PathPoint P1: pelvis (-0.039589 -0.0067818 0.08952)
      PathPoint P2: femur_r (-0.0076953 -0.011115 0.071145)
      # maximum isometric force of the muscle fibers
      # optimal length of the muscle fibers
      # resting length of the tendon
      # angle between tendon and fibers at optimal fiber length
      # time constant for ramping up of muscle activation
      # time constant for ramping down of muscle activation
      # maximum contraction velocity at full activation in fiber lengths per
      # second
      # maximum contraction velocity at low activation in fiber lengths per
      # second
      # tendon strain due to maximum isometric muscle force
      # passive muscle strain due to maximum isometric muscle force
      # shape factor for Gaussian active muscle force-length relationship
      # exponential shape factor for passive force-length relationship
      # passive damping in the force-velocity relationship
      # force-velocity shape factor
    Thelen2003Muscle glut_min2_r: max_isometric_force=855 optimal_fiber_length=0.065219 tendon_slack_length=0.020348
        pennation_angle=0 FmaxMuscleStrain=0.6
      PathPoint P1: pelvis (-0.053661 -0.0055102 0.08401)
      PathPoint P2: femur_r (-0.01026 -0.011115 0.071145)
      # maximum isometric force of the muscle fibers
      # optimal length of the muscle fibers
      # resting length of the tendon
      # angle between tendon and fibers at optimal fiber length
      # time constant for ramping up of muscle activation
      # time constant for ramping down of muscle activation
      # maximum contraction velocity at full activation in fiber lengths per
      # second
      # maximum contraction velocity at low activation in fiber lengths per
      # second
      # tendon strain due to maximum isometric muscle force
      # passive muscle strain due to maximum isometric muscle force
      # shape factor for Gaussian active muscle force-length relationship
      # exponential shape factor for passive force-length relationship
      # passive damping in the force-velocity relationship
      # force-velocity shape factor
    Thelen2003Muscle glut_min3_r: max_isometric_force=969 optimal_fiber_length=0.039898 tendon_slack_length=0.053548
        pennation_angle=0.017453 FmaxMuscleStrain=0.6
      PathPoint P1: pelvis (-0.070701 -0.0053407 0.072566)
      PathPoint P2: femur_r (-0.014429 -0.008871 0.069874)
      # maximum isometric force of the muscle fibers
      # optimal length of the muscle fibers
      # resting length of the tendon
      # angle between tendon and fibers at optimal fiber length
      # time constant for ramping up of muscle activation
      # time constant for ramping down of muscle activation
      # maximum contraction velocity at full activation in fiber lengths per
      # second
      # maximum contraction velocity at low activation in fiber lengths per
      # second
      # tendon strain due to maximum isometric muscle force
      # passive muscle strain due to maximum isometric muscle force
      # shape factor for Gaussian active muscle force-length relationship
      # exponential shape factor for passive force-length relationship
      # passive damping in the force-velocity relationship
      # force-velocity shape factor
    Thelen2003Muscle semimem_r: max_isometric_force=3864 optimal_fiber_length=0.087532 tendon_slack_length=0.37639
        pennation_angle=0.2618 FmaxMuscleStrain=0.6 KshapeActive=0.3
      PathPoint P1: pelvis (-0.10105 -0.082628 0.060621)
      ConditionalPathPoint P2: tibia_r (-0.03972 -0.040166 -0.020341) range=(-0.55851 0.17453) coordinate=knee_angle_r
      PathPoint P3: tibia_r (-0.030818 -0.054456 -0.021051)
      # maximum isometric force of the muscle fibers
      # optimal length of the muscle fibers
      # resting length of the tendon
      # angle between tendon and fibers at optimal fiber length
      # time constant for ramping up of muscle activation
      # time constant for ramping down of muscle activation
      # maximum contraction velocity at full activation in fiber lengths per
      # second
      # maximum contraction velocity at low activation in fiber lengths per
      # second
      # tendon strain due to maximum isometric muscle force
      # passive muscle strain due to maximum isometric muscle force
      # shape factor for Gaussian active muscle force-length relationship
      # exponential shape factor for passive force-length relationship
      # passive damping in the force-velocity relationship
      # force-velocity shape factor
    Thelen2003Muscle semiten_r: max_isometric_force=1230 optimal_fiber_length=0.22247 tendon_slack_length=0.30493
        pennation_angle=0.2269 FmaxMuscleStrain=0.6 KshapeActive=0.3
      PathPoint P1: pelvis (-0.10711 -0.093148 0.051194)
      ConditionalPathPoint P2: tibia_r (-0.047973 -0.032632 -0.024494) range=(-0.33161 0.17453) coordinate=knee_angle_r
      PathPoint P3: tibia_r (-0.037917 -0.060288 -0.024612)
      PathPoint P4: tibia_r (-0.012898 -0.085148 -0.026355)
      PathPoint P5: tibia_r (0.0030817 -0.10912 -0.020761)
      # maximum isometric force of the muscle fibers
      # optimal length of the muscle fibers
      # resting length of the tendon
      # angle between tendon and fibers at optimal fiber length
      # time constant for ramping up of muscle activation
      # time constant for ramping down of muscle activation
      # maximum contraction velocity at full activation in fiber lengths per
      # second
      # maximum contraction velocity at low activation in fiber lengths per
      # second
      # tendon strain due to maximum isometric muscle force
      # passive muscle strain due to maximum isometric muscle force
      # shape factor for Gaussian active muscle force-length relationship
      # exponential shape factor for passive force-length relationship
      # passive damping in the force-velocity relationship
      # force-velocity shape factor
    Thelen2003Muscle bifemlh_r: max_isometric_force=2688 optimal_fiber_length=0.10958 tendon_slack_length=0.36708
        pennation_angle=0.20246 FmaxMuscleStrain=0.6 KshapeActive=0.3
      PathPoint P1: pelvis (-0.10678 -0.086952 0.058866)
      PathPoint P2: tibia_r (-0.034356 -0.04109 0.031658)
      PathPoint P3: tibia_r (-0.026709 -0.06426 0.036896)
      # maximum isometric force of the muscle fibers
      # optimal length of the muscle fibers
      # resting length of the tendon
      # angle between tendon and fibers at optimal fiber length
      # time constant for ramping up of muscle activation
      # time constant for ramping down of muscle activation
      # maximum contraction velocity at full activation in fiber lengths per
      # second
      # maximum contraction velocity at low activation in fiber lengths per
      # second
      # tendon strain due to maximum isometric muscle force
      # passive muscle strain due to maximum isometric muscle force
      # shape factor for Gaussian active muscle force-length relationship
      # exponential shape factor for passive force-length relationship
      # passive damping in the force-velocity relationship
      # force-velocity shape factor
    Thelen2003Muscle bifemsh_r: max_isometric_force=2412 optimal_fiber_length=0.11986 tendon_slack_length=0.16485
        pennation_angle=0.21468 FmaxMuscleStrain=0.6
      PathPoint P1: femur_r (0.005344 -0.22562 0.029728)
      PathPoint P2: tibia_r (-0.034356 -0.04109 0.031658)
      PathPoint P3: tibia_r (-0.026709 -0.06426 0.036896)
      # maximum isometric force of the muscle fibers
      # optimal length of the muscle fibers
      # resting length of the tendon
      # angle between tendon and fibers at optimal fiber length
      # time constant for ramping up of muscle activation
      # time constant for ramping down of muscle activation
      # maximum contraction velocity at full activation in fiber lengths per
      # second
      # maximum contraction velocity at low activation in fiber lengths per
      # second
      # tendon strain due to maximum isometric muscle force
      # passive muscle strain due to maximum isometric muscle force
      # shape factor for Gaussian active muscle force-length relationship
      # exponential shape factor for passive force-length relationship
      # passive damping in the force-velocity relationship
      # force-velocity shape factor
    Thelen2003Muscle sar_r: max_isometric_force=468 optimal_fiber_length=0.42486 tendon_slack_length=0.14759
        pennation_angle=0.02269 FmaxMuscleStrain=0.6
      PathPoint P1: pelvis (-0.01297 -0.0011021 0.10529)
      PathPoint P2: femur_r (-0.0032064 -0.38135 -0.053486)
      PathPoint P3: tibia_r (-0.0063918 -0.047824 -0.04292)
      PathPoint P4: tibia_r (0.0068483 -0.067228 -0.041199)
      PathPoint P5: tibia_r (0.027736 -0.095877 -0.027108)
      # maximum isometric force of the muscle fibers
      # optimal length of the muscle fibers
      # resting length of the tendon
      # angle between tendon and fibers at optimal fiber length
      # time constant for ramping up of muscle activation
      # time constant for ramping down of muscle activation
      # maximum contraction velocity at full activation in fiber lengths per
      # second
      # maximum contraction velocity at low activation in fiber lengths per
      # second
      # tendon strain due to maximum isometric muscle force
      # passive muscle strain due to maximum isometric muscle force
      # shape factor for Gaussian active muscle force-length relationship
      # exponential shape factor for passive force-length relationship
      # passive damping in the force-velocity relationship
      # force-velocity shape factor
    Thelen2003Muscle add_long_r: max_isometric_force=1881 optimal_fiber_length=0.11481 tendon_slack_length=0.14834
        pennation_angle=0.12391 FmaxMuscleStrain=0.6
      PathPoint P1: pelvis (-0.026788 -0.07087 0.014327)
      PathPoint P2: femur_r (0.005344 -0.22562 0.029728)
      # maximum isometric force of the muscle fibers
      # optimal length of the muscle fibers
      # resting length of the tendon
      # angle between tendon and fibers at optimal fiber length
      # time constant for ramping up of muscle activation
      # time constant for ramping down of muscle activation
      # maximum contraction velocity at full activation in fiber lengths per
      # second
      # maximum contraction velocity at low activation in fiber lengths per
      # second
      # tendon strain due to maximum isometric muscle force
      # passive muscle strain due to maximum isometric muscle force
      # shape factor for Gaussian active muscle force-length relationship
      # exponential shape factor for passive force-length relationship
      # passive damping in the force-velocity relationship
      # force-velocity shape factor
    Thelen2003Muscle add_brev_r: max_isometric_force=1287 optimal_fiber_length=0.10846 tendon_slack_length=0.052601
        pennation_angle=0.10647 FmaxMuscleStrain=0.6
      PathPoint P1: pelvis (-0.049762 -0.077567 0.013903)
      PathPoint P2: femur_r (0.00096191 -0.12783 0.037351)
      # maximum isometric force of the muscle fibers
      # optimal length of the muscle fibers
      # resting length of the tendon
      # angle between tendon and fibers at optimal fiber length
      # time constant for ramping up of muscle activation
      # time constant for ramping down of muscle activation
      # maximum contraction velocity at full activation in fiber lengths per
      # second
      # maximum contraction velocity at low activation in fiber lengths per
      # second
      # tendon strain due to maximum isometric muscle force
      # passive muscle strain due to maximum isometric muscle force
      # shape factor for Gaussian active muscle force-length relationship
      # exponential shape factor for passive force-length relationship
      # passive damping in the force-velocity relationship
      # force-velocity shape factor
    Thelen2003Muscle add_mag1_r: max_isometric_force=1143 optimal_fiber_length=0.09505 tendon_slack_length=0.032776
        pennation_angle=0.2618 FmaxMuscleStrain=0.6
      PathPoint P1: pelvis (-0.062054 -0.099523 0.021617)
      PathPoint P2: femur_r (-0.0048096 -0.12943 0.043068)
      # maximum isometric force of the muscle fibers
      # optimal length of the muscle fibers
      # resting length of the tendon
      # angle between tendon and fibers at optimal fiber length
      # time constant for ramping up of muscle activation
      # time constant for ramping down of muscle activation
      # maximum contraction velocity at full activation in fiber lengths per
      # second
      # maximum contraction velocity at low activation in fiber lengths per
      # second
      # tendon strain due to maximum isometric muscle force
      # passive muscle strain due to maximum isometric muscle force
      # shape factor for Gaussian active muscle force-length relationship
      # exponential shape factor for passive force-length relationship
      # passive damping in the force-velocity relationship
      # force-velocity shape factor
    Thelen2003Muscle add_mag2_r: max_isometric_force=1029 optimal_fiber_length=0.13439 tendon_slack_length=0.099956
        pennation_angle=0.2618 FmaxMuscleStrain=0.6
      PathPoint P1: pelvis (-0.070446 -0.10105 0.02611)
      PathPoint P2: femur_r (0.0057715 -0.24422 0.028839)
      # maximum isometric force of the muscle fibers
      # optimal length of the muscle fibers
      # resting length of the tendon
      # angle between tendon and fibers at optimal fiber length
      # time constant for ramping up of muscle activation
      # time constant for ramping down of muscle activation
      # maximum contraction velocity at full activation in fiber lengths per
      # second
      # maximum contraction velocity at low activation in fiber lengths per
      # second
      # tendon strain due to maximum isometric muscle force
      # passive muscle strain due to maximum isometric muscle force
      # shape factor for Gaussian active muscle force-length relationship
      # exponential shape factor for passive force-length relationship
      # passive damping in the force-velocity relationship
      # force-velocity shape factor
    Thelen2003Muscle add_mag3_r: max_isometric_force=1464 optimal_fiber_length=0.14362 tendon_slack_length=0.27298
        pennation_angle=0.2618 FmaxMuscleStrain=0.6
      PathPoint P1: pelvis (-0.094166 -0.096751 0.041386)
      PathPoint P2: femur_r (0.0074816 -0.4101 -0.033794)
      # maximum isometric force of the muscle fibers
      # optimal length of the muscle fibers
      # resting length of the tendon
      # angle between tendon and fibers at optimal fiber length
      # time constant for ramping up of muscle activation
      # time constant for ramping down of muscle activation
      # maximum contraction velocity at full activation in fiber lengths per
      # second
      # maximum contraction velocity at low activation in fiber lengths per
      # second
      # tendon strain due to maximum isometric muscle force
      # passive muscle strain due to maximum isometric muscle force
      # shape factor for Gaussian active muscle force-length relationship
      # exponential shape factor for passive force-length relationship
      # passive damping in the force-velocity relationship
      # force-velocity shape factor
    Thelen2003Muscle tfl_r: max_isometric_force=699 optimal_fiber_length=0.099706 tendon_slack_length=0.44605
        pennation_angle=0.05236 FmaxMuscleStrain=0.6
      PathPoint P1: pelvis (-0.026364 0.018141 0.1052)
      PathPoint P2: femur_r (0.031423 -0.10634 0.075845)
      PathPoint P3: femur_r (0.0057715 -0.43275 0.045355)
      PathPoint P4: tibia_r (0.011003 -0.021878 0.038654)
      PathPoint P5: tibia_r (0.0068483 -0.055586 0.031948)
      # maximum isometric force of the muscle fibers
      # optimal length of the muscle fibers
      # resting length of the tendon
      # angle between tendon and fibers at optimal fiber length
      # time constant for ramping up of muscle activation
      # time constant for ramping down of muscle activation
      # maximum contraction velocity at full activation in fiber lengths per
      # second
      # maximum contraction velocity at low activation in fiber lengths per
      # second
      # tendon strain due to maximum isometric muscle force
      # passive muscle strain due to maximum isometric muscle force
      # shape factor for Gaussian active muscle force-length relationship
      # exponential shape factor for passive force-length relationship
      # passive damping in the force-velocity relationship
      # force-velocity shape factor
    Thelen2003Muscle pect_r: max_isometric_force=798 optimal_fiber_length=0.10439 tendon_slack_length=0.03445
        pennation_angle=0 FmaxMuscleStrain=0.6
      PathPoint P1: pelvis (-0.036537 -0.065106 0.038233)
      PathPoint P2: femur_r (-0.013039 -0.087855 0.032142)
      # maximum isometric force of the muscle fibers
      # optimal length of the muscle fibers
      # resting length of the tendon
      # angle between tendon and fibers at optimal fiber length
      # time constant for ramping up of muscle activation
      # time constant for ramping down of muscle activation
      # maximum contraction velocity at full activation in fiber lengths per
      # second
      # maximum contraction velocity at low activation in fiber lengths per
      # second
      # tendon strain due to maximum isometric muscle force
      # passive muscle strain due to maximum isometric muscle force
      # shape factor for Gaussian active muscle force-length relationship
      # exponential shape factor for passive force-length relationship
      # passive damping in the force-velocity relationship
      # force-velocity shape factor
    Thelen2003Muscle grac_r: max_isometric_force=486 optimal_fiber_length=0.25282 tendon_slack_length=0.27768
        pennation_angle=0.14312 FmaxMuscleStrain=0.6
      PathPoint P1: pelvis (-0.06274 -0.10063 0.023686)
      ConditionalPathPoint P2: tibia_r (-0.030327 -0.03641 -0.040597) range=(-0.43633 0.17453) coordinate=knee_angle_r
      PathPoint P3: tibia_r (-0.022177 -0.058816 -0.03851)
      PathPoint P4: tibia_r (0.0068483 -0.09542 -0.024526)
      # maximum isometric force of the muscle fibers
      # optimal length of the muscle fibers
      # resting length of the tendon
      # angle between tendon and fibers at optimal fiber length
      # time constant for ramping up of muscle activation
      # time constant for ramping down of muscle activation
      # maximum contraction velocity at full activation in fiber lengths per
      # second
      # maximum contraction velocity at low activation in fiber lengths per
      # second
      # tendon strain due to maximum isometric muscle force
      # passive muscle strain due to maximum isometric muscle force
      # shape factor for Gaussian active muscle force-length relationship
      # exponential shape factor for passive force-length relationship
      # passive damping in the force-velocity relationship
      # force-velocity shape factor
    Thelen2003Muscle glut_max1_r: max_isometric_force=1719 optimal_fiber_length=0.13838 tendon_slack_length=0.097448
        pennation_angle=0.087266 FmaxMuscleStrain=2.5
      PathPoint P1: pelvis (-0.1013 0.051881 0.059341)
      PathPoint P2: pelvis (-0.11967 -0.0020006 0.073312)
      PathPoint P3: femur_r (-0.082425 0.0042324 0.030453)
      PathPoint P4: femur_r (-0.067965 -0.031978 0.046841)
      PathPoint P5: femur_r (-0.029606 -0.060494 0.059711)
      # maximum isometric force of the muscle fibers
      # optimal length of the muscle fibers
      # resting length of the tendon
      # angle between tendon and fibers at optimal fiber length
      # time constant for ramping up of muscle activation
      # time constant for ramping down of muscle activation
      # maximum contraction velocity at full activation in fiber lengths per
      # second
      # maximum contraction velocity at low activation in fiber lengths per
      # second
      # tendon strain due to maximum isometric muscle force
      # passive muscle strain due to maximum isometric muscle force
      # shape factor for Gaussian active muscle force-length relationship
      # exponential shape factor for passive force-length relationship
      # passive damping in the force-velocity relationship
      # force-velocity shape factor
    Thelen2003Muscle glut_max2_r: max_isometric_force=2457 optimal_fiber_length=0.14615 tendon_slack_length=0.10638
        pennation_angle=0 FmaxMuscleStrain=2.5
      PathPoint P1: pelvis (-0.11436 0.01492 0.047727)
      PathPoint P2: pelvis (-0.13124 -0.018574 0.064063)
      PathPoint P3: femur_r (-0.082169 -0.020799 0.019171)
      PathPoint P4: femur_r (-0.063732 -0.060889 0.04364)
      PathPoint P5: femur_r (-0.016673 -0.10859 0.053232)
      # maximum isometric force of the muscle fibers
      # optimal length of the muscle fibers
      # resting length of the tendon
      # angle between tendon and fibers at optimal fiber length
      # time constant for ramping up of muscle activation
      # time constant for ramping down of muscle activation
      # maximum contraction velocity at full activation in fiber lengths per
      # second
      # maximum contraction velocity at low activation in fiber lengths per
      # second
      # tendon strain due to maximum isometric muscle force
      # passive muscle strain due to maximum isometric muscle force
      # shape factor for Gaussian active muscle force-length relationship
      # exponential shape factor for passive force-length relationship
      # passive damping in the force-velocity relationship
      # force-velocity shape factor
    Thelen2003Muscle glut_max3_r: max_isometric_force=1656 optimal_fiber_length=0.14488 tendon_slack_length=0.1308
        pennation_angle=0.523 FmaxMuscleStrain=2.5
      PathPoint P1: pelvis (-0.13191 -0.026619 0.0049168)
      PathPoint P2: pelvis (-0.13102 -0.083688 0.042827)
      ConditionalPathPoint P3: pelvis (-0.086468 -0.11462 0.056187) range=(0.75049 1.7453) coordinate=hip_flexion_r
      PathPoint P4: femur_r (-0.06153 -0.095614 -0.0018548)
      PathPoint P5: femur_r (-0.044622 -0.11578 0.015626)
      PathPoint P6: femur_r (-0.0064128 -0.15166 0.052215)
      # maximum isometric force of the muscle fibers
      # optimal length of the muscle fibers
      # resting length of the tendon
      # angle between tendon and fibers at optimal fiber length
      # time constant for ramping up of muscle activation
      # time constant for ramping down of muscle activation
      # maximum contraction velocity at full activation in fiber lengths per
      # second
      # maximum contraction velocity at low activation in fiber lengths per
      # second
      # tendon strain due to maximum isometric muscle force
      # passive muscle strain due to maximum isometric muscle force
      # shape factor for Gaussian active muscle force-length relationship
      # exponential shape factor for passive force-length relationship
      # passive damping in the force-velocity relationship
      # force-velocity shape factor
    Thelen2003Muscle iliacus_r: max_isometric_force=3219 optimal_fiber_length=0.097906 tendon_slack_length=0.12931
        pennation_angle=0.25 FmaxMuscleStrain=0.42
      PathPoint P1: pelvis (-0.057137 0.030942 0.072396)
      PathPoint P2: pelvis (-0.012945 -0.056993 0.068751)
      ConditionalPathPoint P3: pelvis (-0.015488 -0.07861 0.069175) range=(-1.5708 0.61087) coordinate=hip_flexion_r
      PathPoint P4: femur_r (0.013071 -0.071107 0.0072415)
      PathPoint P5: femur_r (-0.020628 -0.066372 0.016389)
      # maximum isometric force of the muscle fibers
      # optimal length of the muscle fibers
      # resting length of the tendon
      # angle between tendon and fibers at optimal fiber length
      # time constant for ramping up of muscle activation
      # time constant for ramping down of muscle activation
      # maximum contraction velocity at full activation in fiber lengths per
      # second
      # maximum contraction velocity at low activation in fiber lengths per
      # second
      # tendon strain due to maximum isometric muscle force
      # passive muscle strain due to maximum isometric muscle force
      # shape factor for Gaussian active muscle force-length relationship
      # exponential shape factor for passive force-length relationship
      # passive damping in the force-velocity relationship
      # force-velocity shape factor
    Thelen2003Muscle psoas_r: max_isometric_force=3339 optimal_fiber_length=0.094994 tendon_slack_length=0.17642
        pennation_angle=0.185 FmaxMuscleStrain=0.42
      PathPoint P1: pelvis (-0.054848 0.075194 0.024499)
      PathPoint P2: pelvis (-0.010207 -0.05879 0.064343)
      ConditionalPathPoint P3: pelvis (-0.014445 -0.078712 0.069175) range=(-1.5708 0.66323) coordinate=hip_flexion_r
      PathPoint P4: femur_r (0.014279 -0.067387 0.0048277)
      PathPoint P5: femur_r (-0.020093 -0.063807 0.013213)
      # maximum isometric force of the muscle fibers
      # optimal length of the muscle fibers
      # resting length of the tendon
      # angle between tendon and fibers at optimal fiber length
      # time constant for ramping up of muscle activation
      # time constant for ramping down of muscle activation
      # maximum contraction velocity at full activation in fiber lengths per
      # second
      # maximum contraction velocity at low activation in fiber lengths per
      # second
      # tendon strain due to maximum isometric muscle force
      # passive muscle strain due to maximum isometric muscle force
      # shape factor for Gaussian active muscle force-length relationship
      # exponential shape factor for passive force-length relationship
      # passive damping in the force-velocity relationship
      # force-velocity shape factor
    Thelen2003Muscle quad_fem_r: max_isometric_force=1143 optimal_fiber_length=0.05695 tendon_slack_length=0.025311
        pennation_angle=0 FmaxMuscleStrain=0.6
      PathPoint P1: pelvis (-0.096895 -0.097574 0.044082)
      PathPoint P2: femur_r (-0.040721 -0.03837 0.046498)
      # maximum isometric force of the muscle fibers
      # optimal length of the muscle fibers
      # resting length of the tendon
      # angle between tendon and fibers at optimal fiber length
      # time constant for ramping up of muscle activation
      # time constant for ramping down of muscle activation
      # maximum contraction velocity at full activation in fiber lengths per
      # second
      # maximum contraction velocity at low activation in fiber lengths per
      # second
      # tendon strain due to maximum isometric muscle force
      # passive muscle strain due to maximum isometric muscle force
      # shape factor for Gaussian active muscle force-length relationship
      # exponential shape factor for passive force-length relationship
      # passive damping in the force-velocity relationship
      # force-velocity shape factor
    Thelen2003Muscle gem_r: max_isometric_force=492 optimal_fiber_length=0.026262 tendon_slack_length=0.042676
        pennation_angle=0 FmaxMuscleStrain=0.6
      PathPoint P1: pelvis (-0.096048 -0.069514 0.060528)
      PathPoint P2: femur_r (-0.015177 -0.003527 0.056281)
      # maximum isometric force of the muscle fibers
      # optimal length of the muscle fibers
      # resting length of the tendon
      # angle between tendon and fibers at optimal fiber length
      # time constant for ramping up of muscle activation
      # time constant for ramping down of muscle activation
      # maximum contraction velocity at full activation in fiber lengths per
      # second
      # maximum contraction velocity at low activation in fiber lengths per
      # second
      # tendon strain due to maximum isometric muscle force
      # passive muscle strain due to maximum isometric muscle force
      # shape factor for Gaussian active muscle force-length relationship
      # exponential shape factor for passive force-length relationship
      # passive damping in the force-velocity relationship
      # force-velocity shape factor
    Thelen2003Muscle peri_r: max_isometric_force=1332 optimal_fiber_length=0.024722 tendon_slack_length=0.10935
        pennation_angle=0.17453 FmaxMuscleStrain=5
      PathPoint P1: pelvis (-0.11834 0.00025432 0.019922)
      PathPoint P2: pelvis (-0.10113 -0.023397 0.055696)
      PathPoint P3: femur_r (-0.015818 -0.0038477 0.055518)
      # maximum isometric force of the muscle fibers
      # optimal length of the muscle fibers
      # resting length of the tendon
      # angle between tendon and fibers at optimal fiber length
      # time constant for ramping up of muscle activation
      # time constant for ramping down of muscle activation
      # maximum contraction velocity at full activation in fiber lengths per
      # second
      # maximum contraction velocity at low activation in fiber lengths per
      # second
      # tendon strain due to maximum isometric muscle force
      # passive muscle strain due to maximum isometric muscle force
      # shape factor for Gaussian active muscle force-length relationship
      # exponential shape factor for passive force-length relationship
      # passive damping in the force-velocity relationship
      # force-velocity shape factor
    Thelen2003Muscle rect_fem_r: max_isometric_force=3507 optimal_fiber_length=0.1256 tendon_slack_length=0.3611
        pennation_angle=0.2426 FmaxMuscleStrain=0.6
      PathPoint P1: pelvis (-0.025008 -0.026364 0.08206)
      ConditionalPathPoint P2: femur_r (0.032502 -0.43025 0.0026044) range=(-2.7925 -1.46) coordinate=knee_angle_r
      MovingPathPoint P3: tibia_r (0.039882 0.019046 0.001506) x_coordinate=knee_angle_r y_coordinate=knee_angle_r
          z_coordinate=knee_angle_r
        x_location: MultiplierFunction: scale=1.1414
          NaturalCubicSpline: x=(-2.0944 -2 -1.5708 -1.2882 -0.99101 -0.71974 -0.43723 -0.04248 0.40863 0.62692 0.73297)
              y=(-0.000189 0.002224 0.011737 0.017393 0.022498 0.026714 0.031087 0.034849 0.032975 0.028122 0.021101)
        y_location: MultiplierFunction: scale=1.1414
          NaturalCubicSpline: x=(-2.0944 -2 -1.5708 -1.4575 -1.3963 -0.91009 -0.17407 0.36671 0.76781 1.306 2.0944)
              y=(0.022415 0.022765 0.024126 0.024293 0.024329 0.022237 0.017842 0.013652 0.0092854 -0.00023045 -0.06562)
        z_location: MultiplierFunction: scale=1.0757
          NaturalCubicSpline: x=(-2.0944 0.1745) y=(0.0014 0.0014)
      # maximum isometric force of the muscle fibers
      # optimal length of the muscle fibers
      # resting length of the tendon
      # angle between tendon and fibers at optimal fiber length
      # time constant for ramping up of muscle activation
      # time constant for ramping down of muscle activation
      # maximum contraction velocity at full activation in fiber lengths per
      # second
      # maximum contraction velocity at low activation in fiber lengths per
      # second
      # tendon strain due to maximum isometric muscle force
      # passive muscle strain due to maximum isometric muscle force
      # shape factor for Gaussian active muscle force-length relationship
      # exponential shape factor for passive force-length relationship
      # passive damping in the force-velocity relationship
      # force-velocity shape factor
    Thelen2003Muscle vas_med_r: max_isometric_force=3882 optimal_fiber_length=0.10672 tendon_slack_length=0.12273
        pennation_angle=0.51662 FmaxMuscleStrain=5
      PathPoint P1: femur_r (0.014963 -0.22434 0.023884)
      PathPoint P2: femur_r (0.038049 -0.29595 0.0011434)
      ConditionalPathPoint P3: femur_r (0.036649 -0.43082 -0.014915) range=(-2.7925 -1.21) coordinate=knee_angle_r
      ConditionalPathPoint P4: femur_r (0.029948 -0.44697 -0.016999) range=(-2.7925 -1.7802) coordinate=knee_angle_r
      MovingPathPoint P5: tibia_r (0.039882 0.019046 -0.015705) x_coordinate=knee_angle_r y_coordinate=knee_angle_r
          z_coordinate=knee_angle_r
        x_location: MultiplierFunction: scale=1.1414
          NaturalCubicSpline: x=(-2.0944 -2 -1.5708 -1.2882 -0.99101 -0.71974 -0.43723 -0.04248 0.40863 0.62692 0.73297)
              y=(-0.000189 0.002224 0.011737 0.017393 0.022498 0.026714 0.031087 0.034849 0.032975 0.028122 0.021101)
        y_location: MultiplierFunction: scale=1.1414
          NaturalCubicSpline: x=(-2.0944 -2 -1.5708 -1.4575 -1.3963 -0.91009 -0.17407 0.36671 0.76781 1.306 2.0944)
              y=(0.022415 0.022765 0.024126 0.024293 0.024329 0.022237 0.017842 0.013652 0.0092854 -0.00023045 -0.06562)
        z_location: MultiplierFunction: scale=1.0757
          NaturalCubicSpline: x=(-2.0944 2.0944) y=(-0.0146 -0.0146)
      # maximum isometric force of the muscle fibers
      # optimal length of the muscle fibers
      # resting length of the tendon
      # angle between tendon and fibers at optimal fiber length
      # time constant for ramping up of muscle activation
      # time constant for ramping down of muscle activation
      # maximum contraction velocity at full activation in fiber lengths per
      # second
      # maximum contraction velocity at low activation in fiber lengths per
      # second
      # tendon strain due to maximum isometric muscle force
      # passive muscle strain due to maximum isometric muscle force
      # shape factor for Gaussian active muscle force-length relationship
      # exponential shape factor for passive force-length relationship
      # passive damping in the force-velocity relationship
      # force-velocity shape factor
    Thelen2003Muscle vas_int_r: max_isometric_force=4095 optimal_fiber_length=0.092961 tendon_slack_length=0.14532
        pennation_angle=0.07854 FmaxMuscleStrain=5
      PathPoint P1: femur_r (0.030995 -0.20564 0.039384)
      PathPoint P2: femur_r (0.035805 -0.22274 0.036208)
      ConditionalPathPoint P3: femur_r (0.033229 -0.4303 0.001461) range=(-2.7925 -1.3963) coordinate=knee_angle_r
      MovingPathPoint P4: tibia_r (0.039882 0.019046 -0.001506) x_coordinate=knee_angle_r y_coordinate=knee_angle_r
          z_coordinate=knee_angle_r
        x_location: MultiplierFunction: scale=1.1414
          NaturalCubicSpline: x=(-2.0944 -2 -1.5708 -1.2882 -0.99101 -0.71974 -0.43723 -0.04248 0.40863 0.62692 0.73297)
              y=(-0.000189 0.002224 0.011737 0.017393 0.022498 0.026714 0.031087 0.034849 0.032975 0.028122 0.021101)
        y_location: MultiplierFunction: scale=1.1414
          NaturalCubicSpline: x=(-2.0944 -2 -1.5708 -1.4575 -1.3963 -0.91009 -0.17407 0.36671 0.76781 1.306 2.0944)
              y=(0.022415 0.022765 0.024126 0.024293 0.024329 0.022237 0.017842 0.013652 0.0092854 -0.00023045 -0.06562)
        z_location: MultiplierFunction: scale=1.0757
          NaturalCubicSpline: x=(-2.0944 0.1745) y=(-0.0014 -0.0014)
      # maximum isometric force of the muscle fibers
      # optimal length of the muscle fibers
      # resting length of the tendon
      # angle between tendon and fibers at optimal fiber length
      # time constant for ramping up of muscle activation
      # time constant for ramping down of muscle activation
      # maximum contraction velocity at full activation in fiber lengths per
      # second
      # maximum contraction velocity at low activation in fiber lengths per
      # second
      # tendon strain due to maximum isometric muscle force
      # passive muscle strain due to maximum isometric muscle force
      # shape factor for Gaussian active muscle force-length relationship
      # exponential shape factor for passive force-length relationship
      # passive damping in the force-velocity relationship
      # force-velocity shape factor
    Thelen2003Muscle vas_lat_r: max_isometric_force=5613 optimal_fiber_length=0.10732 tendon_slack_length=0.15133
        pennation_angle=0.32114 FmaxMuscleStrain=5
      PathPoint P1: femur_r (0.0051302 -0.19815 0.044338)
      PathPoint P2: femur_r (0.028751 -0.27692 0.051961)
      ConditionalPathPoint P3: femur_r (0.037098 -0.40914 0.028344) range=(-2.7925 -1.0472) coordinate=knee_angle_r
      ConditionalPathPoint P4: femur_r (0.031016 -0.44408 0.022766) range=(-2.7925 -1.5708) coordinate=knee_angle_r
      MovingPathPoint P5: tibia_r (0.039882 0.019046 0.017749) x_coordinate=knee_angle_r y_coordinate=knee_angle_r
          z_coordinate=knee_angle_r
        x_location: MultiplierFunction: scale=1.1414
          NaturalCubicSpline: x=(-2.0944 -2 -1.5708 -1.2882 -0.99101 -0.71974 -0.43723 -0.04248 0.40863 0.62692 0.73297)
              y=(-0.000189 0.002224 0.011737 0.017393 0.022498 0.026714 0.031087 0.034849 0.032975 0.028122 0.021101)
        y_location: MultiplierFunction: scale=1.1414
          NaturalCubicSpline: x=(-2.0944 -2 -1.5708 -1.4575 -1.3963 -0.91009 -0.17407 0.36671 0.76781 1.306 2.0944)
              y=(0.022415 0.022765 0.024126 0.024293 0.024329 0.022237 0.017842 0.013652 0.0092854 -0.00023045 -0.06562)
        z_location: MultiplierFunction: scale=1.0757
          NaturalCubicSpline: x=(-2.0944 2.0944) y=(0.0165 0.0165)
      # maximum isometric force of the muscle fibers
      # optimal length of the muscle fibers
      # resting length of the tendon
      # angle between tendon and fibers at optimal fiber length
      # time constant for ramping up of muscle activation
      # time constant for ramping down of muscle activation
      # maximum contraction velocity at full activation in fiber lengths per
      # second
      # maximum contraction velocity at low activation in fiber lengths per
      # second
      # tendon strain due to maximum isometric muscle force
      # passive muscle strain due to maximum isometric muscle force
      # shape factor for Gaussian active muscle force-length relationship
      # exponential shape factor for passive force-length relationship
      # passive damping in the force-velocity relationship
      # force-velocity shape factor
    Thelen2003Muscle med_gas_r: max_isometric_force=4674 optimal_fiber_length=0.068869 tendon_slack_length=0.46142
        pennation_angle=0.35 FmaxTendonStrain=0.07 FmaxMuscleStrain=1.3
      PathPoint P1: femur_r (-0.0030781 -0.40938 -0.032739)
      ConditionalPathPoint P2: femur_r (-0.013787 -0.40857 -0.031901) range=(-1.6057 0.17453) coordinate=knee_angle_r
      ConditionalPathPoint P3: femur_r (-0.027404 -0.4127 -0.030973) range=(-1.2217 0.17453) coordinate=knee_angle_r
      ConditionalPathPoint P4: femur_r (-0.036745 -0.42004 -0.031024) range=(-0.87266 0.17453) coordinate=knee_angle_r
      ConditionalPathPoint P5: femur_r (-0.039406 -0.43032 -0.029423) range=(-0.17453 0.17453) coordinate=knee_angle_r
      PathPoint P6: calcn_r (0 0.029818 -0.0064282)
      # maximum isometric force of the muscle fibers
      # optimal length of the muscle fibers
      # resting length of the tendon
      # angle between tendon and fibers at optimal fiber length
      # time constant for ramping up of muscle activation
      # time constant for ramping down of muscle activation
      # maximum contraction velocity at full activation in fiber lengths per
      # second
      # maximum contraction velocity at low activation in fiber lengths per
      # second
      # tendon strain due to maximum isometric muscle force
      # passive muscle strain due to maximum isometric muscle force
      # shape factor for Gaussian active muscle force-length relationship
      # exponential shape factor for passive force-length relationship
      # passive damping in the force-velocity relationship
      # force-velocity shape factor
    Thelen2003Muscle lat_gas_r: max_isometric_force=2049 optimal_fiber_length=0.074574 tendon_slack_length=0.45433
        pennation_angle=0.21 FmaxTendonStrain=0.07 FmaxMuscleStrain=1.3
      PathPoint P1: femur_r (-0.001507 -0.41103 0.025434)
      ConditionalPathPoint P2: femur_r (-0.010239 -0.40908 0.025002) range=(-1.7453 0.17453) coordinate=knee_angle_r
      ConditionalPathPoint P3: femur_r (-0.023791 -0.41033 0.024329) range=(-1.3963 0.17453) coordinate=knee_angle_r
      ConditionalPathPoint P4: femur_r (-0.033934 -0.41551 0.023452) range=(-1.0472 0.17453) coordinate=knee_angle_r
      ConditionalPathPoint P5: femur_r (-0.039161 -0.42126 0.024075) range=(-0.69813 0.17453) coordinate=knee_angle_r
      ConditionalPathPoint P6: femur_r (-0.040133 -0.43575 0.023173) range=(0 0.17453) coordinate=knee_angle_r
      PathPoint P7: calcn_r (0 0.029818 -0.0064282)
      # maximum isometric force of the muscle fibers
      # optimal length of the muscle fibers
      # resting length of the tendon
      # angle between tendon and fibers at optimal fiber length
      # time constant for ramping up of muscle activation
      # time constant for ramping down of muscle activation
      # maximum contraction velocity at full activation in fiber lengths per
      # second
      # maximum contraction velocity at low activation in fiber lengths per
      # second
      # tendon strain due to maximum isometric muscle force
      # passive muscle strain due to maximum isometric muscle force
      # shape factor for Gaussian active muscle force-length relationship
      # exponential shape factor for passive force-length relationship
      # passive damping in the force-velocity relationship
      # force-velocity shape factor
    Thelen2003Muscle soleus_r: max_isometric_force=10647 optimal_fiber_length=0.058013 tendon_slack_length=0.29007
        pennation_angle=0.576 FmaxTendonStrain=0.07 FmaxMuscleStrain=0.6
      PathPoint P1: tibia_r (-0.0027393 -0.17498 0.0076374)
      PathPoint P2: calcn_r (0 0.029818 -0.0064282)
      # maximum isometric force of the muscle fibers
      # optimal length of the muscle fibers
      # resting length of the tendon
      # angle between tendon and fibers at optimal fiber length
      # time constant for ramping up of muscle activation
      # time constant for ramping down of muscle activation
      # maximum contraction velocity at full activation in fiber lengths per
      # second
      # maximum contraction velocity at low activation in fiber lengths per
      # second
      # tendon strain due to maximum isometric muscle force
      # passive muscle strain due to maximum isometric muscle force
      # shape factor for Gaussian active muscle force-length relationship
      # exponential shape factor for passive force-length relationship
      # passive damping in the force-velocity relationship
      # force-velocity shape factor
    Thelen2003Muscle tib_post_r: max_isometric_force=4764 optimal_fiber_length=0.042903 tendon_slack_length=0.34413
        pennation_angle=0.24435 FmaxMuscleStrain=0.6
      PathPoint P1: tibia_r (-0.010729 -0.15386 0.0020438)
      PathPoint P2: tibia_r (-0.016436 -0.46238 -0.024633)
      PathPoint P3: calcn_r (0.04011 0.032126 -0.034688)
      PathPoint P4: calcn_r (0.074256 0.015294 -0.034082)
      # maximum isometric force of the muscle fibers
      # optimal length of the muscle fibers
      # resting length of the tendon
      # angle between tendon and fibers at optimal fiber length
      # time constant for ramping up of muscle activation
      # time constant for ramping down of muscle activation
      # maximum contraction velocity at full activation in fiber lengths per
      # second
      # maximum contraction velocity at low activation in fiber lengths per
      # second
      # tendon strain due to maximum isometric muscle force
      # passive muscle strain due to maximum isometric muscle force
      # shape factor for Gaussian active muscle force-length relationship
      # exponential shape factor for passive force-length relationship
      # passive damping in the force-velocity relationship
      # force-velocity shape factor
    Thelen2003Muscle flex_dig_r: max_isometric_force=930 optimal_fiber_length=0.048664 tendon_slack_length=0.42067
        pennation_angle=0.24435 FmaxMuscleStrain=0.6
      PathPoint P1: tibia_r (-0.0094735 -0.23353 -0.0019363)
      PathPoint P2: tibia_r (-0.017577 -0.46238 -0.021084)
      PathPoint P3: calcn_r (0.041938 0.030299 -0.03396)
      PathPoint P4: calcn_r (0.0681 0.016929 -0.031898)
      PathPoint P5: calcn_r (0.15948 -0.0077911 0.014069)
      PathPoint P6: toes_r (-0.0018276 -0.0075026 0.017829)
      PathPoint P7: toes_r (0.027413 -0.0068293 0.026077)
      PathPoint P8: toes_r (0.042418 -0.0057712 0.029351)
      # maximum isometric force of the muscle fibers
      # optimal length of the muscle fibers
      # resting length of the tendon
      # angle between tendon and fibers at optimal fiber length
      # time constant for ramping up of muscle activation
      # time constant for ramping down of muscle activation
      # maximum contraction velocity at full activation in fiber lengths per
      # second
      # maximum contraction velocity at low activation in fiber lengths per
      # second
      # tendon strain due to maximum isometric muscle force
      # passive muscle strain due to maximum isometric muscle force
      # shape factor for Gaussian active muscle force-length relationship
      # exponential shape factor for passive force-length relationship
      # passive damping in the force-velocity relationship
      # force-velocity shape factor
    Thelen2003Muscle flex_hal_r: max_isometric_force=966 optimal_fiber_length=0.056089 tendon_slack_length=0.39379
        pennation_angle=0.2967 FmaxMuscleStrain=0.6
      PathPoint P1: tibia_r (-0.009017 -0.2664 0.026247)
      PathPoint P2: tibia_r (-0.02123 -0.46557 -0.018717)
      PathPoint P3: calcn_r (0.035974 0.026548 -0.02923)
      PathPoint P4: calcn_r (0.099842 0.0065407 -0.031049)
      PathPoint P5: calcn_r (0.16602 -0.0050979 -0.032626)
      PathPoint P6: toes_r (0.014909 -0.006156 -0.032141)
      PathPoint P7: toes_r (0.054057 -0.0098111 -0.021953)
      # maximum isometric force of the muscle fibers
      # optimal length of the muscle fibers
      # resting length of the tendon
      # angle between tendon and fibers at optimal fiber length
      # time constant for ramping up of muscle activation
      # time constant for ramping down of muscle activation
      # maximum contraction velocity at full activation in fiber lengths per
      # second
      # maximum contraction velocity at low activation in fiber lengths per
      # second
      # tendon strain due to maximum isometric muscle force
      # passive muscle strain due to maximum isometric muscle force
      # shape factor for Gaussian active muscle force-length relationship
      # exponential shape factor for passive force-length relationship
      # passive damping in the force-velocity relationship
      # force-velocity shape factor
    Thelen2003Muscle tib_ant_r: max_isometric_force=2715 optimal_fiber_length=0.078736 tendon_slack_length=0.28232
        pennation_angle=0.17453 FmaxMuscleStrain=0.6
      PathPoint P1: tibia_r (0.020431 -0.18536 0.012371)
      PathPoint P2: tibia_r (0.037552 -0.45096 -0.01904)
      PathPoint P3: calcn_r (0.11215 0.017121 -0.036992)
      # maximum isometric force of the muscle fibers
      # optimal length of the muscle fibers
      # resting length of the tendon
      # angle between tendon and fibers at optimal fiber length
      # time constant for ramping up of muscle activation
      # time constant for ramping down of muscle activation
      # maximum contraction velocity at full activation in fiber lengths per
      # second
      # maximum contraction velocity at low activation in fiber lengths per
      # second
      # tendon strain due to maximum isometric muscle force
      # passive muscle strain due to maximum isometric muscle force
      # shape factor for Gaussian active muscle force-length relationship
      # exponential shape factor for passive force-length relationship
      # passive damping in the force-velocity relationship
      # force-velocity shape factor
    Thelen2003Muscle per_brev_r: max_isometric_force=1305 optimal_fiber_length=0.05661 tendon_slack_length=0.18229
        pennation_angle=0.2 FmaxMuscleStrain=0.6
      PathPoint P1: tibia_r (-0.0079897 -0.30201 0.03496)
      PathPoint P2: tibia_r (-0.0226 -0.47756 0.030442)
      PathPoint P3: tibia_r (-0.016436 -0.49023 0.031088)
      PathPoint P4: calcn_r (0.045304 0.02597 0.02826)
      PathPoint P5: calcn_r (0.065119 0.021065 0.041601)
      # maximum isometric force of the muscle fibers
      # optimal length of the muscle fibers
      # resting length of the tendon
      # angle between tendon and fibers at optimal fiber length
      # time constant for ramping up of muscle activation
      # time constant for ramping down of muscle activation
      # maximum contraction velocity at full activation in fiber lengths per
      # second
      # maximum contraction velocity at low activation in fiber lengths per
      # second
      # tendon strain due to maximum isometric muscle force
      # passive muscle strain due to maximum isometric muscle force
      # shape factor for Gaussian active muscle force-length relationship
      # exponential shape factor for passive force-length relationship
      # passive damping in the force-velocity relationship
      # force-velocity shape factor
    Thelen2003Muscle per_long_r: max_isometric_force=2829 optimal_fiber_length=0.054958 tendon_slack_length=0.38695
        pennation_angle=0.2618 FmaxMuscleStrain=0.6
      PathPoint P1: tibia_r (0.00057069 -0.17897 0.03894)
      PathPoint P2: tibia_r (-0.023627 -0.47995 0.030765)
      PathPoint P3: tibia_r (-0.018491 -0.49297 0.031088)
      PathPoint P4: calcn_r (0.04213 0.022123 0.026804)
      PathPoint P5: calcn_r (0.065503 0.010196 0.034445)
      PathPoint P6: calcn_r (0.081951 0.0066369 0.014312)
      PathPoint P7: calcn_r (0.11571 0.0081759 -0.022317)
      # maximum isometric force of the muscle fibers
      # optimal length of the muscle fibers
      # resting length of the tendon
      # angle between tendon and fibers at optimal fiber length
      # time constant for ramping up of muscle activation
      # time constant for ramping down of muscle activation
      # maximum contraction velocity at full activation in fiber lengths per
      # second
      # maximum contraction velocity at low activation in fiber lengths per
      # second
      # tendon strain due to maximum isometric muscle force
      # passive muscle strain due to maximum isometric muscle force
      # shape factor for Gaussian active muscle force-length relationship
      # exponential shape factor for passive force-length relationship
      # passive damping in the force-velocity relationship
      # force-velocity shape factor
    Thelen2003Muscle per_tert_r: max_isometric_force=540 optimal_fiber_length=0.09129 tendon_slack_length=0.11556
        pennation_angle=0.22689 FmaxMuscleStrain=0.6
      PathPoint P1: tibia_r (0.0011414 -0.32005 0.024849)
      PathPoint P2: tibia_r (0.026138 -0.46443 0.017104)
      PathPoint P3: calcn_r (0.082432 0.021931 0.036265)
      # maximum isometric force of the muscle fibers
      # optimal length of the muscle fibers
      # resting length of the tendon
      # angle between tendon and fibers at optimal fiber length
      # time constant for ramping up of muscle activation
      # time constant for ramping down of muscle activation
      # maximum contraction velocity at full activation in fiber lengths per
      # second
      # maximum contraction velocity at low activation in fiber lengths per
      # second
      # tendon strain due to maximum isometric muscle force
      # passive muscle strain due to maximum isometric muscle force
      # shape factor for Gaussian active muscle force-length relationship
      # exponential shape factor for passive force-length relationship
      # passive damping in the force-velocity relationship
      # force-velocity shape factor
    Thelen2003Muscle ext_dig_r: max_isometric_force=1536 optimal_fiber_length=0.076618 tendon_slack_length=0.41264
        pennation_angle=0.2 FmaxMuscleStrain=0.6
      PathPoint P1: tibia_r (0.0036524 -0.15763 0.029689)
      PathPoint P2: tibia_r (0.032986 -0.45735 0.007745)
      PathPoint P3: calcn_r (0.088684 0.037321 -0.00012129)
      PathPoint P4: calcn_r (0.15544 0.0052903 0.015767)
      PathPoint P5: toes_r (0.00028856 0.0045208 0.018557)
      PathPoint P6: toes_r (0.042611 -0.00038475 0.030322)
      # maximum isometric force of the muscle fibers
      # optimal length of the muscle fibers
      # resting length of the tendon
      # angle between tendon and fibers at optimal fiber length
      # time constant for ramping up of muscle activation
      # time constant for ramping down of muscle activation
      # maximum contraction velocity at full activation in fiber lengths per
      # second
      # maximum contraction velocity at low activation in fiber lengths per
      # second
      # tendon strain due to maximum isometric muscle force
      # passive muscle strain due to maximum isometric muscle force
      # shape factor for Gaussian active muscle force-length relationship
      # exponential shape factor for passive force-length relationship
      # passive damping in the force-velocity relationship
      # force-velocity shape factor
    Thelen2003Muscle ext_hal_r: max_isometric_force=486 optimal_fiber_length=0.092418 tendon_slack_length=0.35989
        pennation_angle=0.17453 FmaxMuscleStrain=0.6
      PathPoint P1: tibia_r (0.0013697 -0.20168 0.024526)
      PathPoint P2: tibia_r (0.037209 -0.45484 -0.0091434)
      PathPoint P3: calcn_r (0.093301 0.037417 -0.025592)
      PathPoint P4: calcn_r (0.12437 0.029722 -0.031171)
      PathPoint P5: calcn_r (0.16679 0.01337 -0.03396)
      PathPoint P6: toes_r (0.028664 0.0039437 -0.029715)
      PathPoint P7: toes_r (0.054153 0.0032704 -0.022559)
      # maximum isometric force of the muscle fibers
      # optimal length of the muscle fibers
      # resting length of the tendon
      # angle between tendon and fibers at optimal fiber length
      # time constant for ramping up of muscle activation
      # time constant for ramping down of muscle activation
      # maximum contraction velocity at full activation in fiber lengths per
      # second
      # maximum contraction velocity at low activation in fiber lengths per
      # second
      # tendon strain due to maximum isometric muscle force
      # passive muscle strain due to maximum isometric muscle force
      # shape factor for Gaussian active muscle force-length relationship
      # exponential shape factor for passive force-length relationship
      # passive damping in the force-velocity relationship
      # force-velocity shape factor
    Thelen2003Muscle glut_med1_l: max_isometric_force=2457 optimal_fiber_length=0.049845 tendon_slack_length=0.072671
        pennation_angle=0.13963 FmaxMuscleStrain=2
      PathPoint P1: pelvis (-0.034587 0.025771 -0.10249)
      PathPoint P2: femur_l (-0.0233 -0.012505 -0.07051)
      # maximum isometric force of the muscle fibers
      # optimal length of the muscle fibers
      # resting length of the tendon
      # angle between tendon and fibers at optimal fiber length
      # time constant for ramping up of muscle activation
      # time constant for ramping down of muscle activation
      # maximum contraction velocity at full activation in fiber lengths per
      # second
      # maximum contraction velocity at low activation in fiber lengths per
      # second
      # tendon strain due to maximum isometric muscle force
      # passive muscle strain due to maximum isometric muscle force
      # shape factor for Gaussian active muscle force-length relationship
      # exponential shape factor for passive force-length relationship
      # passive damping in the force-velocity relationship
      # force-velocity shape factor
    Thelen2003Muscle glut_med2_l: max_isometric_force=1719 optimal_fiber_length=0.080209 tendon_slack_length=0.050309
        pennation_angle=0 FmaxMuscleStrain=2
      PathPoint P1: pelvis (-0.072481 0.037724 -0.064936)
      PathPoint P2: femur_l (-0.027575 -0.006199 -0.066952)
      # maximum isometric force of the muscle fibers
      # optimal length of the muscle fibers
      # resting length of the tendon
      # angle between tendon and fibers at optimal fiber length
      # time constant for ramping up of muscle activation
      # time constant for ramping down of muscle activation
      # maximum contraction velocity at full activation in fiber lengths per
      # second
      # maximum contraction velocity at low activation in fiber lengths per
      # second
      # tendon strain due to maximum isometric muscle force
      # passive muscle strain due to maximum isometric muscle force
      # shape factor for Gaussian active muscle force-length relationship
      # exponential shape factor for passive force-length relationship
      # passive damping in the force-velocity relationship
      # force-velocity shape factor
    Thelen2003Muscle glut_med3_l: max_isometric_force=1959 optimal_fiber_length=0.063704 tendon_slack_length=0.052265
        pennation_angle=0.3578 FmaxMuscleStrain=2
      PathPoint P1: pelvis (-0.10368 0.0089012 -0.054933)
      PathPoint P2: femur_l (-0.033026 -0.0050233 -0.065809)
      # maximum isometric force of the muscle fibers
      # optimal length of the muscle fibers
      # resting length of the tendon
      # angle between tendon and fibers at optimal fiber length
      # time constant for ramping up of muscle activation
      # time constant for ramping down of muscle activation
      # maximum contraction velocity at full activation in fiber lengths per
      # second
      # maximum contraction velocity at low activation in fiber lengths per
      # second
      # tendon strain due to maximum isometric muscle force
      # passive muscle strain due to maximum isometric muscle force
      # shape factor for Gaussian active muscle force-length relationship
      # exponential shape factor for passive force-length relationship
      # passive damping in the force-velocity relationship
      # force-velocity shape factor
    Thelen2003Muscle glut_min1_l: max_isometric_force=810 optimal_fiber_length=0.069785 tendon_slack_length=0.01642
        pennation_angle=0.17453 FmaxMuscleStrain=0.6
      PathPoint P1: pelvis (-0.039589 -0.0067818 -0.08952)
      PathPoint P2: femur_l (-0.0076953 -0.011115 -0.071145)
      # maximum isometric force of the muscle fibers
      # optimal length of the muscle fibers
      # resting length of the tendon
      # angle between tendon and fibers at optimal fiber length
      # time constant for ramping up of muscle activation
      # time constant for ramping down of muscle activation
      # maximum contraction velocity at full activation in fiber lengths per
      # second
      # maximum contraction velocity at low activation in fiber lengths per
      # second
      # tendon strain due to maximum isometric muscle force
      # passive muscle strain due to maximum isometric muscle force
      # shape factor for Gaussian active muscle force-length relationship
      # exponential shape factor for passive force-length relationship
      # passive damping in the force-velocity relationship
      # force-velocity shape factor
    Thelen2003Muscle glut_min2_l: max_isometric_force=855 optimal_fiber_length=0.065219 tendon_slack_length=0.020348
        pennation_angle=0 FmaxMuscleStrain=0.6
      PathPoint P1: pelvis (-0.053661 -0.0055102 -0.08401)
      PathPoint P2: femur_l (-0.01026 -0.011115 -0.071145)
      # maximum isometric force of the muscle fibers
      # optimal length of the muscle fibers
      # resting length of the tendon
      # angle between tendon and fibers at optimal fiber length
      # time constant for ramping up of muscle activation
      # time constant for ramping down of muscle activation
      # maximum contraction velocity at full activation in fiber lengths per
      # second
      # maximum contraction velocity at low activation in fiber lengths per
      # second
      # tendon strain due to maximum isometric muscle force
      # passive muscle strain due to maximum isometric muscle force
      # shape factor for Gaussian active muscle force-length relationship
      # exponential shape factor for passive force-length relationship
      # passive damping in the force-velocity relationship
      # force-velocity shape factor
    Thelen2003Muscle glut_min3_l: max_isometric_force=969 optimal_fiber_length=0.039898 tendon_slack_length=0.053548
        pennation_angle=0.017453 FmaxMuscleStrain=0.6
      PathPoint P1: pelvis (-0.070701 -0.0053407 -0.072566)
      PathPoint P2: femur_l (-0.014429 -0.008871 -0.069874)
      # maximum isometric force of the muscle fibers
      # optimal length of the muscle fibers
      # resting length of the tendon
      # angle between tendon and fibers at optimal fiber length
      # time constant for ramping up of muscle activation
      # time constant for ramping down of muscle activation
      # maximum contraction velocity at full activation in fiber lengths per
      # second
      # maximum contraction velocity at low activation in fiber lengths per
      # second
      # tendon strain due to maximum isometric muscle force
      # passive muscle strain due to maximum isometric muscle force
      # shape factor for Gaussian active muscle force-length relationship
      # exponential shape factor for passive force-length relationship
      # passive damping in the force-velocity relationship
      # force-velocity shape factor
    Thelen2003Muscle semimem_l: max_isometric_force=3864 optimal_fiber_length=0.087532 tendon_slack_length=0.37639
        pennation_angle=0.2618 FmaxMuscleStrain=0.6 KshapeActive=0.3
      PathPoint P1: pelvis (-0.10105 -0.082628 -0.060621)
      ConditionalPathPoint P2: tibia_l (-0.03972 -0.040166 0.020341) range=(-0.55851 0.17453) coordinate=knee_angle_l
      PathPoint P3: tibia_l (-0.030818 -0.054456 0.021051)
      # maximum isometric force of the muscle fibers
      # optimal length of the muscle fibers
      # resting length of the tendon
      # angle between tendon and fibers at optimal fiber length
      # time constant for ramping up of muscle activation
      # time constant for ramping down of muscle activation
      # maximum contraction velocity at full activation in fiber lengths per
      # second
      # maximum contraction velocity at low activation in fiber lengths per
      # second
      # tendon strain due to maximum isometric muscle force
      # passive muscle strain due to maximum isometric muscle force
      # shape factor for Gaussian active muscle force-length relationship
      # exponential shape factor for passive force-length relationship
      # passive damping in the force-velocity relationship
      # force-velocity shape factor
    Thelen2003Muscle semiten_l: max_isometric_force=1230 optimal_fiber_length=0.22247 tendon_slack_length=0.30493
        pennation_angle=0.2269 FmaxMuscleStrain=0.6 KshapeActive=0.3
      PathPoint P1: pelvis (-0.10711 -0.093148 -0.051194)
      ConditionalPathPoint P2: tibia_l (-0.047973 -0.032632 0.024494) range=(-0.33161 0.17453) coordinate=knee_angle_l
      PathPoint P3: tibia_l (-0.037917 -0.060288 0.024612)
      PathPoint P4: tibia_l (-0.012898 -0.085148 0.026355)
      PathPoint P5: tibia_l (0.0030817 -0.10912 0.020761)
      # maximum isometric force of the muscle fibers
      # optimal length of the muscle fibers
      # resting length of the tendon
      # angle between tendon and fibers at optimal fiber length
      # time constant for ramping up of muscle activation
      # time constant for ramping down of muscle activation
      # maximum contraction velocity at full activation in fiber lengths per
      # second
      # maximum contraction velocity at low activation in fiber lengths per
      # second
      # tendon strain due to maximum isometric muscle force
      # passive muscle strain due to maximum isometric muscle force
      # shape factor for Gaussian active muscle force-length relationship
      # exponential shape factor for passive force-length relationship
      # passive damping in the force-velocity relationship
      # force-velocity shape factor
    Thelen2003Muscle bifemlh_l: max_isometric_force=2688 optimal_fiber_length=0.10958 tendon_slack_length=0.36708
        pennation_angle=0.20246 FmaxMuscleStrain=0.6 KshapeActive=0.3
      PathPoint P1: pelvis (-0.10678 -0.086952 -0.058866)
      PathPoint P2: tibia_l (-0.034356 -0.04109 -0.031658)
      PathPoint P3: tibia_l (-0.026709 -0.06426 -0.036896)
      # maximum isometric force of the muscle fibers
      # optimal length of the muscle fibers
      # resting length of the tendon
      # angle between tendon and fibers at optimal fiber length
      # time constant for ramping up of muscle activation
      # time constant for ramping down of muscle activation
      # maximum contraction velocity at full activation in fiber lengths per
      # second
      # maximum contraction velocity at low activation in fiber lengths per
      # second
      # tendon strain due to maximum isometric muscle force
      # passive muscle strain due to maximum isometric muscle force
      # shape factor for Gaussian active muscle force-length relationship
      # exponential shape factor for passive force-length relationship
      # passive damping in the force-velocity relationship
      # force-velocity shape factor
    Thelen2003Muscle bifemsh_l: max_isometric_force=2412 optimal_fiber_length=0.11986 tendon_slack_length=0.16485
        pennation_angle=0.21468 FmaxMuscleStrain=0.6
      PathPoint P1: femur_l (0.005344 -0.22562 -0.029728)
      PathPoint P2: tibia_l (-0.034356 -0.04109 -0.031658)
      PathPoint P3: tibia_l (-0.026709 -0.06426 -0.036896)
      # maximum isometric force of the muscle fibers
      # optimal length of the muscle fibers
      # resting length of the tendon
      # angle between tendon and fibers at optimal fiber length
      # time constant for ramping up of muscle activation
      # time constant for ramping down of muscle activation
      # maximum contraction velocity at full activation in fiber lengths per
      # second
      # maximum contraction velocity at low activation in fiber lengths per
      # second
      # tendon strain due to maximum isometric muscle force
      # passive muscle strain due to maximum isometric muscle force
      # shape factor for Gaussian active muscle force-length relationship
      # exponential shape factor for passive force-length relationship
      # passive damping in the force-velocity relationship
      # force-velocity shape factor
    Thelen2003Muscle sar_l: max_isometric_force=468 optimal_fiber_length=0.42486 tendon_slack_length=0.14759
        pennation_angle=0.02269 FmaxMuscleStrain=0.6
      PathPoint P1: pelvis (-0.01297 -0.0011021 -0.10529)
      PathPoint P2: femur_l (-0.0032064 -0.38135 0.053486)
      PathPoint P3: tibia_l (-0.0063918 -0.047824 0.04292)
      PathPoint P4: tibia_l (0.0068483 -0.067228 0.041199)
      PathPoint P5: tibia_l (0.027736 -0.095877 0.027108)
      # maximum isometric force of the muscle fibers
      # optimal length of the muscle fibers
      # resting length of the tendon
      # angle between tendon and fibers at optimal fiber length
      # time constant for ramping up of muscle activation
      # time constant for ramping down of muscle activation
      # maximum contraction velocity at full activation in fiber lengths per
      # second
      # maximum contraction velocity at low activation in fiber lengths per
      # second
      # tendon strain due to maximum isometric muscle force
      # passive muscle strain due to maximum isometric muscle force
      # shape factor for Gaussian active muscle force-length relationship
      # exponential shape factor for passive force-length relationship
      # passive damping in the force-velocity relationship
      # force-velocity shape factor
    Thelen2003Muscle add_long_l: max_isometric_force=1881 optimal_fiber_length=0.11481 tendon_slack_length=0.14834
        pennation_angle=0.12391 FmaxMuscleStrain=0.6
      PathPoint P1: pelvis (-0.026788 -0.07087 -0.014327)
      PathPoint P2: femur_l (0.005344 -0.22562 -0.029728)
      # maximum isometric force of the muscle fibers
      # optimal length of the muscle fibers
      # resting length of the tendon
      # angle between tendon and fibers at optimal fiber length
      # time constant for ramping up of muscle activation
      # time constant for ramping down of muscle activation
      # maximum contraction velocity at full activation in fiber lengths per
      # second
      # maximum contraction velocity at low activation in fiber lengths per
      # second
      # tendon strain due to maximum isometric muscle force
      # passive muscle strain due to maximum isometric muscle force
      # shape factor for Gaussian active muscle force-length relationship
      # exponential shape factor for passive force-length relationship
      # passive damping in the force-velocity relationship
      # force-velocity shape factor
    Thelen2003Muscle add_brev_l: max_isometric_force=1287 optimal_fiber_length=0.10846 tendon_slack_length=0.052601
        pennation_angle=0.10647 FmaxMuscleStrain=0.6
      PathPoint P1: pelvis (-0.049762 -0.077567 -0.013903)
      PathPoint P2: femur_l (0.00096191 -0.12783 -0.037351)
      # maximum isometric force of the muscle fibers
      # optimal length of the muscle fibers
      # resting length of the tendon
      # angle between tendon and fibers at optimal fiber length
      # time constant for ramping up of muscle activation
      # time constant for ramping down of muscle activation
      # maximum contraction velocity at full activation in fiber lengths per
      # second
      # maximum contraction velocity at low activation in fiber lengths per
      # second
      # tendon strain due to maximum isometric muscle force
      # passive muscle strain due to maximum isometric muscle force
      # shape factor for Gaussian active muscle force-length relationship
      # exponential shape factor for passive force-length relationship
      # passive damping in the force-velocity relationship
      # force-velocity shape factor
    Thelen2003Muscle add_mag1_l: max_isometric_force=1143 optimal_fiber_length=0.09505 tendon_slack_length=0.032776
        pennation_angle=0.2618 FmaxMuscleStrain=0.6
      PathPoint P1: pelvis (-0.062054 -0.099523 -0.021617)
      PathPoint P2: femur_l (-0.0048096 -0.12943 -0.043068)
      # maximum isometric force of the muscle fibers
      # optimal length of the muscle fibers
      # resting length of the tendon
      # angle between tendon and fibers at optimal fiber length
      # time constant for ramping up of muscle activation
      # time constant for ramping down of muscle activation
      # maximum contraction velocity at full activation in fiber lengths per
      # second
      # maximum contraction velocity at low activation in fiber lengths per
      # second
      # tendon strain due to maximum isometric muscle force
      # passive muscle strain due to maximum isometric muscle force
      # shape factor for Gaussian active muscle force-length relationship
      # exponential shape factor for passive force-length relationship
      # passive damping in the force-velocity relationship
      # force-velocity shape factor
    Thelen2003Muscle add_mag2_l: max_isometric_force=1029 optimal_fiber_length=0.13439 tendon_slack_length=0.099956
        pennation_angle=0.2618 FmaxMuscleStrain=0.6
      PathPoint P1: pelvis (-0.070446 -0.10105 -0.02611)
      PathPoint P2: femur_l (0.0057715 -0.24422 -0.028839)
      # maximum isometric force of the muscle fibers
      # optimal length of the muscle fibers
      # resting length of the tendon
      # angle between tendon and fibers at optimal fiber length
      # time constant for ramping up of muscle activation
      # time constant for ramping down of muscle activation
      # maximum contraction velocity at full activation in fiber lengths per
      # second
      # maximum contraction velocity at low activation in fiber lengths per
      # second
      # tendon strain due to maximum isometric muscle force
      # passive muscle strain due to maximum isometric muscle force
      # shape factor for Gaussian active muscle force-length relationship
      # exponential shape factor for passive force-length relationship
      # passive damping in the force-velocity relationship
      # force-velocity shape factor
    Thelen2003Muscle add_mag3_l: max_isometric_force=1464 optimal_fiber_length=0.14362 tendon_slack_length=0.27298
        pennation_angle=0.2618 FmaxMuscleStrain=0.6
      PathPoint P1: pelvis (-0.094166 -0.096751 -0.041386)
      PathPoint P2: femur_l (0.0074816 -0.4101 0.033794)
      # maximum isometric force of the muscle fibers
      # optimal length of the muscle fibers
      # resting length of the tendon
      # angle between tendon and fibers at optimal fiber length
      # time constant for ramping up of muscle activation
      # time constant for ramping down of muscle activation
      # maximum contraction velocity at full activation in fiber lengths per
      # second
      # maximum contraction velocity at low activation in fiber lengths per
      # second
      # tendon strain due to maximum isometric muscle force
      # passive muscle strain due to maximum isometric muscle force
      # shape factor for Gaussian active muscle force-length relationship
      # exponential shape factor for passive force-length relationship
      # passive damping in the force-velocity relationship
      # force-velocity shape factor
    Thelen2003Muscle tfl_l: max_isometric_force=699 optimal_fiber_length=0.099707 tendon_slack_length=0.44606
        pennation_angle=0.05236 FmaxMuscleStrain=0.6
      PathPoint P1: pelvis (-0.026364 0.018141 -0.1052)
      PathPoint P2: femur_l (0.031423 -0.10634 -0.075845)
      PathPoint P3: femur_l (0.0057715 -0.43275 -0.045355)
      PathPoint P4: tibia_l (0.011003 -0.02188 -0.03865)
      PathPoint P5: tibia_l (0.0068483 -0.055586 -0.031948)
      # maximum isometric force of the muscle fibers
      # optimal length of the muscle fibers
      # resting length of the tendon
      # angle between tendon and fibers at optimal fiber length
      # time constant for ramping up of muscle activation
      # time constant for ramping down of muscle activation
      # maximum contraction velocity at full activation in fiber lengths per
      # second
      # maximum contraction velocity at low activation in fiber lengths per
      # second
      # tendon strain due to maximum isometric muscle force
      # passive muscle strain due to maximum isometric muscle force
      # shape factor for Gaussian active muscle force-length relationship
      # exponential shape factor for passive force-length relationship
      # passive damping in the force-velocity relationship
      # force-velocity shape factor
    Thelen2003Muscle pect_l: max_isometric_force=798 optimal_fiber_length=0.10439 tendon_slack_length=0.03445
        pennation_angle=0 FmaxMuscleStrain=0.6
      PathPoint P1: pelvis (-0.036537 -0.065106 -0.038233)
      PathPoint P2: femur_l (-0.013039 -0.087855 -0.032142)
      # maximum isometric force of the muscle fibers
      # optimal length of the muscle fibers
      # resting length of the tendon
      # angle between tendon and fibers at optimal fiber length
      # time constant for ramping up of muscle activation
      # time constant for ramping down of muscle activation
      # maximum contraction velocity at full activation in fiber lengths per
      # second
      # maximum contraction velocity at low activation in fiber lengths per
      # second
      # tendon strain due to maximum isometric muscle force
      # passive muscle strain due to maximum isometric muscle force
      # shape factor for Gaussian active muscle force-length relationship
      # exponential shape factor for passive force-length relationship
      # passive damping in the force-velocity relationship
      # force-velocity shape factor
    Thelen2003Muscle grac_l: max_isometric_force=486 optimal_fiber_length=0.25282 tendon_slack_length=0.27768
        pennation_angle=0.14312 FmaxMuscleStrain=0.6
      PathPoint P1: pelvis (-0.06274 -0.10063 -0.023686)
      ConditionalPathPoint P2: tibia_l (-0.030327 -0.03641 0.040597) range=(-0.43633 0.17453) coordinate=knee_angle_l
      PathPoint P3: tibia_l (-0.022177 -0.058816 0.03851)
      PathPoint P4: tibia_l (0.0068483 -0.09542 0.024526)
      # maximum isometric force of the muscle fibers
      # optimal length of the muscle fibers
      # resting length of the tendon
      # angle between tendon and fibers at optimal fiber length
      # time constant for ramping up of muscle activation
      # time constant for ramping down of muscle activation
      # maximum contraction velocity at full activation in fiber lengths per
      # second
      # maximum contraction velocity at low activation in fiber lengths per
      # second
      # tendon strain due to maximum isometric muscle force
      # passive muscle strain due to maximum isometric muscle force
      # shape factor for Gaussian active muscle force-length relationship
      # exponential shape factor for passive force-length relationship
      # passive damping in the force-velocity relationship
      # force-velocity shape factor
    Thelen2003Muscle glut_max1_l: max_isometric_force=1719 optimal_fiber_length=0.13838 tendon_slack_length=0.097448
        pennation_angle=0.087266 FmaxMuscleStrain=2.5
      PathPoint P1: pelvis (-0.1013 0.051881 -0.059341)
      PathPoint P2: pelvis (-0.11967 -0.0020006 -0.073312)
      PathPoint P3: femur_l (-0.082425 0.0042324 -0.030453)
      PathPoint P4: femur_l (-0.067965 -0.031978 -0.046841)
      PathPoint P5: femur_l (-0.029606 -0.060494 -0.059711)
      # maximum isometric force of the muscle fibers
      # optimal length of the muscle fibers
      # resting length of the tendon
      # angle between tendon and fibers at optimal fiber length
      # time constant for ramping up of muscle activation
      # time constant for ramping down of muscle activation
      # maximum contraction velocity at full activation in fiber lengths per
      # second
      # maximum contraction velocity at low activation in fiber lengths per
      # second
      # tendon strain due to maximum isometric muscle force
      # passive muscle strain due to maximum isometric muscle force
      # shape factor for Gaussian active muscle force-length relationship
      # exponential shape factor for passive force-length relationship
      # passive damping in the force-velocity relationship
      # force-velocity shape factor
    Thelen2003Muscle glut_max2_l: max_isometric_force=2457 optimal_fiber_length=0.14615 tendon_slack_length=0.10638
        pennation_angle=0 FmaxMuscleStrain=2.5
      PathPoint P1: pelvis (-0.11436 0.01492 -0.047727)
      PathPoint P2: pelvis (-0.13124 -0.018574 -0.064063)
      PathPoint P3: femur_l (-0.082169 -0.020799 -0.019171)
      PathPoint P4: femur_l (-0.063732 -0.060889 -0.04364)
      PathPoint P5: femur_l (-0.016673 -0.10859 -0.053232)
      # maximum isometric force of the muscle fibers
      # optimal length of the muscle fibers
      # resting length of the tendon
      # angle between tendon and fibers at optimal fiber length
      # time constant for ramping up of muscle activation
      # time constant for ramping down of muscle activation
      # maximum contraction velocity at full activation in fiber lengths per
      # second
      # maximum contraction velocity at low activation in fiber lengths per
      # second
      # tendon strain due to maximum isometric muscle force
      # passive muscle strain due to maximum isometric muscle force
      # shape factor for Gaussian active muscle force-length relationship
      # exponential shape factor for passive force-length relationship
      # passive damping in the force-velocity relationship
      # force-velocity shape factor
    Thelen2003Muscle glut_max3_l: max_isometric_force=1656 optimal_fiber_length=0.14488 tendon_slack_length=0.1308
        pennation_angle=0.523 FmaxMuscleStrain=2.5
      PathPoint P1: pelvis (-0.13191 -0.026619 -0.0049168)
      PathPoint P2: pelvis (-0.13102 -0.083688 -0.042827)
      ConditionalPathPoint P3: pelvis (-0.086468 -0.11462 -0.056187) range=(0.75049 1.7453) coordinate=hip_flexion_l
      PathPoint P4: femur_l (-0.06153 -0.095614 0.0018548)
      PathPoint P5: femur_l (-0.044622 -0.11578 -0.015626)
      PathPoint P6: femur_l (-0.0064128 -0.15166 -0.052215)
      # maximum isometric force of the muscle fibers
      # optimal length of the muscle fibers
      # resting length of the tendon
      # angle between tendon and fibers at optimal fiber length
      # time constant for ramping up of muscle activation
      # time constant for ramping down of muscle activation
      # maximum contraction velocity at full activation in fiber lengths per
      # second
      # maximum contraction velocity at low activation in fiber lengths per
      # second
      # tendon strain due to maximum isometric muscle force
      # passive muscle strain due to maximum isometric muscle force
      # shape factor for Gaussian active muscle force-length relationship
      # exponential shape factor for passive force-length relationship
      # passive damping in the force-velocity relationship
      # force-velocity shape factor
    Thelen2003Muscle iliacus_l: max_isometric_force=3219 optimal_fiber_length=0.097906 tendon_slack_length=0.12931
        pennation_angle=0.25 FmaxMuscleStrain=0.42
      PathPoint P1: pelvis (-0.057137 0.030942 -0.072396)
      PathPoint P2: pelvis (-0.012945 -0.056993 -0.068751)
      ConditionalPathPoint P3: pelvis (-0.015488 -0.07861 -0.069175) range=(-1.5708 0.61087) coordinate=hip_flexion_l
      PathPoint P4: femur_l (0.013071 -0.071107 -0.0072415)
      PathPoint P5: femur_l (-0.020628 -0.066372 -0.016389)
      # maximum isometric force of the muscle fibers
      # optimal length of the muscle fibers
      # resting length of the tendon
      # angle between tendon and fibers at optimal fiber length
      # time constant for ramping up of muscle activation
      # time constant for ramping down of muscle activation
      # maximum contraction velocity at full activation in fiber lengths per
      # second
      # maximum contraction velocity at low activation in fiber lengths per
      # second
      # tendon strain due to maximum isometric muscle force
      # passive muscle strain due to maximum isometric muscle force
      # shape factor for Gaussian active muscle force-length relationship
      # exponential shape factor for passive force-length relationship
      # passive damping in the force-velocity relationship
      # force-velocity shape factor
    Thelen2003Muscle psoas_l: max_isometric_force=3339 optimal_fiber_length=0.094994 tendon_slack_length=0.17642
        pennation_angle=0.185 FmaxMuscleStrain=0.42
      PathPoint P1: pelvis (-0.054848 0.075194 -0.024499)
      PathPoint P2: pelvis (-0.010207 -0.05879 -0.064343)
      ConditionalPathPoint P3: pelvis (-0.014445 -0.078712 -0.069175) range=(-1.5708 0.66323) coordinate=hip_flexion_l
      PathPoint P4: femur_l (0.014279 -0.067387 -0.0048277)
      PathPoint P5: femur_l (-0.020093 -0.063807 -0.013213)
      # maximum isometric force of the muscle fibers
      # optimal length of the muscle fibers
      # resting length of the tendon
      # angle between tendon and fibers at optimal fiber length
      # time constant for ramping up of muscle activation
      # time constant for ramping down of muscle activation
      # maximum contraction velocity at full activation in fiber lengths per
      # second
      # maximum contraction velocity at low activation in fiber lengths per
      # second
      # tendon strain due to maximum isometric muscle force
      # passive muscle strain due to maximum isometric muscle force
      # shape factor for Gaussian active muscle force-length relationship
      # exponential shape factor for passive force-length relationship
      # passive damping in the force-velocity relationship
      # force-velocity shape factor
    Thelen2003Muscle quad_fem_l: max_isometric_force=1143 optimal_fiber_length=0.05695 tendon_slack_length=0.025311
        pennation_angle=0 FmaxMuscleStrain=0.6
      PathPoint P1: pelvis (-0.096895 -0.097574 -0.044082)
      PathPoint P2: femur_l (-0.040721 -0.03837 -0.046498)
      # maximum isometric force of the muscle fibers
      # optimal length of the muscle fibers
      # resting length of the tendon
      # angle between tendon and fibers at optimal fiber length
      # time constant for ramping up of muscle activation
      # time constant for ramping down of muscle activation
      # maximum contraction velocity at full activation in fiber lengths per
      # second
      # maximum contraction velocity at low activation in fiber lengths per
      # second
      # tendon strain due to maximum isometric muscle force
      # passive muscle strain due to maximum isometric muscle force
      # shape factor for Gaussian active muscle force-length relationship
      # exponential shape factor for passive force-length relationship
      # passive damping in the force-velocity relationship
      # force-velocity shape factor
    Thelen2003Muscle gem_l: max_isometric_force=492 optimal_fiber_length=0.026262 tendon_slack_length=0.042676
        pennation_angle=0 FmaxMuscleStrain=0.6
      PathPoint P1: pelvis (-0.096048 -0.069514 -0.060528)
      PathPoint P2: femur_l (-0.015177 -0.003527 -0.056281)
      # maximum isometric force of the muscle fibers
      # optimal length of the muscle fibers
      # resting length of the tendon
      # angle between tendon and fibers at optimal fiber length
      # time constant for ramping up of muscle activation
      # time constant for ramping down of muscle activation
      # maximum contraction velocity at full activation in fiber lengths per
      # second
      # maximum contraction velocity at low activation in fiber lengths per
      # second
      # tendon strain due to maximum isometric muscle force
      # passive muscle strain due to maximum isometric muscle force
      # shape factor for Gaussian active muscle force-length relationship
      # exponential shape factor for passive force-length relationship
      # passive damping in the force-velocity relationship
      # force-velocity shape factor
    Thelen2003Muscle peri_l: max_isometric_force=1332 optimal_fiber_length=0.024722 tendon_slack_length=0.10935
        pennation_angle=0.17453 FmaxMuscleStrain=5
      PathPoint P1: pelvis (-0.11834 0.00025432 -0.019922)
      PathPoint P2: pelvis (-0.10113 -0.023397 -0.055696)
      PathPoint P3: femur_l (-0.015818 -0.0038477 -0.055518)
      # maximum isometric force of the muscle fibers
      # optimal length of the muscle fibers
      # resting length of the tendon
      # angle between tendon and fibers at optimal fiber length
      # time constant for ramping up of muscle activation
      # time constant for ramping down of muscle activation
      # maximum contraction velocity at full activation in fiber lengths per
      # second
      # maximum contraction velocity at low activation in fiber lengths per
      # second
      # tendon strain due to maximum isometric muscle force
      # passive muscle strain due to maximum isometric muscle force
      # shape factor for Gaussian active muscle force-length relationship
      # exponential shape factor for passive force-length relationship
      # passive damping in the force-velocity relationship
      # force-velocity shape factor
    Thelen2003Muscle rect_fem_l: max_isometric_force=3507 optimal_fiber_length=0.1256 tendon_slack_length=0.3611
        pennation_angle=0.2426 FmaxMuscleStrain=0.6
      PathPoint P1: pelvis (-0.025008 -0.026364 -0.08206)
      ConditionalPathPoint P2: femur_l (0.032502 -0.43025 -0.0026044) range=(-2.7925 -1.46) coordinate=knee_angle_l
      MovingPathPoint P3: tibia_l (0.039882 0.019046 -0.001506) x_coordinate=knee_angle_l y_coordinate=knee_angle_l
          z_coordinate=knee_angle_l
        x_location: MultiplierFunction: scale=1.1414
          NaturalCubicSpline: x=(-2.0944 -2 -1.5708 -1.2882 -0.99101 -0.71974 -0.43723 -0.04248 0.40863 0.62692 0.73297)
              y=(-0.000189 0.002224 0.011737 0.017393 0.022498 0.026714 0.031087 0.034849 0.032975 0.028122 0.021101)
        y_location: MultiplierFunction: scale=1.1414
          NaturalCubicSpline: x=(-2.0944 -2 -1.5708 -1.4575 -1.3963 -0.91009 -0.17407 0.36671 0.76781 1.306 2.0944)
              y=(0.022415 0.022765 0.024126 0.024293 0.024329 0.022237 0.017842 0.013652 0.0092854 -0.00023045 -0.06562)
        z_location: MultiplierFunction: scale=1.0757
          NaturalCubicSpline: x=(-2.0944 0.1745) y=(-0.0014 -0.0014)
      # maximum isometric force of the muscle fibers
      # optimal length of the muscle fibers
      # resting length of the tendon
      # angle between tendon and fibers at optimal fiber length
      # time constant for ramping up of muscle activation
      # time constant for ramping down of muscle activation
      # maximum contraction velocity at full activation in fiber lengths per
      # second
      # maximum contraction velocity at low activation in fiber lengths per
      # second
      # tendon strain due to maximum isometric muscle force
      # passive muscle strain due to maximum isometric muscle force
      # shape factor for Gaussian active muscle force-length relationship
      # exponential shape factor for passive force-length relationship
      # passive damping in the force-velocity relationship
      # force-velocity shape factor
    Thelen2003Muscle vas_med_l: max_isometric_force=3882 optimal_fiber_length=0.10672 tendon_slack_length=0.12273
        pennation_angle=0.51662 FmaxMuscleStrain=5
      PathPoint P1: femur_l (0.014963 -0.22434 -0.023884)
      PathPoint P2: femur_l (0.038049 -0.29595 -0.0011434)
      ConditionalPathPoint P3: femur_l (0.036649 -0.43082 0.014915) range=(-2.7925 -1.21) coordinate=knee_angle_l
      ConditionalPathPoint P4: femur_l (0.029948 -0.44697 0.016999) range=(-2.7925 -1.7802) coordinate=knee_angle_l
      MovingPathPoint P5: tibia_l (0.039882 0.019046 0.015705) x_coordinate=knee_angle_l y_coordinate=knee_angle_l
          z_coordinate=knee_angle_l
        x_location: MultiplierFunction: scale=1.1414
          NaturalCubicSpline: x=(-2.0944 -2 -1.5708 -1.2882 -0.99101 -0.71974 -0.43723 -0.04248 0.40863 0.62692 0.73297)
              y=(-0.000189 0.002224 0.011737 0.017393 0.022498 0.026714 0.031087 0.034849 0.032975 0.028122 0.021101)
        y_location: MultiplierFunction: scale=1.1414
          NaturalCubicSpline: x=(-2.0944 -2 -1.5708 -1.4575 -1.3963 -0.91009 -0.17407 0.36671 0.76781 1.306 2.0944)
              y=(0.022415 0.022765 0.024126 0.024293 0.024329 0.022237 0.017842 0.013652 0.0092854 -0.00023045 -0.06562)
        z_location: MultiplierFunction: scale=1.0757
          NaturalCubicSpline: x=(-2.0944 2.0944) y=(0.0146 0.0146)
      # maximum isometric force of the muscle fibers
      # optimal length of the muscle fibers
      # resting length of the tendon
      # angle between tendon and fibers at optimal fiber length
      # time constant for ramping up of muscle activation
      # time constant for ramping down of muscle activation
      # maximum contraction velocity at full activation in fiber lengths per
      # second
      # maximum contraction velocity at low activation in fiber lengths per
      # second
      # tendon strain due to maximum isometric muscle force
      # passive muscle strain due to maximum isometric muscle force
      # shape factor for Gaussian active muscle force-length relationship
      # exponential shape factor for passive force-length relationship
      # passive damping in the force-velocity relationship
      # force-velocity shape factor
    Thelen2003Muscle vas_int_l: max_isometric_force=4095 optimal_fiber_length=0.092916 tendon_slack_length=0.14525
        pennation_angle=0.07854 FmaxMuscleStrain=5
      PathPoint P1: femur_l (0.030995 -0.20564 -0.039384)
      PathPoint P2: femur_l (0.035805 -0.22274 -0.036208)
      ConditionalPathPoint P3: femur_l (0.033229 -0.4303 -0.001461) range=(-2.7925 -1.3963) coordinate=knee_angle_l
      MovingPathPoint P4: tibia_l (0.039882 0.019046 -0.001506) x_coordinate=knee_angle_l y_coordinate=knee_angle_l
          z_coordinate=knee_angle_l
        x_location: MultiplierFunction: scale=1.1414
          NaturalCubicSpline: x=(-2.0944 -2 -1.5708 -1.2882 -0.99101 -0.71974 -0.43723 -0.04248 0.40863 0.62692 0.73297)
              y=(-0.000189 0.002224 0.011737 0.017393 0.022498 0.026714 0.031087 0.034849 0.032975 0.028122 0.021101)
        y_location: MultiplierFunction: scale=1.1414
          NaturalCubicSpline: x=(-2.0944 -2 -1.5708 -1.4575 -1.3963 -0.91009 -0.17407 0.36671 0.76781 1.306 2.0944)
              y=(0.022415 0.022765 0.024126 0.024293 0.024329 0.022237 0.017842 0.013652 0.0092854 -0.00023045 -0.06562)
        z_location: MultiplierFunction: scale=1.0757
          NaturalCubicSpline: x=(-2.0944 0.1745) y=(-0.0014 -0.0014)
      # maximum isometric force of the muscle fibers
      # optimal length of the muscle fibers
      # resting length of the tendon
      # angle between tendon and fibers at optimal fiber length
      # time constant for ramping up of muscle activation
      # time constant for ramping down of muscle activation
      # maximum contraction velocity at full activation in fiber lengths per
      # second
      # maximum contraction velocity at low activation in fiber lengths per
      # second
      # tendon strain due to maximum isometric muscle force
      # passive muscle strain due to maximum isometric muscle force
      # shape factor for Gaussian active muscle force-length relationship
      # exponential shape factor for passive force-length relationship
      # passive damping in the force-velocity relationship
      # force-velocity shape factor
    Thelen2003Muscle vas_lat_l: max_isometric_force=5613 optimal_fiber_length=0.10732 tendon_slack_length=0.15133
        pennation_angle=0.32114 FmaxMuscleStrain=5
      PathPoint P1: femur_l (0.0051302 -0.19815 -0.044338)
      PathPoint P2: femur_l (0.028751 -0.27692 -0.051961)
      ConditionalPathPoint P3: femur_l (0.037098 -0.40914 -0.028344) range=(-2.7925 -1.0472) coordinate=knee_angle_l
      ConditionalPathPoint P4: femur_l (0.031016 -0.44408 -0.022766) range=(-2.7925 -1.5708) coordinate=knee_angle_l
      MovingPathPoint P5: tibia_l (0.039882 0.019046 -0.017749) x_coordinate=knee_angle_l y_coordinate=knee_angle_l
          z_coordinate=knee_angle_l
        x_location: MultiplierFunction: scale=1.1414
          NaturalCubicSpline: x=(-2.0944 -2 -1.5708 -1.2882 -0.99101 -0.71974 -0.43723 -0.04248 0.40863 0.62692 0.73297)
              y=(-0.000189 0.002224 0.011737 0.017393 0.022498 0.026714 0.031087 0.034849 0.032975 0.028122 0.021101)
        y_location: MultiplierFunction: scale=1.1414
          NaturalCubicSpline: x=(-2.0944 -2 -1.5708 -1.4575 -1.3963 -0.91009 -0.17407 0.36671 0.76781 1.306 2.0944)
              y=(0.022415 0.022765 0.024126 0.024293 0.024329 0.022237 0.017842 0.013652 0.0092854 -0.00023045 -0.06562)
        z_location: MultiplierFunction: scale=1.0757
          NaturalCubicSpline: x=(-2.0944 2.0944) y=(-0.0165 -0.0165)
      # maximum isometric force of the muscle fibers
      # optimal length of the muscle fibers
      # resting length of the tendon
      # angle between tendon and fibers at optimal fiber length
      # time constant for ramping up of muscle activation
      # time constant for ramping down of muscle activation
      # maximum contraction velocity at full activation in fiber lengths per
      # second
      # maximum contraction velocity at low activation in fiber lengths per
      # second
      # tendon strain due to maximum isometric muscle force
      # passive muscle strain due to maximum isometric muscle force
      # shape factor for Gaussian active muscle force-length relationship
      # exponential shape factor for passive force-length relationship
      # passive damping in the force-velocity relationship
      # force-velocity shape factor
    Thelen2003Muscle med_gas_l: max_isometric_force=4674 optimal_fiber_length=0.068869 tendon_slack_length=0.46142
        pennation_angle=0.35 FmaxTendonStrain=0.07 FmaxMuscleStrain=1.3
      PathPoint P1: femur_l (-0.0030781 -0.40938 0.032739)
      ConditionalPathPoint P2: femur_l (-0.013787 -0.40857 0.031901) range=(-1.6057 0.17453) coordinate=knee_angle_l
      ConditionalPathPoint P3: femur_l (-0.027404 -0.4127 0.030973) range=(-1.2217 0.17453) coordinate=knee_angle_l
      ConditionalPathPoint P4: femur_l (-0.036745 -0.42004 0.031024) range=(-0.87266 0.17453) coordinate=knee_angle_l
      ConditionalPathPoint P5: femur_l (-0.039406 -0.43032 0.029423) range=(-0.17453 0.17453) coordinate=knee_angle_l
      PathPoint P6: calcn_l (0 0.029818 0.0064282)
      # maximum isometric force of the muscle fibers
      # optimal length of the muscle fibers
      # resting length of the tendon
      # angle between tendon and fibers at optimal fiber length
      # time constant for ramping up of muscle activation
      # time constant for ramping down of muscle activation
      # maximum contraction velocity at full activation in fiber lengths per
      # second
      # maximum contraction velocity at low activation in fiber lengths per
      # second
      # tendon strain due to maximum isometric muscle force
      # passive muscle strain due to maximum isometric muscle force
      # shape factor for Gaussian active muscle force-length relationship
      # exponential shape factor for passive force-length relationship
      # passive damping in the force-velocity relationship
      # force-velocity shape factor
    Thelen2003Muscle lat_gas_l: max_isometric_force=2049 optimal_fiber_length=0.074574 tendon_slack_length=0.45433
        pennation_angle=0.21 FmaxTendonStrain=0.07 FmaxMuscleStrain=1.3
      PathPoint P1: femur_l (-0.001507 -0.41103 -0.025434)
      ConditionalPathPoint P2: femur_l (-0.010239 -0.40908 -0.025002) range=(-1.7453 0.17453) coordinate=knee_angle_l
      ConditionalPathPoint P3: femur_l (-0.023791 -0.41033 -0.024329) range=(-1.3963 0.17453) coordinate=knee_angle_l
      ConditionalPathPoint P4: femur_l (-0.033934 -0.41551 -0.023452) range=(-1.0472 0.17453) coordinate=knee_angle_l
      ConditionalPathPoint P5: femur_l (-0.039161 -0.42126 -0.024075) range=(-0.69813 0.17453) coordinate=knee_angle_l
      ConditionalPathPoint P6: femur_l (-0.040133 -0.43575 -0.023173) range=(0 0.17453) coordinate=knee_angle_l
      PathPoint P7: calcn_l (0 0.029818 0.0064282)
      # maximum isometric force of the muscle fibers
      # optimal length of the muscle fibers
      # resting length of the tendon
      # angle between tendon and fibers at optimal fiber length
      # time constant for ramping up of muscle activation
      # time constant for ramping down of muscle activation
      # maximum contraction velocity at full activation in fiber lengths per
      # second
      # maximum contraction velocity at low activation in fiber lengths per
      # second
      # tendon strain due to maximum isometric muscle force
      # passive muscle strain due to maximum isometric muscle force
      # shape factor for Gaussian active muscle force-length relationship
      # exponential shape factor for passive force-length relationship
      # passive damping in the force-velocity relationship
      # force-velocity shape factor
    Thelen2003Muscle soleus_l: max_isometric_force=10647 optimal_fiber_length=0.058013 tendon_slack_length=0.29007
        pennation_angle=0.576 FmaxTendonStrain=0.07 FmaxMuscleStrain=0.6
      PathPoint P1: tibia_l (-0.0027393 -0.17498 -0.0076374)
      PathPoint P2: calcn_l (0 0.029818 0.0064282)
      # maximum isometric force of the muscle fibers
      # optimal length of the muscle fibers
      # resting length of the tendon
      # angle between tendon and fibers at optimal fiber length
      # time constant for ramping up of muscle activation
      # time constant for ramping down of muscle activation
      # maximum contraction velocity at full activation in fiber lengths per
      # second
      # maximum contraction velocity at low activation in fiber lengths per
      # second
      # tendon strain due to maximum isometric muscle force
      # passive muscle strain due to maximum isometric muscle force
      # shape factor for Gaussian active muscle force-length relationship
      # exponential shape factor for passive force-length relationship
      # passive damping in the force-velocity relationship
      # force-velocity shape factor
    Thelen2003Muscle tib_post_l: max_isometric_force=4764 optimal_fiber_length=0.042903 tendon_slack_length=0.34413
        pennation_angle=0.24435 FmaxMuscleStrain=0.6
      PathPoint P1: tibia_l (-0.010729 -0.15386 -0.0020438)
      PathPoint P2: tibia_l (-0.016436 -0.46238 0.024633)
      PathPoint P3: calcn_l (0.04011 0.032126 0.034688)
      PathPoint P4: calcn_l (0.074256 0.015294 0.034082)
      # maximum isometric force of the muscle fibers
      # optimal length of the muscle fibers
      # resting length of the tendon
      # angle between tendon and fibers at optimal fiber length
      # time constant for ramping up of muscle activation
      # time constant for ramping down of muscle activation
      # maximum contraction velocity at full activation in fiber lengths per
      # second
      # maximum contraction velocity at low activation in fiber lengths per
      # second
      # tendon strain due to maximum isometric muscle force
      # passive muscle strain due to maximum isometric muscle force
      # shape factor for Gaussian active muscle force-length relationship
      # exponential shape factor for passive force-length relationship
      # passive damping in the force-velocity relationship
      # force-velocity shape factor
    Thelen2003Muscle flex_dig_l: max_isometric_force=930 optimal_fiber_length=0.048664 tendon_slack_length=0.42067
        pennation_angle=0.24435 FmaxMuscleStrain=0.6
      PathPoint P1: tibia_l (-0.0094735 -0.23353 0.0019363)
      PathPoint P2: tibia_l (-0.017577 -0.46238 0.021084)
      PathPoint P3: calcn_l (0.041938 0.030299 0.03396)
      PathPoint P4: calcn_l (0.0681 0.016929 0.031898)
      PathPoint P5: calcn_l (0.15948 -0.0077911 -0.014069)
      PathPoint P6: toes_l (-0.0018276 -0.0075026 -0.017829)
      PathPoint P7: toes_l (0.027413 -0.0068293 -0.026077)
      PathPoint P8: toes_l (0.042418 -0.0057712 -0.029351)
      # maximum isometric force of the muscle fibers
      # optimal length of the muscle fibers
      # resting length of the tendon
      # angle between tendon and fibers at optimal fiber length
      # time constant for ramping up of muscle activation
      # time constant for ramping down of muscle activation
      # maximum contraction velocity at full activation in fiber lengths per
      # second
      # maximum contraction velocity at low activation in fiber lengths per
      # second
      # tendon strain due to maximum isometric muscle force
      # passive muscle strain due to maximum isometric muscle force
      # shape factor for Gaussian active muscle force-length relationship
      # exponential shape factor for passive force-length relationship
      # passive damping in the force-velocity relationship
      # force-velocity shape factor
    Thelen2003Muscle flex_hal_l: max_isometric_force=966 optimal_fiber_length=0.056089 tendon_slack_length=0.39379
        pennation_angle=0.2967 FmaxMuscleStrain=0.6
      PathPoint P1: tibia_l (-0.009017 -0.2664 -0.026247)
      PathPoint P2: tibia_l (-0.02123 -0.46557 0.018717)
      PathPoint P3: calcn_l (0.035974 0.026548 0.02923)
      PathPoint P4: calcn_l (0.099842 0.0065407 0.031049)
      PathPoint P5: calcn_l (0.16602 -0.0050979 0.032626)
      PathPoint P6: toes_l (0.014909 -0.006156 0.032141)
      PathPoint P7: toes_l (0.054057 -0.0098111 0.021953)
      # maximum isometric force of the muscle fibers
      # optimal length of the muscle fibers
      # resting length of the tendon
      # angle between tendon and fibers at optimal fiber length
      # time constant for ramping up of muscle activation
      # time constant for ramping down of muscle activation
      # maximum contraction velocity at full activation in fiber lengths per
      # second
      # maximum contraction velocity at low activation in fiber lengths per
      # second
      # tendon strain due to maximum isometric muscle force
      # passive muscle strain due to maximum isometric muscle force
      # shape factor for Gaussian active muscle force-length relationship
      # exponential shape factor for passive force-length relationship
      # passive damping in the force-velocity relationship
      # force-velocity shape factor
    Thelen2003Muscle tib_ant_l: max_isometric_force=2715 optimal_fiber_length=0.078736 tendon_slack_length=0.28232
        pennation_angle=0.17453 FmaxMuscleStrain=0.6
      PathPoint P1: tibia_l (0.020431 -0.18536 -0.012371)
      PathPoint P2: tibia_l (0.037552 -0.45096 0.01904)
      PathPoint P3: calcn_l (0.11215 0.017121 0.036992)
      # maximum isometric force of the muscle fibers
      # optimal length of the muscle fibers
      # resting length of the tendon
      # angle between tendon and fibers at optimal fiber length
      # time constant for ramping up of muscle activation
      # time constant for ramping down of muscle activation
      # maximum contraction velocity at full activation in fiber lengths per
      # second
      # maximum contraction velocity at low activation in fiber lengths per
      # second
      # tendon strain due to maximum isometric muscle force
      # passive muscle strain due to maximum isometric muscle force
      # shape factor for Gaussian active muscle force-length relationship
      # exponential shape factor for passive force-length relationship
      # passive damping in the force-velocity relationship
      # force-velocity shape factor
    Thelen2003Muscle per_brev_l: max_isometric_force=1305 optimal_fiber_length=0.05661 tendon_slack_length=0.18229
        pennation_angle=0.2 FmaxMuscleStrain=0.6
      PathPoint P1: tibia_l (-0.0079897 -0.30201 -0.03496)
      PathPoint P2: tibia_l (-0.0226 -0.47756 -0.030442)
      PathPoint P3: tibia_l (-0.016436 -0.49023 -0.031088)
      PathPoint P4: calcn_l (0.045304 0.02597 -0.02826)
      PathPoint P5: calcn_l (0.065119 0.021065 -0.041601)
      # maximum isometric force of the muscle fibers
      # optimal length of the muscle fibers
      # resting length of the tendon
      # angle between tendon and fibers at optimal fiber length
      # time constant for ramping up of muscle activation
      # time constant for ramping down of muscle activation
      # maximum contraction velocity at full activation in fiber lengths per
      # second
      # maximum contraction velocity at low activation in fiber lengths per
      # second
      # tendon strain due to maximum isometric muscle force
      # passive muscle strain due to maximum isometric muscle force
      # shape factor for Gaussian active muscle force-length relationship
      # exponential shape factor for passive force-length relationship
      # passive damping in the force-velocity relationship
      # force-velocity shape factor
    Thelen2003Muscle per_long_l: max_isometric_force=2829 optimal_fiber_length=0.054958 tendon_slack_length=0.38695
        pennation_angle=0.2618 FmaxMuscleStrain=0.6
      PathPoint P1: tibia_l (0.00057069 -0.17897 -0.03894)
      PathPoint P2: tibia_l (-0.023627 -0.47995 -0.030765)
      PathPoint P3: tibia_l (-0.018491 -0.49297 -0.031088)
      PathPoint P4: calcn_l (0.04213 0.022123 -0.026804)
      PathPoint P5: calcn_l (0.065503 0.010196 -0.034445)
      PathPoint P6: calcn_l (0.081951 0.0066369 -0.014312)
      PathPoint P7: calcn_l (0.11571 0.0081759 0.022317)
      # maximum isometric force of the muscle fibers
      # optimal length of the muscle fibers
      # resting length of the tendon
      # angle between tendon and fibers at optimal fiber length
      # time constant for ramping up of muscle activation
      # time constant for ramping down of muscle activation
      # maximum contraction velocity at full activation in fiber lengths per
      # second
      # maximum contraction velocity at low activation in fiber lengths per
      # second
      # tendon strain due to maximum isometric muscle force
      # passive muscle strain due to maximum isometric muscle force
      # shape factor for Gaussian active muscle force-length relationship
      # exponential shape factor for passive force-length relationship
      # passive damping in the force-velocity relationship
      # force-velocity shape factor
    Thelen2003Muscle per_tert_l: max_isometric_force=540 optimal_fiber_length=0.09129 tendon_slack_length=0.11556
        pennation_angle=0.22689 FmaxMuscleStrain=0.6
      PathPoint P1: tibia_l (0.0011414 -0.32005 -0.024849)
      PathPoint P2: tibia_l (0.026138 -0.46443 -0.017104)
      PathPoint P3: calcn_l (0.082432 0.021931 -0.036265)
      # maximum isometric force of the muscle fibers
      # optimal length of the muscle fibers
      # resting length of the tendon
      # angle between tendon and fibers at optimal fiber length
      # time constant for ramping up of muscle activation
      # time constant for ramping down of muscle activation
      # maximum contraction velocity at full activation in fiber lengths per
      # second
      # maximum contraction velocity at low activation in fiber lengths per
      # second
      # tendon strain due to maximum isometric muscle force
      # passive muscle strain due to maximum isometric muscle force
      # shape factor for Gaussian active muscle force-length relationship
      # exponential shape factor for passive force-length relationship
      # passive damping in the force-velocity relationship
      # force-velocity shape factor
    Thelen2003Muscle ext_dig_l: max_isometric_force=1536 optimal_fiber_length=0.076618 tendon_slack_length=0.41264
        pennation_angle=0.2 FmaxMuscleStrain=0.6
      PathPoint P1: tibia_l (0.0036524 -0.15763 -0.029689)
      PathPoint P2: tibia_l (0.032986 -0.45735 -0.007745)
      PathPoint P3: calcn_l (0.088684 0.037321 0.00012129)
      PathPoint P4: calcn_l (0.15544 0.0052903 -0.015767)
      PathPoint P5: toes_l (0.00028856 0.0045208 -0.018557)
      PathPoint P6: toes_l (0.042611 -0.00038475 -0.030322)
      # maximum isometric force of the muscle fibers
      # optimal length of the muscle fibers
      # resting length of the tendon
      # angle between tendon and fibers at optimal fiber length
      # time constant for ramping up of muscle activation
      # time constant for ramping down of muscle activation
      # maximum contraction velocity at full activation in fiber lengths per
      # second
      # maximum contraction velocity at low activation in fiber lengths per
      # second
      # tendon strain due to maximum isometric muscle force
      # passive muscle strain due to maximum isometric muscle force
      # shape factor for Gaussian active muscle force-length relationship
      # exponential shape factor for passive force-length relationship
      # passive damping in the force-velocity relationship
      # force-velocity shape factor
    Thelen2003Muscle ext_hal_l: max_isometric_force=486 optimal_fiber_length=0.092418 tendon_slack_length=0.35989
        pennation_angle=0.17453 FmaxMuscleStrain=0.6
      PathPoint P1: tibia_l (0.0013697 -0.20168 -0.024526)
      PathPoint P2: tibia_l (0.037209 -0.45484 0.0091434)
      PathPoint P3: calcn_l (0.093301 0.037417 0.025592)
      PathPoint P4: calcn_l (0.12437 0.029722 0.031171)
      PathPoint P5: calcn_l (0.16679 0.01337 0.03396)
      PathPoint P6: toes_l (0.028664 0.0039437 0.029715)
      PathPoint P7: toes_l (0.054153 0.0032704 0.022559)
      # maximum isometric force of the muscle fibers
      # optimal length of the muscle fibers
      # resting length of the tendon
      # angle between tendon and fibers at optimal fiber length
      # time constant for ramping up of muscle activation
      # time constant for ramping down of muscle activation
      # maximum contraction velocity at full activation in fiber lengths per
      # second
      # maximum contraction velocity at low activation in fiber lengths per
      # second
      # tendon strain due to maximum isometric muscle force
      # passive muscle strain due to maximum isometric muscle force
      # shape factor for Gaussian active muscle force-length relationship
      # exponential shape factor for passive force-length relationship
      # passive damping in the force-velocity relationship
      # force-velocity shape factor
    Thelen2003Muscle ercspn_r: max_isometric_force=7500 optimal_fiber_length=0.11579 tendon_slack_length=0.062717
        pennation_angle=0 FmaxMuscleStrain=0.6
      PathPoint P1: pelvis (-0.1229 0.035842 0.036401)
      PathPoint P2: torso (-0.052779 -0.015846 0.042444)
      PathPoint P3: torso (-0.055109 0.076457 0.034323)
      PathPoint P4: torso (-0.046485 0.11909 0.025012)
      # maximum isometric force of the muscle fibers
      # optimal length of the muscle fibers
      # resting length of the tendon
      # angle between tendon and fibers at optimal fiber length
      # time constant for ramping up of muscle activation
      # time constant for ramping down of muscle activation
      # maximum contraction velocity at full activation in fiber lengths per
      # second
      # maximum contraction velocity at low activation in fiber lengths per
      # second
      # tendon strain due to maximum isometric muscle force
      # passive muscle strain due to maximum isometric muscle force
      # shape factor for Gaussian active muscle force-length relationship
      # exponential shape factor for passive force-length relationship
      # passive damping in the force-velocity relationship
      # force-velocity shape factor
    Thelen2003Muscle ercspn_l: max_isometric_force=7500 optimal_fiber_length=0.11579 tendon_slack_length=0.062717
        pennation_angle=0 FmaxMuscleStrain=0.6
      PathPoint P1: pelvis (-0.1229 0.035842 -0.036401)
      PathPoint P2: torso (-0.052779 -0.015846 -0.042444)
      PathPoint P3: torso (-0.055109 0.076457 -0.034323)
      PathPoint P4: torso (-0.046485 0.11909 -0.025012)
      # maximum isometric force of the muscle fibers
      # optimal length of the muscle fibers
      # resting length of the tendon
      # angle between tendon and fibers at optimal fiber length
      # time constant for ramping up of muscle activation
      # time constant for ramping down of muscle activation
      # maximum contraction velocity at full activation in fiber lengths per
      # second
      # maximum contraction velocity at low activation in fiber lengths per
      # second
      # tendon strain due to maximum isometric muscle force
      # passive muscle strain due to maximum isometric muscle force
      # shape factor for Gaussian active muscle force-length relationship
      # exponential shape factor for passive force-length relationship
      # passive damping in the force-velocity relationship
      # force-velocity shape factor
    Thelen2003Muscle intobl_r: max_isometric_force=2700 optimal_fiber_length=0.092393 tendon_slack_length=0.092393
        pennation_angle=0 FmaxMuscleStrain=3
      PathPoint P1: pelvis (-0.021058 0.044463 0.10584)
      PathPoint P2: torso (0.089113 0.1514 0.014918)
      # maximum isometric force of the muscle fibers
      # optimal length of the muscle fibers
      # resting length of the tendon
      # angle between tendon and fibers at optimal fiber length
      # time constant for ramping up of muscle activation
      # time constant for ramping down of muscle activation
      # maximum contraction velocity at full activation in fiber lengths per
      # second
      # maximum contraction velocity at low activation in fiber lengths per
      # second
      # tendon strain due to maximum isometric muscle force
      # passive muscle strain due to maximum isometric muscle force
      # shape factor for Gaussian active muscle force-length relationship
      # exponential shape factor for passive force-length relationship
      # passive damping in the force-velocity relationship
      # force-velocity shape factor
    Thelen2003Muscle intobl_l: max_isometric_force=2700 optimal_fiber_length=0.092393 tendon_slack_length=0.092393
        pennation_angle=0 FmaxMuscleStrain=3
      PathPoint P1: pelvis (-0.021058 0.044463 -0.10584)
      PathPoint P2: torso (0.089113 0.1514 -0.014918)
      # maximum isometric force of the muscle fibers
      # optimal length of the muscle fibers
      # resting length of the tendon
      # angle between tendon and fibers at optimal fiber length
      # time constant for ramping up of muscle activation
      # time constant for ramping down of muscle activation
      # maximum contraction velocity at full activation in fiber lengths per
      # second
      # maximum contraction velocity at low activation in fiber lengths per
      # second
      # tendon strain due to maximum isometric muscle force
      # passive muscle strain due to maximum isometric muscle force
      # shape factor for Gaussian active muscle force-length relationship
      # exponential shape factor for passive force-length relationship
      # passive damping in the force-velocity relationship
      # force-velocity shape factor
    Thelen2003Muscle extobl_r: max_isometric_force=2700 optimal_fiber_length=0.10853 tendon_slack_length=0.12662
        pennation_angle=0 FmaxMuscleStrain=3
      PathPoint P1: pelvis (-0.025559 -0.063936 0.044735)
      PathPoint P2: torso (0.061694 0.1044 0.1044)
      # maximum isometric force of the muscle fibers
      # optimal length of the muscle fibers
      # resting length of the tendon
      # angle between tendon and fibers at optimal fiber length
      # time constant for ramping up of muscle activation
      # time constant for ramping down of muscle activation
      # maximum contraction velocity at full activation in fiber lengths per
      # second
      # maximum contraction velocity at low activation in fiber lengths per
      # second
      # tendon strain due to maximum isometric muscle force
      # passive muscle strain due to maximum isometric muscle force
      # shape factor for Gaussian active muscle force-length relationship
      # exponential shape factor for passive force-length relationship
      # passive damping in the force-velocity relationship
      # force-velocity shape factor
    Thelen2003Muscle extobl_l: max_isometric_force=2700 optimal_fiber_length=0.10853 tendon_slack_length=0.12662
        pennation_angle=0 FmaxMuscleStrain=3
      PathPoint P1: pelvis (-0.025559 -0.063936 -0.044735)
      PathPoint P2: torso (0.061694 0.1044 -0.1044)
      # maximum isometric force of the muscle fibers
      # optimal length of the muscle fibers
      # resting length of the tendon
      # angle between tendon and fibers at optimal fiber length
      # time constant for ramping up of muscle activation
      # time constant for ramping down of muscle activation
      # maximum contraction velocity at full activation in fiber lengths per
      # second
      # maximum contraction velocity at low activation in fiber lengths per
      # second
      # tendon strain due to maximum isometric muscle force
      # passive muscle strain due to maximum isometric muscle force
      # shape factor for Gaussian active muscle force-length relationship
      # exponential shape factor for passive force-length relationship
      # passive damping in the force-velocity relationship
      # force-velocity shape factor
