# OpenSim document version 40000
ExternalLoads:
  datafile: sprint_grf.mot
  ExternalForce RightGRF1: applied_to_body=calcn_r force_expressed_in_body=ground point_expressed_in_body=ground
      force_identifier=ground_force_2_v point_identifier=ground_force_2_p torque_identifier=ground_force_2_m
  ExternalForce RightGRF2: applied_to_body=calcn_r force_expressed_in_body=ground point_expressed_in_body=ground
      force_identifier=ground_force_7_v point_identifier=ground_force_7_p torque_identifier=ground_force_7_m
  ExternalForce LeftGRF1: applied_to_body=calcn_l force_expressed_in_body=ground point_expressed_in_body=ground
      force_identifier=ground_force_4_v point_identifier=ground_force_4_p torque_identifier=ground_force_4_m
  ExternalForce LeftGRF2: applied_to_body=calcn_l force_expressed_in_body=ground point_expressed_in_body=ground
      force_identifier=ground_force_8_v point_identifier=ground_force_8_p torque_identifier=ground_force_8_m
