# OpenSim document version 40000
Model JA1_SCALED:
  gravity: 0 -9.8066 0
  length_units: meters
  force_units: N
  credits:
    Delp S.L., Loan J.P., Hoy M.G., Zajac F.E., Topp E.L., Rosen J.M., Thelen D.G., Anderson F.C., Seth A., Hamner S.R.
  publications:
    Notes: 3D, 23 DOF gait model created by D.G. Thelen, Univ. of Wisconsin-Madison, and Ajay Seth, Frank C. Anderson, and Scott L. Delp, Stanford University. Lower extremity joint defintions based on Delp et al. (1990). Low back joint and anthropometry based on Anderson and Pandy (1999, 2001). Planar knee model of Yamaguchi and Zajac (1989). Seth removed the patella to avoid kinematic constraints; insertions of the quadrucepts are handled with moving points in the tibia frame. Delp, S.L., Loan, J.P., Hoy, M.G., Zajac, F.E., Topp E.L., Rosen, J.M.: An interactive graphics-based model of the lower extremity to study orthopaedic surgical procedures, IEEE Transactions on Biomedical Engineering, vol. 37, pp. 757-767, 1990. Yamaguchi G.T., Zajac F.E.: A planar model of the knee joint to characterize the knee extensor mechanism." J . Biomecl7. vol. 21. pp. 1-10. 1989. Anderson F.C., Pandy M.G.: A dynamic optimization solution for vertical jumping in three dimensions. Computer Methods in Biomechanics and Biomedical Engineering 2:201-231, 1999. Anderson F.C., Pandy M.G.: Dynamic optimization of human walking. Journal of Biomechanical Engineering 123:381-390, 2001.
  Bhargava2004SmoothedMuscleMetabolics metabolicModel: use_smoothing=true
    muscle_parameters:
      Bhargava2004SmoothedMuscleMetabolics_MuscleParameters glut_med1_r: socket_muscle=/forceset/glut_med1_r
          use_provided_muscle_mass=false
      Bhargava2004SmoothedMuscleMetabolics_MuscleParameters glut_med2_r: socket_muscle=/forceset/glut_med2_r
          use_provided_muscle_mass=false
      Bhargava2004SmoothedMuscleMetabolics_MuscleParameters glut_med3_r: socket_muscle=/forceset/glut_med3_r
          use_provided_muscle_mass=false
      Bhargava2004SmoothedMuscleMetabolics_MuscleParameters glut_min1_r: socket_muscle=/forceset/glut_min1_r
          use_provided_muscle_mass=false
      Bhargava2004SmoothedMuscleMetabolics_MuscleParameters glut_min2_r: socket_muscle=/forceset/glut_min2_r
          use_provided_muscle_mass=false
      Bhargava2004SmoothedMuscleMetabolics_MuscleParameters glut_min3_r: socket_muscle=/forceset/glut_min3_r
          use_provided_muscle_mass=false
      Bhargava2004SmoothedMuscleMetabolics_MuscleParameters semimem_r: socket_muscle=/forceset/semimem_r
          use_provided_muscle_mass=false
      Bhargava2004SmoothedMuscleMetabolics_MuscleParameters semiten_r: socket_muscle=/forceset/semiten_r
          use_provided_muscle_mass=false
      Bhargava2004SmoothedMuscleMetabolics_MuscleParameters bifemlh_r: socket_muscle=/forceset/bifemlh_r
          use_provided_muscle_mass=false
      Bhargava2004SmoothedMuscleMetabolics_MuscleParameters bifemsh_r: socket_muscle=/forceset/bifemsh_r
          use_provided_muscle_mass=false
      Bhargava2004SmoothedMuscleMetabolics_MuscleParameters sar_r: socket_muscle=/forceset/sar_r
          use_provided_muscle_mass=false
      Bhargava2004SmoothedMuscleMetabolics_MuscleParameters add_long_r: socket_muscle=/forceset/add_long_r
          use_provided_muscle_mass=false
      Bhargava2004SmoothedMuscleMetabolics_MuscleParameters add_brev_r: socket_muscle=/forceset/add_brev_r
          use_provided_muscle_mass=false
      Bhargava2004SmoothedMuscleMetabolics_MuscleParameters add_mag1_r: socket_muscle=/forceset/add_mag1_r
          use_provided_muscle_mass=false
      Bhargava2004SmoothedMuscleMetabolics_MuscleParameters add_mag2_r: socket_muscle=/forceset/add_mag2_r
          use_provided_muscle_mass=false
      Bhargava2004SmoothedMuscleMetabolics_MuscleParameters add_mag3_r: socket_muscle=/forceset/add_mag3_r
          use_provided_muscle_mass=false
      Bhargava2004SmoothedMuscleMetabolics_MuscleParameters tfl_r: socket_muscle=/forceset/tfl_r
          use_provided_muscle_mass=false
      Bhargava2004SmoothedMuscleMetabolics_MuscleParameters pect_r: socket_muscle=/forceset/pect_r
          use_provided_muscle_mass=false
      Bhargava2004SmoothedMuscleMetabolics_MuscleParameters grac_r: socket_muscle=/forceset/grac_r
          use_provided_muscle_mass=false
      Bhargava2004SmoothedMuscleMetabolics_MuscleParameters glut_max1_r: socket_muscle=/forceset/glut_max1_r
          use_provided_muscle_mass=false
      Bhargava2004SmoothedMuscleMetabolics_MuscleParameters glut_max2_r: socket_muscle=/forceset/glut_max2_r
          use_provided_muscle_mass=false
      Bhargava2004SmoothedMuscleMetabolics_MuscleParameters glut_max3_r: socket_muscle=/forceset/glut_max3_r
          use_provided_muscle_mass=false
      Bhargava2004SmoothedMuscleMetabolics_MuscleParameters iliacus_r: socket_muscle=/forceset/iliacus_r
          use_provided_muscle_mass=false
      Bhargava2004SmoothedMuscleMetabolics_MuscleParameters psoas_r: socket_muscle=/forceset/psoas_r
          use_provided_muscle_mass=false
      Bhargava2004SmoothedMuscleMetabolics_MuscleParameters quad_fem_r: socket_muscle=/forceset/quad_fem_r
          use_provided_muscle_mass=false
      Bhargava2004SmoothedMuscleMetabolics_MuscleParameters gem_r: socket_muscle=/forceset/gem_r
          use_provided_muscle_mass=false
      Bhargava2004SmoothedMuscleMetabolics_MuscleParameters peri_r: socket_muscle=/forceset/peri_r
          use_provided_muscle_mass=false
      Bhargava2004SmoothedMuscleMetabolics_MuscleParameters rect_fem_r: socket_muscle=/forceset/rect_fem_r
          use_provided_muscle_mass=false
      Bhargava2004SmoothedMuscleMetabolics_MuscleParameters vas_med_r: socket_muscle=/forceset/vas_med_r
          use_provided_muscle_mass=false
      Bhargava2004SmoothedMuscleMetabolics_MuscleParameters vas_int_r: socket_muscle=/forceset/vas_int_r
          use_provided_muscle_mass=false
      Bhargava2004SmoothedMuscleMetabolics_MuscleParameters vas_lat_r: socket_muscle=/forceset/vas_lat_r
          use_provided_muscle_mass=false
      Bhargava2004SmoothedMuscleMetabolics_MuscleParameters med_gas_r: socket_muscle=/forceset/med_gas_r
          use_provided_muscle_mass=false
      Bhargava2004SmoothedMuscleMetabolics_MuscleParameters lat_gas_r: socket_muscle=/forceset/lat_gas_r
          use_provided_muscle_mass=false
      Bhargava2004SmoothedMuscleMetabolics_MuscleParameters soleus_r: socket_muscle=/forceset/soleus_r
          use_provided_muscle_mass=false
      Bhargava2004SmoothedMuscleMetabolics_MuscleParameters tib_post_r: socket_muscle=/forceset/tib_post_r
          use_provided_muscle_mass=false
      Bhargava2004SmoothedMuscleMetabolics_MuscleParameters flex_dig_r: socket_muscle=/forceset/flex_dig_r
          use_provided_muscle_mass=false
      Bhargava2004SmoothedMuscleMetabolics_MuscleParameters flex_hal_r: socket_muscle=/forceset/flex_hal_r
          use_provided_muscle_mass=false
      Bhargava2004SmoothedMuscleMetabolics_MuscleParameters tib_ant_r: socket_muscle=/forceset/tib_ant_r
          use_provided_muscle_mass=false
      Bhargava2004SmoothedMuscleMetabolics_MuscleParameters per_brev_r: socket_muscle=/forceset/per_brev_r
          use_provided_muscle_mass=false
      Bhargava2004SmoothedMuscleMetabolics_MuscleParameters per_long_r: socket_muscle=/forceset/per_long_r
          use_provided_muscle_mass=false
      Bhargava2004SmoothedMuscleMetabolics_MuscleParameters per_tert_r: socket_muscle=/forceset/per_tert_r
          use_provided_muscle_mass=false
      Bhargava2004SmoothedMuscleMetabolics_MuscleParameters ext_dig_r: socket_muscle=/forceset/ext_dig_r
          use_provided_muscle_mass=false
      Bhargava2004SmoothedMuscleMetabolics_MuscleParameters ext_hal_r: socket_muscle=/forceset/ext_hal_r
          use_provided_muscle_mass=false
      Bhargava2004SmoothedMuscleMetabolics_MuscleParameters glut_med1_l: socket_muscle=/forceset/glut_med1_l
          use_provided_muscle_mass=false
      Bhargava2004SmoothedMuscleMetabolics_MuscleParameters glut_med2_l: socket_muscle=/forceset/glut_med2_l
          use_provided_muscle_mass=false
      Bhargava2004SmoothedMuscleMetabolics_MuscleParameters glut_med3_l: socket_muscle=/forceset/glut_med3_l
          use_provided_muscle_mass=false
      Bhargava2004SmoothedMuscleMetabolics_MuscleParameters glut_min1_l: socket_muscle=/forceset/glut_min1_l
          use_provided_muscle_mass=false
      Bhargava2004SmoothedMuscleMetabolics_MuscleParameters glut_min2_l: socket_muscle=/forceset/glut_min2_l
          use_provided_muscle_mass=false
      Bhargava2004SmoothedMuscleMetabolics_MuscleParameters glut_min3_l: socket_muscle=/forceset/glut_min3_l
          use_provided_muscle_mass=false
      Bhargava2004SmoothedMuscleMetabolics_MuscleParameters semimem_l: socket_muscle=/forceset/semimem_l
          use_provided_muscle_mass=false
      Bhargava2004SmoothedMuscleMetabolics_MuscleParameters semiten_l: socket_muscle=/forceset/semiten_l
          use_provided_muscle_mass=false
      Bhargava2004SmoothedMuscleMetabolics_MuscleParameters bifemlh_l: socket_muscle=/forceset/bifemlh_l
          use_provided_muscle_mass=false
      Bhargava2004SmoothedMuscleMetabolics_MuscleParameters bifemsh_l: socket_muscle=/forceset/bifemsh_l
          use_provided_muscle_mass=false
      Bhargava2004SmoothedMuscleMetabolics_MuscleParameters sar_l: socket_muscle=/forceset/sar_l
          use_provided_muscle_mass=false
      Bhargava2004SmoothedMuscleMetabolics_MuscleParameters add_long_l: socket_muscle=/forceset/add_long_l
          use_provided_muscle_mass=false
      Bhargava2004SmoothedMuscleMetabolics_MuscleParameters add_brev_l: socket_muscle=/forceset/add_brev_l
          use_provided_muscle_mass=false
      Bhargava2004SmoothedMuscleMetabolics_MuscleParameters add_mag1_l: socket_muscle=/forceset/add_mag1_l
          use_provided_muscle_mass=false
      Bhargava2004SmoothedMuscleMetabolics_MuscleParameters add_mag2_l: socket_muscle=/forceset/add_mag2_l
          use_provided_muscle_mass=false
      Bhargava2004SmoothedMuscleMetabolics_MuscleParameters add_mag3_l: socket_muscle=/forceset/add_mag3_l
          use_provided_muscle_mass=false
      Bhargava2004SmoothedMuscleMetabolics_MuscleParameters tfl_l: socket_muscle=/forceset/tfl_l
          use_provided_muscle_mass=false
      Bhargava2004SmoothedMuscleMetabolics_MuscleParameters pect_l: socket_muscle=/forceset/pect_l
          use_provided_muscle_mass=false
      Bhargava2004SmoothedMuscleMetabolics_MuscleParameters grac_l: socket_muscle=/forceset/grac_l
          use_provided_muscle_mass=false
      Bhargava2004SmoothedMuscleMetabolics_MuscleParameters glut_max1_l: socket_muscle=/forceset/glut_max1_l
          use_provided_muscle_mass=false
      Bhargava2004SmoothedMuscleMetabolics_MuscleParameters glut_max2_l: socket_muscle=/forceset/glut_max2_l
          use_provided_muscle_mass=false
      Bhargava2004SmoothedMuscleMetabolics_MuscleParameters glut_max3_l: socket_muscle=/forceset/glut_max3_l
          use_provided_muscle_mass=false
      Bhargava2004SmoothedMuscleMetabolics_MuscleParameters iliacus_l: socket_muscle=/forceset/iliacus_l
          use_provided_muscle_mass=false
      Bhargava2004SmoothedMuscleMetabolics_MuscleParameters psoas_l: socket_muscle=/forceset/psoas_l
          use_provided_muscle_mass=false
      Bhargava2004SmoothedMuscleMetabolics_MuscleParameters quad_fem_l: socket_muscle=/forceset/quad_fem_l
          use_provided_muscle_mass=false
      Bhargava2004SmoothedMuscleMetabolics_MuscleParameters gem_l: socket_muscle=/forceset/gem_l
          use_provided_muscle_mass=false
      Bhargava2004SmoothedMuscleMetabolics_MuscleParameters peri_l: socket_muscle=/forceset/peri_l
          use_provided_muscle_mass=false
      Bhargava2004SmoothedMuscleMetabolics_MuscleParameters rect_fem_l: socket_muscle=/forceset/rect_fem_l
          use_provided_muscle_mass=false
      Bhargava2004SmoothedMuscleMetabolics_MuscleParameters vas_med_l: socket_muscle=/forceset/vas_med_l
          use_provided_muscle_mass=false
      Bhargava2004SmoothedMuscleMetabolics_MuscleParameters vas_int_l: socket_muscle=/forceset/vas_int_l
          use_provided_muscle_mass=false
      Bhargava2004SmoothedMuscleMetabolics_MuscleParameters vas_lat_l: socket_muscle=/forceset/vas_lat_l
          use_provided_muscle_mass=false
      Bhargava2004SmoothedMuscleMetabolics_MuscleParameters med_gas_l: socket_muscle=/forceset/med_gas_l
          use_provided_muscle_mass=false
      Bhargava2004SmoothedMuscleMetabolics_MuscleParameters lat_gas_l: socket_muscle=/forceset/lat_gas_l
          use_provided_muscle_mass=false
      Bhargava2004SmoothedMuscleMetabolics_MuscleParameters soleus_l: socket_muscle=/forceset/soleus_l
          use_provided_muscle_mass=false
      Bhargava2004SmoothedMuscleMetabolics_MuscleParameters tib_post_l: socket_muscle=/forceset/tib_post_l
          use_provided_muscle_mass=false
      Bhargava2004SmoothedMuscleMetabolics_MuscleParameters flex_dig_l: socket_muscle=/forceset/flex_dig_l
          use_provided_muscle_mass=false
      Bhargava2004SmoothedMuscleMetabolics_MuscleParameters flex_hal_l: socket_muscle=/forceset/flex_hal_l
          use_provided_muscle_mass=false
      Bhargava2004SmoothedMuscleMetabolics_MuscleParameters tib_ant_l: socket_muscle=/forceset/tib_ant_l
          use_provided_muscle_mass=false
      Bhargava2004SmoothedMuscleMetabolics_MuscleParameters per_brev_l: socket_muscle=/forceset/per_brev_l
          use_provided_muscle_mass=false
      Bhargava2004SmoothedMuscleMetabolics_MuscleParameters per_long_l: socket_muscle=/forceset/per_long_l
          use_provided_muscle_mass=false
      Bhargava2004SmoothedMuscleMetabolics_MuscleParameters per_tert_l: socket_muscle=/forceset/per_tert_l
          use_provided_muscle_mass=false
      Bhargava2004SmoothedMuscleMetabolics_MuscleParameters ext_dig_l: socket_muscle=/forceset/ext_dig_l
          use_provided_muscle_mass=false
      Bhargava2004SmoothedMuscleMetabolics_MuscleParameters ext_hal_l: socket_muscle=/forceset/ext_hal_l
          use_provided_muscle_mass=false
  Ground
  BodySet:
    Body pelvis: mass=11.8962 [kg] mass_center=(-0.059934 0 0) inertia=(7.4625e-5 6.3228e-5 4.2031e-5 0 0 0)
        meshes=(sacrum.vtp pelvis.vtp l_pelvis.vtp)
    Body femur_r: mass=9.3956 mass_center=(0 -0.18169 0) inertia=(0.00015833 4.8143e-5 0.00015833 0 0 0)
        meshes=r_femur.vtp
    Body tibia_r: mass=3.745 mass_center=(0 -0.2131 0) inertia=(6.6131e-5 6.3251e-6 6.6131e-5 0 0 0)
        meshes=(r_tibia.vtp fibula.vtp)
    Body talus_r: mass=0.10101 mass_center=(0 0 0) inertia=(1.2402e-6 1.2781e-6 1.2781e-6 0 0 0) meshes=talus.vtp
    Body calcn_r: mass=1.2627 mass_center=(0.096187 0.028856 0) inertia=(1.6498e-6 3.8155e-6 3.8155e-6 0 0 0)
        meshes=foot.vtp
    Body toes_r: mass=0.21879 mass_center=(0.033281 0.0057712 -0.021225) inertia=(1.1784e-7 1.9911e-7 1.9911e-7 0 0 0)
        meshes=bofoot.vtp
    Body femur_l: mass=9.3956 mass_center=(0 -0.18169 0) inertia=(0.00015833 4.8143e-5 0.00015833 0 0 0)
        meshes=l_femur.vtp
    Body tibia_l: mass=3.745 mass_center=(0 -0.2131 0) inertia=(6.6131e-5 6.3251e-6 6.6131e-5 0 0 0)
        meshes=(l_tibia.vtp l_fibula.vtp)
    Body talus_l: mass=0.10101 mass_center=(0 0 0) inertia=(1.2402e-6 1.2781e-6 1.2781e-6 0 0 0) meshes=l_talus.vtp
    Body calcn_l: mass=1.2627 mass_center=(0.096187 0.028856 0) inertia=(1.6498e-6 3.8155e-6 3.8155e-6 0 0 0)
        meshes=l_foot.vtp
    Body toes_l: mass=0.21879 mass_center=(0.033281 0.0057712 0.021225) inertia=(1.1784e-7 1.9911e-7 1.9911e-7 0 0 0)
        meshes=l_bofoot.vtp
    Body torso: mass=27.0982 mass_center=(-0.01429 0.30939 0.0022247) inertia=(0.0013923 0.00071336 0.0013516 0 0 0)
        meshes=(hat_spine.vtp hat_jaw.vtp hat_skull.vtp hat_ribs.vtp scapula_lv1.vtp scapula_rv1.vtp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)
    Body humerus_r: mass=2.0531 mass_center=(0 -0.16394 0) inertia=(1.1986e-5 4.1347e-6 1.3453e-5 0 0 0)
        meshes=humerus_rv.vtp
    Body ulna_r: mass=0.61365 mass_center=(0 -0.13738 0) inertia=(3.8879e-6 8.1118e-7 4.2173e-6 0 0 0)
        meshes=ulna_rv.vtp
    Body radius_r: mass=0.61365 mass_center=(0 -0.13738 0) inertia=(3.8879e-6 8.1118e-7 4.2173e-6 0 0 0)
        meshes=radius_rv.vtp
    Body hand_r: mass=0.46213 mass_center=(0 -0.077623 0) inertia=(1.1708e-6 7.1799e-7 1.7589e-6 0 0 0)
        meshes=(pisiform_rvs.vtp lunate_rvs.vtp scaphoid_rvs.vtp triquetrum_rvs.vtp hamate_rvs.vtp capitate_rvs.vtp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)
    Body humerus_l: mass=2.0531 mass_center=(0 -0.16394 0) inertia=(1.1986e-5 4.1347e-6 1.3453e-5 0 0 0)
        meshes=humerus_lv.vtp
    Body ulna_l: mass=0.61365 mass_center=(0 -0.13738 0) inertia=(3.8879e-6 8.1118e-7 4.2173e-6 0 0 0)
        meshes=ulna_lv.vtp
    Body radius_l: mass=0.61365 mass_center=(0 -0.13738 0) inertia=(3.8879e-6 8.1118e-7 4.2173e-6 0 0 0)
        meshes=radius_lv.vtp
    Body hand_l: mass=0.46213 mass_center=(0 -0.077623 0) inertia=(1.1708e-6 7.1799e-7 1.7589e-6 0 0 0)
        meshes=(pisiform_lvs.vtp lunate_lvs.vtp scaphoid_lvs.vtp triquetrum_lvs.vtp hamate_lvs.vtp capitate_lvs.vtp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)
  JointSet:
    CustomJoint ground_pelvis: socket_parent_frame=ground_offset socket_child_frame=pelvis_offset
      Coordinate pelvis_tilt: default_value=0 range=(-1.5708 1.5708) clamped=true
      Coordinate pelvis_list: default_value=0 range=(-1.5708 1.5708) clamped=true
      Coordinate pelvis_rotation: default_value=0 range=(-1.5708 1.5708) clamped=true
      Coordinate pelvis_tx: default_value=0 range=(-20 20) clamped=true
      Coordinate pelvis_ty: default_value=1.021 range=(-2 4) clamped=true
      Coordinate pelvis_tz: default_value=0 range=(-5 5) clamped=true
      PhysicalOffsetFrame ground_offset: socket_parent=/ground translation=(0 0 0) [meters]
      PhysicalOffsetFrame pelvis_offset: socket_parent=/bodyset/pelvis translation=(0 0 0)
      SpatialTransform:
        TransformAxis rotation1: coordinates=pelvis_tilt axis=(0 0 1) LinearFunction(coefficients=1 0)
        TransformAxis rotation2: coordinates=pelvis_list axis=(1 0 0) LinearFunction(coefficients=1 0)
        TransformAxis rotation3: coordinates=pelvis_rotation axis=(0 1 0) LinearFunction(coefficients=1 0)
        TransformAxis translation1: coordinates=pelvis_tx axis=(1 0 0)
            MultiplierFunction(scale=1, LinearFunction(coefficients=1 0))
        TransformAxis translation2: coordinates=pelvis_ty axis=(0 1 0)
            MultiplierFunction(scale=1, LinearFunction(coefficients=1 0))
        TransformAxis translation3: coordinates=pelvis_tz axis=(0 0 1)
            MultiplierFunction(scale=1, LinearFunction(coefficients=1 0))
    CustomJoint hip_r: socket_parent_frame=pelvis_offset socket_child_frame=femur_r_offset
      Coordinate hip_flexion_r: default_value=0 range=(-0.69813 1.7453) clamped=true
      Coordinate hip_adduction_r: default_value=0 range=(-0.5236 0.5236) clamped=true
      Coordinate hip_rotation_r: default_value=0 range=(-0.5236 0.5236) clamped=true
      PhysicalOffsetFrame pelvis_offset: socket_parent=/bodyset/pelvis translation=(-0.059934 -0.056035 0.070785)
      PhysicalOffsetFrame femur_r_offset: socket_parent=/bodyset/femur_r translation=(0 0 0)
      SpatialTransform: axes_held_at_zero=(translation1 translation2 translation3)
        TransformAxis rotation1: coordinates=hip_flexion_r axis=(0 0 1) LinearFunction(coefficients=1 0)
        TransformAxis rotation2: coordinates=hip_adduction_r axis=(1 0 0) LinearFunction(coefficients=1 0)
        TransformAxis rotation3: coordinates=hip_rotation_r axis=(0 1 0) LinearFunction(coefficients=1 0)
    CustomJoint knee_r: socket_parent_frame=femur_r_offset socket_child_frame=tibia_r_offset
      Coordinate knee_angle_r: default_value=0 range=(-2.7925 0.17453) clamped=true
      PhysicalOffsetFrame femur_r_offset: socket_parent=/bodyset/femur_r translation=(0 0 0)
      PhysicalOffsetFrame tibia_r_offset: socket_parent=/bodyset/tibia_r translation=(0 0 0)
      SpatialTransform: axes_held_at_zero=(rotation2 rotation3 translation3)
        TransformAxis rotation1: coordinates=knee_angle_r axis=(0 0 1) LinearFunction(coefficients=1 0)
        TransformAxis translation1: coordinates=knee_angle_r axis=(1 0 0)
          MultiplierFunction: scale=1.0688
            SimmSpline: x=(-2.0944 -1.7453 -1.3963 -1.0472 -0.69813 -0.34907 -0.17453 0.19734 0.33739 0.49018 1.5215 2.0944)
                y=(-0.0032 0.00179 0.00411 0.0041 0.00212 -0.001 -0.0031 -0.005227 -0.005435 -0.005574 -0.005435 -0.00525)
        TransformAxis translation2: coordinates=knee_angle_r axis=(0 1 0)
          MultiplierFunction: scale=1.0688
            SimmSpline: x=(-2.0944 -1.2217 -0.5236 -0.34907 -0.17453 0.15915 2.0944)
                y=(-0.4226 -0.4082 -0.399 -0.3976 -0.3966 -0.39526 -0.396)
    CustomJoint ankle_r: socket_parent_frame=tibia_r_offset socket_child_frame=talus_r_offset
      Coordinate ankle_angle_r: default_value=0 range=(-1.0472 0.69813) clamped=true
      PhysicalOffsetFrame tibia_r_offset: socket_parent=/bodyset/tibia_r translation=(0 -0.4908 0)
      PhysicalOffsetFrame talus_r_offset: socket_parent=/bodyset/talus_r translation=(0 0 0)
      SpatialTransform: axes_held_at_zero=(rotation2 rotation3 translation1 translation2 translation3)
        TransformAxis rotation1: coordinates=ankle_angle_r axis=(-0.10501 -0.17402 0.97913)
            LinearFunction(coefficients=1 0)
    CustomJoint hip_l: socket_parent_frame=pelvis_offset socket_child_frame=femur_l_offset
      Coordinate hip_flexion_l: default_value=0 range=(-0.69813 1.7453) clamped=true
      Coordinate hip_adduction_l: default_value=0 range=(-0.5236 0.5236) clamped=true
      Coordinate hip_rotation_l: default_value=0 range=(-0.5236 0.5236) clamped=true
      PhysicalOffsetFrame pelvis_offset: socket_parent=/bodyset/pelvis translation=(-0.059934 -0.056035 -0.070785)
      PhysicalOffsetFrame femur_l_offset: socket_parent=/bodyset/femur_l translation=(0 0 0)
      SpatialTransform: axes_held_at_zero=(translation1 translation2 translation3)
        TransformAxis rotation1: coordinates=hip_flexion_l axis=(0 0 1) LinearFunction(coefficients=1 0)
        TransformAxis rotation2: coordinates=hip_adduction_l axis=(-1 0 0) LinearFunction(coefficients=1 0)
        TransformAxis rotation3: coordinates=hip_rotation_l axis=(0 -1 0) LinearFunction(coefficients=1 0)
    CustomJoint knee_l: socket_parent_frame=femur_l_offset socket_child_frame=tibia_l_offset
      Coordinate knee_angle_l: default_value=0 range=(-2.7925 0.17453) clamped=true
      PhysicalOffsetFrame femur_l_offset: socket_parent=/bodyset/femur_l translation=(0 0 0)
      PhysicalOffsetFrame tibia_l_offset: socket_parent=/bodyset/tibia_l translation=(0 0 0)
      SpatialTransform: axes_held_at_zero=(rotation2 rotation3 translation3)
        TransformAxis rotation1: coordinates=knee_angle_l axis=(0 0 1) LinearFunction(coefficients=1 0)
        TransformAxis translation1: coordinates=knee_angle_l axis=(1 0 0)
          MultiplierFunction: scale=1.0688
            SimmSpline: x=(-2.0944 -1.7453 -1.3963 -1.0472 -0.69813 -0.34907 -0.17453 0.19734 0.33739 0.49018 1.5215 2.0944)
                y=(-0.0032 0.00179 0.00411 0.0041 0.00212 -0.001 -0.0031 -0.005227 -0.005435 -0.005574 -0.005435 -0.00525)
        TransformAxis translation2: coordinates=knee_angle_l axis=(0 1 0)
          MultiplierFunction: scale=1.0688
            SimmSpline: x=(-2.0944 -1.2217 -0.5236 -0.34907 -0.17453 0.15915 2.0944)
                y=(-0.4226 -0.4082 -0.399 -0.3976 -0.3966 -0.39526 -0.396)
    CustomJoint ankle_l: socket_parent_frame=tibia_l_offset socket_child_frame=talus_l_offset
      Coordinate ankle_angle_l: default_value=0 range=(-1.0472 0.69813) clamped=true
      PhysicalOffsetFrame tibia_l_offset: socket_parent=/bodyset/tibia_l translation=(0 -0.4908 0)
      PhysicalOffsetFrame talus_l_offset: socket_parent=/bodyset/talus_l translation=(0 0 0)
      SpatialTransform: axes_held_at_zero=(rotation2 rotation3 translation1 translation2 translation3)
        TransformAxis rotation1: coordinates=ankle_angle_l axis=(0.10501 0.17402 0.97913)
            LinearFunction(coefficients=1 0)
    CustomJoint back: socket_parent_frame=pelvis_offset socket_child_frame=torso_offset
      Coordinate lumbar_extension: default_value=0 range=(-0.7854 0.17453) clamped=true
      Coordinate lumbar_bending: default_value=0 range=(-0.34907 0.34907) clamped=true
      Coordinate lumbar_rotation: default_value=0 range=(-0.5236 0.5236) clamped=true
      PhysicalOffsetFrame pelvis_offset: socket_parent=/bodyset/pelvis translation=(-0.085366 0.06909 0)
      PhysicalOffsetFrame torso_offset: socket_parent=/bodyset/torso translation=(0 0 0)
      SpatialTransform: axes_held_at_zero=(translation1 translation2 translation3)
        TransformAxis rotation1: coordinates=lumbar_extension axis=(0 0 1) LinearFunction(coefficients=1 0)
        TransformAxis rotation2: coordinates=lumbar_bending axis=(1 0 0) LinearFunction(coefficients=1 0)
        TransformAxis rotation3: coordinates=lumbar_rotation axis=(0 1 0) LinearFunction(coefficients=1 0)
    CustomJoint acromial_r: socket_parent_frame=torso_offset socket_child_frame=humerus_r_offset
      Coordinate arm_flex_r: default_value=0 range=(-1.5708 1.5708) clamped=true
      Coordinate arm_add_r: default_value=0 range=(-2.0944 1.5708) clamped=true
      Coordinate arm_rot_r: default_value=0 range=(-1.5708 1.5708) clamped=true
      PhysicalOffsetFrame torso_offset: socket_parent=/bodyset/torso translation=(0.0030504 0.35918 0.16436)
      PhysicalOffsetFrame humerus_r_offset: socket_parent=/bodyset/humerus_r translation=(0 0 0)
      SpatialTransform: axes_held_at_zero=(translation1 translation2 translation3)
        TransformAxis rotation1: coordinates=arm_flex_r axis=(0 0 1) LinearFunction(coefficients=1 0)
        TransformAxis rotation2: coordinates=arm_add_r axis=(1 0 0) LinearFunction(coefficients=1 0)
        TransformAxis rotation3: coordinates=arm_rot_r axis=(0 1 0) LinearFunction(coefficients=1 0)
    CustomJoint elbow_r: socket_parent_frame=humerus_r_offset socket_child_frame=ulna_r_offset
      Coordinate elbow_flex_r: default_value=0 range=(-0.17453 2.618) clamped=true
      PhysicalOffsetFrame humerus_r_offset: socket_parent=/bodyset/humerus_r translation=(0.0131 -0.2853 -0.0095626)
      PhysicalOffsetFrame ulna_r_offset: socket_parent=/bodyset/ulna_r translation=(0 0 0)
      SpatialTransform: axes_held_at_zero=(rotation2 rotation3 translation1 translation2 translation3)
        TransformAxis rotation1: coordinates=elbow_flex_r axis=(0.22605 0.022269 0.97386)
            LinearFunction(coefficients=1 0)
    CustomJoint radioulnar_r: socket_parent_frame=ulna_r_offset socket_child_frame=radius_r_offset
      Coordinate pro_sup_r: default_value=0 range=(0 3.1416) clamped=true
      PhysicalOffsetFrame ulna_r_offset: socket_parent=/bodyset/ulna_r translation=(-0.0076683 -0.014827 0.029733)
      PhysicalOffsetFrame radius_r_offset: socket_parent=/bodyset/radius_r translation=(0 0 0)
      SpatialTransform: axes_held_at_zero=(rotation2 rotation3 translation1 translation2 translation3)
        TransformAxis rotation1: coordinates=pro_sup_r axis=(0.056398 0.99841 0.001952)
            LinearFunction(coefficients=1 0)
    CustomJoint acromial_l: socket_parent_frame=torso_offset socket_child_frame=humerus_l_offset
      Coordinate arm_flex_l: default_value=0 range=(-1.5708 1.5708) clamped=true
      Coordinate arm_add_l: default_value=0 range=(-2.0944 1.5708) clamped=true
      Coordinate arm_rot_l: default_value=0 range=(-1.5708 1.5708) clamped=true
      PhysicalOffsetFrame torso_offset: socket_parent=/bodyset/torso translation=(0.0030504 0.35918 -0.16436)
      PhysicalOffsetFrame humerus_l_offset: socket_parent=/bodyset/humerus_l translation=(0 0 0)
      SpatialTransform: axes_held_at_zero=(translation1 translation2 translation3)
        TransformAxis rotation1: coordinates=arm_flex_l axis=(0 0 1) LinearFunction(coefficients=1 0)
        TransformAxis rotation2: coordinates=arm_add_l axis=(-1 0 0) LinearFunction(coefficients=1 0)
        TransformAxis rotation3: coordinates=arm_rot_l axis=(0 -1 0) LinearFunction(coefficients=1 0)
    CustomJoint elbow_l: socket_parent_frame=humerus_l_offset socket_child_frame=ulna_l_offset
      Coordinate elbow_flex_l: default_value=0 range=(-0.17453 2.618) clamped=true
      PhysicalOffsetFrame humerus_l_offset: socket_parent=/bodyset/humerus_l translation=(0.0131 -0.2853 0.0095626)
      PhysicalOffsetFrame ulna_l_offset: socket_parent=/bodyset/ulna_l translation=(0 0 0)
      SpatialTransform: axes_held_at_zero=(rotation2 rotation3 translation1 translation2 translation3)
        TransformAxis rotation1: coordinates=elbow_flex_l axis=(-0.22605 -0.022269 0.97386)
            LinearFunction(coefficients=1 0)
    CustomJoint radioulnar_l: socket_parent_frame=ulna_l_offset socket_child_frame=radius_l_offset
      Coordinate pro_sup_l: default_value=0 range=(0 3.1416) clamped=true
      PhysicalOffsetFrame ulna_l_offset: socket_parent=/bodyset/ulna_l translation=(-0.0076683 -0.014827 -0.029733)
      PhysicalOffsetFrame radius_l_offset: socket_parent=/bodyset/radius_l translation=(0 0 0)
      SpatialTransform: axes_held_at_zero=(rotation2 rotation3 translation1 translation2 translation3)
        TransformAxis rotation1: coordinates=pro_sup_l axis=(-0.056398 -0.99841 0.001952)
            LinearFunction(coefficients=1 0)
    WeldJoint subtalar_r: socket_parent_frame=talus_r_offset socket_child_frame=calcn_r_offset
      PhysicalOffsetFrame talus_r_offset: socket_parent=/bodyset/talus_r translation=(-0.055666 -0.047881 0.0085195)
      PhysicalOffsetFrame calcn_r_offset: socket_parent=/bodyset/calcn_r translation=(0 0 0)
    WeldJoint subtalar_l: socket_parent_frame=talus_l_offset socket_child_frame=calcn_l_offset
      PhysicalOffsetFrame talus_l_offset: socket_parent=/bodyset/talus_l translation=(-0.055666 -0.047881 -0.0085195)
      PhysicalOffsetFrame calcn_l_offset: socket_parent=/bodyset/calcn_l translation=(0 0 0)
    WeldJoint mtp_r: socket_parent_frame=calcn_r_offset socket_child_frame=toes_r_offset
      PhysicalOffsetFrame calcn_r_offset: socket_parent=/bodyset/calcn_r translation=(0.17198 -0.0019237 0.0013099)
      PhysicalOffsetFrame toes_r_offset: socket_parent=/bodyset/toes_r translation=(0 0 0)
    WeldJoint mtp_l: socket_parent_frame=calcn_l_offset socket_child_frame=toes_l_offset
      PhysicalOffsetFrame calcn_l_offset: socket_parent=/bodyset/calcn_l translation=(0.17198 -0.0019237 -0.0013099)
      PhysicalOffsetFrame toes_l_offset: socket_parent=/bodyset/toes_l translation=(0 0 0)
    WeldJoint radius_hand_r: socket_parent_frame=radius_r_offset socket_child_frame=hand_r_offset
      PhysicalOffsetFrame radius_r_offset: socket_parent=/bodyset/radius_r translation=(-0.010028 -0.26884 0.015514)
      PhysicalOffsetFrame hand_r_offset: socket_parent=/bodyset/hand_r translation=(0 0 0)
    WeldJoint radius_hand_l: socket_parent_frame=radius_l_offset socket_child_frame=hand_l_offset
      PhysicalOffsetFrame radius_l_offset: socket_parent=/bodyset/radius_l translation=(-0.010028 -0.26884 -0.015514)
      PhysicalOffsetFrame hand_l_offset: socket_parent=/bodyset/hand_l translation=(0 0 0)
  ForceSet:
    DeGrooteFregly2016Muscle [values shared by the 86 below unless stated]: min_control=0.01
        max_contraction_velocity=100000 ignore_tendon_compliance=true activation_time_constant=0.01
        deactivation_time_constant=0.04 default_activation=0.05 active_force_width_scale=5 fiber_damping=0
        tendon_strain_at_one_norm_force=0.033 ignore_passive_fiber_force=true
    DeGrooteFregly2016Muscle glut_med1_r: max_isometric_force=4914 optimal_fiber_length=0.049845
        tendon_slack_length=0.072671 pennation_angle_at_optimal=0.13963 [radians]
        passive_fiber_strain_at_one_norm_force=2
      PathPoint P1: pelvis (-0.034587 0.025771 0.10249)
      PathPoint P2: femur_r (-0.0233 -0.012505 0.07051)
    DeGrooteFregly2016Muscle glut_med2_r: max_isometric_force=3438 optimal_fiber_length=0.080209
        tendon_slack_length=0.050309 pennation_angle_at_optimal=0 passive_fiber_strain_at_one_norm_force=2
      PathPoint P1: pelvis (-0.072481 0.037724 0.064936)
      PathPoint P2: femur_r (-0.027575 -0.006199 0.066952)
    DeGrooteFregly2016Muscle glut_med3_r: max_isometric_force=3918 optimal_fiber_length=0.063704
        tendon_slack_length=0.052265 pennation_angle_at_optimal=0.3578 passive_fiber_strain_at_one_norm_force=2
      PathPoint P1: pelvis (-0.10368 0.0089012 0.054933)
      PathPoint P2: femur_r (-0.033026 -0.0050233 0.065809)
    DeGrooteFregly2016Muscle glut_min1_r: max_isometric_force=1620 optimal_fiber_length=0.069785
        tendon_slack_length=0.01642 pennation_angle_at_optimal=0.17453 passive_fiber_strain_at_one_norm_force=0.6
      PathPoint P1: pelvis (-0.039589 -0.0067818 0.08952)
      PathPoint P2: femur_r (-0.0076953 -0.011115 0.071145)
    DeGrooteFregly2016Muscle glut_min2_r: max_isometric_force=1710 optimal_fiber_length=0.065219
        tendon_slack_length=0.020348 pennation_angle_at_optimal=0 passive_fiber_strain_at_one_norm_force=0.6
      PathPoint P1: pelvis (-0.053661 -0.0055102 0.08401)
      PathPoint P2: femur_r (-0.01026 -0.011115 0.071145)
    DeGrooteFregly2016Muscle glut_min3_r: max_isometric_force=1938 optimal_fiber_length=0.039898
        tendon_slack_length=0.053548 pennation_angle_at_optimal=0.017453 passive_fiber_strain_at_one_norm_force=0.6
      PathPoint P1: pelvis (-0.070701 -0.0053407 0.072566)
      PathPoint P2: femur_r (-0.014429 -0.008871 0.069874)
    DeGrooteFregly2016Muscle semimem_r: max_isometric_force=7728 optimal_fiber_length=0.087532
        tendon_slack_length=0.37639 pennation_angle_at_optimal=0.2618 passive_fiber_strain_at_one_norm_force=0.6
      PathPoint P1: pelvis (-0.10105 -0.082628 0.060621)
      ConditionalPathPoint P2: tibia_r (-0.03972 -0.040166 -0.020341) socket_coordinate=/jointset/knee_r/knee_angle_r
          range=(-0.55851 0.17453) [radians]
      PathPoint P3: tibia_r (-0.030818 -0.054456 -0.021051)
    DeGrooteFregly2016Muscle semiten_r: max_isometric_force=2460 optimal_fiber_length=0.22247
        tendon_slack_length=0.30493 pennation_angle_at_optimal=0.2269 passive_fiber_strain_at_one_norm_force=0.6
      PathPoint P1: pelvis (-0.10711 -0.093148 0.051194)
      ConditionalPathPoint P2: tibia_r (-0.047973 -0.032632 -0.024494) socket_coordinate=/jointset/knee_r/knee_angle_r
          range=(-0.33161 0.17453)
      PathPoint P3: tibia_r (-0.037917 -0.060288 -0.024612)
      PathPoint P4: tibia_r (-0.012898 -0.085148 -0.026355)
      PathPoint P5: tibia_r (0.0030817 -0.10912 -0.020761)
    DeGrooteFregly2016Muscle bifemlh_r: max_isometric_force=5376 optimal_fiber_length=0.10958
        tendon_slack_length=0.36708 pennation_angle_at_optimal=0.20246 passive_fiber_strain_at_one_norm_force=0.6
      PathPoint P1: pelvis (-0.10678 -0.086952 0.058866)
      PathPoint P2: tibia_r (-0.034356 -0.04109 0.031658)
      PathPoint P3: tibia_r (-0.026709 -0.06426 0.036896)
    DeGrooteFregly2016Muscle bifemsh_r: max_isometric_force=4824 optimal_fiber_length=0.11986
        tendon_slack_length=0.16485 pennation_angle_at_optimal=0.21468 passive_fiber_strain_at_one_norm_force=0.6
      PathPoint P1: femur_r (0.005344 -0.22562 0.029728)
      PathPoint P2: tibia_r (-0.034356 -0.04109 0.031658)
      PathPoint P3: tibia_r (-0.026709 -0.06426 0.036896)
    DeGrooteFregly2016Muscle sar_r: max_isometric_force=936 optimal_fiber_length=0.42486 tendon_slack_length=0.14759
        pennation_angle_at_optimal=0.02269 passive_fiber_strain_at_one_norm_force=0.6
      PathPoint P1: pelvis (-0.01297 -0.0011021 0.10529)
      PathPoint P2: femur_r (-0.0032064 -0.38135 -0.053486)
      PathPoint P3: tibia_r (-0.0063918 -0.047824 -0.04292)
      PathPoint P4: tibia_r (0.0068483 -0.067228 -0.041199)
      PathPoint P5: tibia_r (0.027736 -0.095877 -0.027108)
    DeGrooteFregly2016Muscle add_long_r: max_isometric_force=3762 optimal_fiber_length=0.11481
        tendon_slack_length=0.14834 pennation_angle_at_optimal=0.12391 passive_fiber_strain_at_one_norm_force=0.6
      PathPoint P1: pelvis (-0.026788 -0.07087 0.014327)
      PathPoint P2: femur_r (0.005344 -0.22562 0.029728)
    DeGrooteFregly2016Muscle add_brev_r: max_isometric_force=2574 optimal_fiber_length=0.10846
        tendon_slack_length=0.052601 pennation_angle_at_optimal=0.10647 passive_fiber_strain_at_one_norm_force=0.6
      PathPoint P1: pelvis (-0.049762 -0.077567 0.013903)
      PathPoint P2: femur_r (0.00096191 -0.12783 0.037351)
    DeGrooteFregly2016Muscle add_mag1_r: max_isometric_force=2286 optimal_fiber_length=0.09505
        tendon_slack_length=0.032776 pennation_angle_at_optimal=0.2618 passive_fiber_strain_at_one_norm_force=0.6
      PathPoint P1: pelvis (-0.062054 -0.099523 0.021617)
      PathPoint P2: femur_r (-0.0048096 -0.12943 0.043068)
    DeGrooteFregly2016Muscle add_mag2_r: max_isometric_force=2058 optimal_fiber_length=0.13439
        tendon_slack_length=0.099956 pennation_angle_at_optimal=0.2618 passive_fiber_strain_at_one_norm_force=0.6
      PathPoint P1: pelvis (-0.070446 -0.10105 0.02611)
      PathPoint P2: femur_r (0.0057715 -0.24422 0.028839)
    DeGrooteFregly2016Muscle add_mag3_r: max_isometric_force=2928 optimal_fiber_length=0.14362
        tendon_slack_length=0.27298 pennation_angle_at_optimal=0.2618 passive_fiber_strain_at_one_norm_force=0.6
      PathPoint P1: pelvis (-0.094166 -0.096751 0.041386)
      PathPoint P2: femur_r (0.0074816 -0.4101 -0.033794)
    DeGrooteFregly2016Muscle tfl_r: max_isometric_force=1398 optimal_fiber_length=0.099706 tendon_slack_length=0.44605
        pennation_angle_at_optimal=0.05236 passive_fiber_strain_at_one_norm_force=0.6
      PathPoint P1: pelvis (-0.026364 0.018141 0.1052)
      PathPoint P2: femur_r (0.031423 -0.10634 0.075845)
      PathPoint P3: femur_r (0.0057715 -0.43275 0.045355)
      PathPoint P4: tibia_r (0.011003 -0.021878 0.038654)
      PathPoint P5: tibia_r (0.0068483 -0.055586 0.031948)
    DeGrooteFregly2016Muscle pect_r: max_isometric_force=1596 optimal_fiber_length=0.10439 tendon_slack_length=0.03445
        pennation_angle_at_optimal=0 passive_fiber_strain_at_one_norm_force=0.6
      PathPoint P1: pelvis (-0.036537 -0.065106 0.038233)
      PathPoint P2: femur_r (-0.013039 -0.087855 0.032142)
    DeGrooteFregly2016Muscle grac_r: max_isometric_force=972 optimal_fiber_length=0.25282 tendon_slack_length=0.27768
        pennation_angle_at_optimal=0.14312 passive_fiber_strain_at_one_norm_force=0.6
      PathPoint P1: pelvis (-0.06274 -0.10063 0.023686)
      ConditionalPathPoint P2: tibia_r (-0.030327 -0.03641 -0.040597) socket_coordinate=/jointset/knee_r/knee_angle_r
          range=(-0.43633 0.17453)
      PathPoint P3: tibia_r (-0.022177 -0.058816 -0.03851)
      PathPoint P4: tibia_r (0.0068483 -0.09542 -0.024526)
    DeGrooteFregly2016Muscle glut_max1_r: max_isometric_force=3438 optimal_fiber_length=0.13838
        tendon_slack_length=0.097448 pennation_angle_at_optimal=0.087266 passive_fiber_strain_at_one_norm_force=2.5
      PathPoint P1: pelvis (-0.1013 0.051881 0.059341)
      PathPoint P2: pelvis (-0.11967 -0.0020006 0.073312)
      PathPoint P3: femur_r (-0.082425 0.0042324 0.030453)
      PathPoint P4: femur_r (-0.067965 -0.031978 0.046841)
      PathPoint P5: femur_r (-0.029606 -0.060494 0.059711)
    DeGrooteFregly2016Muscle glut_max2_r: max_isometric_force=4914 optimal_fiber_length=0.14615
        tendon_slack_length=0.10638 pennation_angle_at_optimal=0 passive_fiber_strain_at_one_norm_force=2.5
      PathPoint P1: pelvis (-0.11436 0.01492 0.047727)
      PathPoint P2: pelvis (-0.13124 -0.018574 0.064063)
      PathPoint P3: femur_r (-0.082169 -0.020799 0.019171)
      PathPoint P4: femur_r (-0.063732 -0.060889 0.04364)
      PathPoint P5: femur_r (-0.016673 -0.10859 0.053232)
    DeGrooteFregly2016Muscle glut_max3_r: max_isometric_force=3312 optimal_fiber_length=0.14488
        tendon_slack_length=0.1308 pennation_angle_at_optimal=0.523 passive_fiber_strain_at_one_norm_force=2.5
      PathPoint P1: pelvis (-0.13191 -0.026619 0.0049168)
      PathPoint P2: pelvis (-0.13102 -0.083688 0.042827)
      ConditionalPathPoint P3: pelvis (-0.086468 -0.11462 0.056187) socket_coordinate=/jointset/hip_r/hip_flexion_r
          range=(0.75049 1.7453)
      PathPoint P4: femur_r (-0.06153 -0.095614 -0.0018548)
      PathPoint P5: femur_r (-0.044622 -0.11578 0.015626)
      PathPoint P6: femur_r (-0.0064128 -0.15166 0.052215)
    DeGrooteFregly2016Muscle iliacus_r: max_isometric_force=6438 optimal_fiber_length=0.097906
        tendon_slack_length=0.12931 pennation_angle_at_optimal=0.25 passive_fiber_strain_at_one_norm_force=0.42
      PathPoint P1: pelvis (-0.057137 0.030942 0.072396)
      PathPoint P2: pelvis (-0.012945 -0.056993 0.068751)
      ConditionalPathPoint P3: pelvis (-0.015488 -0.07861 0.069175) socket_coordinate=/jointset/hip_r/hip_flexion_r
          range=(-1.5708 0.61087)
      PathPoint P4: femur_r (0.013071 -0.071107 0.0072415)
      PathPoint P5: femur_r (-0.020628 -0.066372 0.016389)
    DeGrooteFregly2016Muscle psoas_r: max_isometric_force=6678 optimal_fiber_length=0.094994
        tendon_slack_length=0.17642 pennation_angle_at_optimal=0.185 passive_fiber_strain_at_one_norm_force=0.42
      PathPoint P1: pelvis (-0.054848 0.075194 0.024499)
      PathPoint P2: pelvis (-0.010207 -0.05879 0.064343)
      ConditionalPathPoint P3: pelvis (-0.014445 -0.078712 0.069175) socket_coordinate=/jointset/hip_r/hip_flexion_r
          range=(-1.5708 0.66323)
      PathPoint P4: femur_r (0.014279 -0.067387 0.0048277)
      PathPoint P5: femur_r (-0.020093 -0.063807 0.013213)
    DeGrooteFregly2016Muscle quad_fem_r: max_isometric_force=2286 optimal_fiber_length=0.05695
        tendon_slack_length=0.025311 pennation_angle_at_optimal=0 passive_fiber_strain_at_one_norm_force=0.6
      PathPoint P1: pelvis (-0.096895 -0.097574 0.044082)
      PathPoint P2: femur_r (-0.040721 -0.03837 0.046498)
    DeGrooteFregly2016Muscle gem_r: max_isometric_force=984 optimal_fiber_length=0.026262 tendon_slack_length=0.042676
        pennation_angle_at_optimal=0 passive_fiber_strain_at_one_norm_force=0.6
      PathPoint P1: pelvis (-0.096048 -0.069514 0.060528)
      PathPoint P2: femur_r (-0.015177 -0.003527 0.056281)
    DeGrooteFregly2016Muscle peri_r: max_isometric_force=2664 optimal_fiber_length=0.024722 tendon_slack_length=0.10935
        pennation_angle_at_optimal=0.17453 passive_fiber_strain_at_one_norm_force=5
      PathPoint P1: pelvis (-0.11834 0.00025432 0.019922)
      PathPoint P2: pelvis (-0.10113 -0.023397 0.055696)
      PathPoint P3: femur_r (-0.015818 -0.0038477 0.055518)
    DeGrooteFregly2016Muscle rect_fem_r: max_isometric_force=7014 optimal_fiber_length=0.1256
        tendon_slack_length=0.3611 pennation_angle_at_optimal=0.2426 passive_fiber_strain_at_one_norm_force=0.6
      PathPoint P1: pelvis (-0.025008 -0.026364 0.08206)
      ConditionalPathPoint P2: femur_r (0.032502 -0.43025 0.0026044) socket_coordinate=/jointset/knee_r/knee_angle_r
          range=(-2.7925 -1.46)
      MovingPathPoint P3: tibia_r socket_x_coordinate=/jointset/knee_r/knee_angle_r
          socket_y_coordinate=/jointset/knee_r/knee_angle_r socket_z_coordinate=/jointset/knee_r/knee_angle_r
        x_location: MultiplierFunction: scale=1.1414
          SimmSpline: x=(-2.0944 -2 -1.5708 -1.2882 -0.99101 -0.71974 -0.43723 -0.04248 0.40863 0.62692 0.73297)
              y=(-0.000189 0.002224 0.011737 0.017393 0.022498 0.026714 0.031087 0.034849 0.032975 0.028122 0.021101)
        y_location: MultiplierFunction: scale=1.1414
          SimmSpline: x=(-2.0944 -2 -1.5708 -1.4575 -1.3963 -0.91009 -0.17407 0.36671 0.76781 1.306 2.0944)
              y=(0.022415 0.022765 0.024126 0.024293 0.024329 0.022237 0.017842 0.013652 0.0092854 -0.00023045 -0.06562)
        z_location: MultiplierFunction: scale=1.0757
          SimmSpline: x=(-2.0944 0.1745) y=(0.0014 0.0014)
    DeGrooteFregly2016Muscle vas_med_r: max_isometric_force=7764 optimal_fiber_length=0.10672
        tendon_slack_length=0.12273 pennation_angle_at_optimal=0.51662 passive_fiber_strain_at_one_norm_force=5
      PathPoint P1: femur_r (0.014963 -0.22434 0.023884)
      PathPoint P2: femur_r (0.038049 -0.29595 0.0011434)
      ConditionalPathPoint P3: femur_r (0.036649 -0.43082 -0.014915) socket_coordinate=/jointset/knee_r/knee_angle_r
          range=(-2.7925 -1.21)
      ConditionalPathPoint P4: femur_r (0.029948 -0.44697 -0.016999) socket_coordinate=/jointset/knee_r/knee_angle_r
          range=(-2.7925 -1.7802)
      MovingPathPoint P5: tibia_r socket_x_coordinate=/jointset/knee_r/knee_angle_r
          socket_y_coordinate=/jointset/knee_r/knee_angle_r socket_z_coordinate=/jointset/knee_r/knee_angle_r
        x_location: MultiplierFunction: scale=1.1414
          SimmSpline: x=(-2.0944 -2 -1.5708 -1.2882 -0.99101 -0.71974 -0.43723 -0.04248 0.40863 0.62692 0.73297)
              y=(-0.000189 0.002224 0.011737 0.017393 0.022498 0.026714 0.031087 0.034849 0.032975 0.028122 0.021101)
        y_location: MultiplierFunction: scale=1.1414
          SimmSpline: x=(-2.0944 -2 -1.5708 -1.4575 -1.3963 -0.91009 -0.17407 0.36671 0.76781 1.306 2.0944)
              y=(0.022415 0.022765 0.024126 0.024293 0.024329 0.022237 0.017842 0.013652 0.0092854 -0.00023045 -0.06562)
        z_location: MultiplierFunction: scale=1.0757
          SimmSpline: x=(-2.0944 2.0944) y=(-0.0146 -0.0146)
    DeGrooteFregly2016Muscle vas_int_r: max_isometric_force=8190 optimal_fiber_length=0.092961
        tendon_slack_length=0.14532 pennation_angle_at_optimal=0.07854 passive_fiber_strain_at_one_norm_force=5
      PathPoint P1: femur_r (0.030995 -0.20564 0.039384)
      PathPoint P2: femur_r (0.035805 -0.22274 0.036208)
      ConditionalPathPoint P3: femur_r (0.033229 -0.4303 0.001461) socket_coordinate=/jointset/knee_r/knee_angle_r
          range=(-2.7925 -1.3963)
      MovingPathPoint P4: tibia_r socket_x_coordinate=/jointset/knee_r/knee_angle_r
          socket_y_coordinate=/jointset/knee_r/knee_angle_r socket_z_coordinate=/jointset/knee_r/knee_angle_r
        x_location: MultiplierFunction: scale=1.1414
          SimmSpline: x=(-2.0944 -2 -1.5708 -1.2882 -0.99101 -0.71974 -0.43723 -0.04248 0.40863 0.62692 0.73297)
              y=(-0.000189 0.002224 0.011737 0.017393 0.022498 0.026714 0.031087 0.034849 0.032975 0.028122 0.021101)
        y_location: MultiplierFunction: scale=1.1414
          SimmSpline: x=(-2.0944 -2 -1.5708 -1.4575 -1.3963 -0.91009 -0.17407 0.36671 0.76781 1.306 2.0944)
              y=(0.022415 0.022765 0.024126 0.024293 0.024329 0.022237 0.017842 0.013652 0.0092854 -0.00023045 -0.06562)
        z_location: MultiplierFunction: scale=1.0757
          SimmSpline: x=(-2.0944 0.1745) y=(-0.0014 -0.0014)
    DeGrooteFregly2016Muscle vas_lat_r: max_isometric_force=11226 optimal_fiber_length=0.10732
        tendon_slack_length=0.15133 pennation_angle_at_optimal=0.32114 passive_fiber_strain_at_one_norm_force=5
      PathPoint P1: femur_r (0.0051302 -0.19815 0.044338)
      PathPoint P2: femur_r (0.028751 -0.27692 0.051961)
      ConditionalPathPoint P3: femur_r (0.037098 -0.40914 0.028344) socket_coordinate=/jointset/knee_r/knee_angle_r
          range=(-2.7925 -1.0472)
      ConditionalPathPoint P4: femur_r (0.031016 -0.44408 0.022766) socket_coordinate=/jointset/knee_r/knee_angle_r
          range=(-2.7925 -1.5708)
      MovingPathPoint P5: tibia_r socket_x_coordinate=/jointset/knee_r/knee_angle_r
          socket_y_coordinate=/jointset/knee_r/knee_angle_r socket_z_coordinate=/jointset/knee_r/knee_angle_r
        x_location: MultiplierFunction: scale=1.1414
          SimmSpline: x=(-2.0944 -2 -1.5708 -1.2882 -0.99101 -0.71974 -0.43723 -0.04248 0.40863 0.62692 0.73297)
              y=(-0.000189 0.002224 0.011737 0.017393 0.022498 0.026714 0.031087 0.034849 0.032975 0.028122 0.021101)
        y_location: MultiplierFunction: scale=1.1414
          SimmSpline: x=(-2.0944 -2 -1.5708 -1.4575 -1.3963 -0.91009 -0.17407 0.36671 0.76781 1.306 2.0944)
              y=(0.022415 0.022765 0.024126 0.024293 0.024329 0.022237 0.017842 0.013652 0.0092854 -0.00023045 -0.06562)
        z_location: MultiplierFunction: scale=1.0757
          SimmSpline: x=(-2.0944 2.0944) y=(0.0165 0.0165)
    DeGrooteFregly2016Muscle med_gas_r: max_isometric_force=9348 optimal_fiber_length=0.068869
        tendon_slack_length=0.46142 pennation_angle_at_optimal=0.35 passive_fiber_strain_at_one_norm_force=1.3
        tendon_strain_at_one_norm_force=0.07
      PathPoint P1: femur_r (-0.0030781 -0.40938 -0.032739)
      ConditionalPathPoint P2: femur_r (-0.013787 -0.40857 -0.031901) socket_coordinate=/jointset/knee_r/knee_angle_r
          range=(-1.6057 0.17453)
      ConditionalPathPoint P3: femur_r (-0.027404 -0.4127 -0.030973) socket_coordinate=/jointset/knee_r/knee_angle_r
          range=(-1.2217 0.17453)
      ConditionalPathPoint P4: femur_r (-0.036745 -0.42004 -0.031024) socket_coordinate=/jointset/knee_r/knee_angle_r
          range=(-0.87266 0.17453)
      ConditionalPathPoint P5: femur_r (-0.039406 -0.43032 -0.029423) socket_coordinate=/jointset/knee_r/knee_angle_r
          range=(-0.17453 0.17453)
      PathPoint P6: calcn_r (0 0.029818 -0.0064282)
    DeGrooteFregly2016Muscle lat_gas_r: max_isometric_force=4098 optimal_fiber_length=0.074574
        tendon_slack_length=0.45433 pennation_angle_at_optimal=0.21 passive_fiber_strain_at_one_norm_force=1.3
        tendon_strain_at_one_norm_force=0.07
      PathPoint P1: femur_r (-0.001507 -0.41103 0.025434)
      ConditionalPathPoint P2: femur_r (-0.010239 -0.40908 0.025002) socket_coordinate=/jointset/knee_r/knee_angle_r
          range=(-1.7453 0.17453)
      ConditionalPathPoint P3: femur_r (-0.023791 -0.41033 0.024329) socket_coordinate=/jointset/knee_r/knee_angle_r
          range=(-1.3963 0.17453)
      ConditionalPathPoint P4: femur_r (-0.033934 -0.41551 0.023452) socket_coordinate=/jointset/knee_r/knee_angle_r
          range=(-1.0472 0.17453)
      ConditionalPathPoint P5: femur_r (-0.039161 -0.42126 0.024075) socket_coordinate=/jointset/knee_r/knee_angle_r
          range=(-0.69813 0.17453)
      ConditionalPathPoint P6: femur_r (-0.040133 -0.43575 0.023173) socket_coordinate=/jointset/knee_r/knee_angle_r
          range=(0 0.17453)
      PathPoint P7: calcn_r (0 0.029818 -0.0064282)
    DeGrooteFregly2016Muscle soleus_r: max_isometric_force=21294 optimal_fiber_length=0.058013
        tendon_slack_length=0.29007 pennation_angle_at_optimal=0.576 passive_fiber_strain_at_one_norm_force=0.6
        tendon_strain_at_one_norm_force=0.07
      PathPoint P1: tibia_r (-0.0027393 -0.17498 0.0076374)
      PathPoint P2: calcn_r (0 0.029818 -0.0064282)
    DeGrooteFregly2016Muscle tib_post_r: max_isometric_force=9528 optimal_fiber_length=0.042903
        tendon_slack_length=0.34413 pennation_angle_at_optimal=0.24435 passive_fiber_strain_at_one_norm_force=0.6
      PathPoint P1: tibia_r (-0.010729 -0.15386 0.0020438)
      PathPoint P2: tibia_r (-0.016436 -0.46238 -0.024633)
      PathPoint P3: calcn_r (0.04011 0.032126 -0.034688)
      PathPoint P4: calcn_r (0.074256 0.015294 -0.034082)
    DeGrooteFregly2016Muscle flex_dig_r: max_isometric_force=1860 optimal_fiber_length=0.048664
        tendon_slack_length=0.42067 pennation_angle_at_optimal=0.24435 passive_fiber_strain_at_one_norm_force=0.6
      PathPoint P1: tibia_r (-0.0094735 -0.23353 -0.0019363)
      PathPoint P2: tibia_r (-0.017577 -0.46238 -0.021084)
      PathPoint P3: calcn_r (0.041938 0.030299 -0.03396)
      PathPoint P4: calcn_r (0.0681 0.016929 -0.031898)
      PathPoint P5: calcn_r (0.15948 -0.0077911 0.014069)
      PathPoint P6: toes_r (-0.0018276 -0.0075026 0.017829)
      PathPoint P7: toes_r (0.027413 -0.0068293 0.026077)
      PathPoint P8: toes_r (0.042418 -0.0057712 0.029351)
    DeGrooteFregly2016Muscle flex_hal_r: max_isometric_force=1932 optimal_fiber_length=0.056089
        tendon_slack_length=0.39379 pennation_angle_at_optimal=0.2967 passive_fiber_strain_at_one_norm_force=0.6
      PathPoint P1: tibia_r (-0.009017 -0.2664 0.026247)
      PathPoint P2: tibia_r (-0.02123 -0.46557 -0.018717)
      PathPoint P3: calcn_r (0.035974 0.026548 -0.02923)
      PathPoint P4: calcn_r (0.099842 0.0065407 -0.031049)
      PathPoint P5: calcn_r (0.16602 -0.0050979 -0.032626)
      PathPoint P6: toes_r (0.014909 -0.006156 -0.032141)
      PathPoint P7: toes_r (0.054057 -0.0098111 -0.021953)
    DeGrooteFregly2016Muscle tib_ant_r: max_isometric_force=5430 optimal_fiber_length=0.078736
        tendon_slack_length=0.28232 pennation_angle_at_optimal=0.17453 passive_fiber_strain_at_one_norm_force=0.6
      PathPoint P1: tibia_r (0.020431 -0.18536 0.012371)
      PathPoint P2: tibia_r (0.037552 -0.45096 -0.01904)
      PathPoint P3: calcn_r (0.11215 0.017121 -0.036992)
    DeGrooteFregly2016Muscle per_brev_r: max_isometric_force=2610 optimal_fiber_length=0.05661
        tendon_slack_length=0.18229 pennation_angle_at_optimal=0.2 passive_fiber_strain_at_one_norm_force=0.6
      PathPoint P1: tibia_r (-0.0079897 -0.30201 0.03496)
      PathPoint P2: tibia_r (-0.0226 -0.47756 0.030442)
      PathPoint P3: tibia_r (-0.016436 -0.49023 0.031088)
      PathPoint P4: calcn_r (0.045304 0.02597 0.02826)
      PathPoint P5: calcn_r (0.065119 0.021065 0.041601)
    DeGrooteFregly2016Muscle per_long_r: max_isometric_force=5658 optimal_fiber_length=0.054958
        tendon_slack_length=0.38695 pennation_angle_at_optimal=0.2618 passive_fiber_strain_at_one_norm_force=0.6
      PathPoint P1: tibia_r (0.00057069 -0.17897 0.03894)
      PathPoint P2: tibia_r (-0.023627 -0.47995 0.030765)
      PathPoint P3: tibia_r (-0.018491 -0.49297 0.031088)
      PathPoint P4: calcn_r (0.04213 0.022123 0.026804)
      PathPoint P5: calcn_r (0.065503 0.010196 0.034445)
      PathPoint P6: calcn_r (0.081951 0.0066369 0.014312)
      PathPoint P7: calcn_r (0.11571 0.0081759 -0.022317)
    DeGrooteFregly2016Muscle per_tert_r: max_isometric_force=1080 optimal_fiber_length=0.09129
        tendon_slack_length=0.11556 pennation_angle_at_optimal=0.22689 passive_fiber_strain_at_one_norm_force=0.6
      PathPoint P1: tibia_r (0.0011414 -0.32005 0.024849)
      PathPoint P2: tibia_r (0.026138 -0.46443 0.017104)
      PathPoint P3: calcn_r (0.082432 0.021931 0.036265)
    DeGrooteFregly2016Muscle ext_dig_r: max_isometric_force=3072 optimal_fiber_length=0.076618
        tendon_slack_length=0.41264 pennation_angle_at_optimal=0.2 passive_fiber_strain_at_one_norm_force=0.6
      PathPoint P1: tibia_r (0.0036524 -0.15763 0.029689)
      PathPoint P2: tibia_r (0.032986 -0.45735 0.007745)
      PathPoint P3: calcn_r (0.088684 0.037321 -0.00012129)
      PathPoint P4: calcn_r (0.15544 0.0052903 0.015767)
      PathPoint P5: toes_r (0.00028856 0.0045208 0.018557)
      PathPoint P6: toes_r (0.042611 -0.00038475 0.030322)
    DeGrooteFregly2016Muscle ext_hal_r: max_isometric_force=972 optimal_fiber_length=0.092418
        tendon_slack_length=0.35989 pennation_angle_at_optimal=0.17453 passive_fiber_strain_at_one_norm_force=0.6
      PathPoint P1: tibia_r (0.0013697 -0.20168 0.024526)
      PathPoint P2: tibia_r (0.037209 -0.45484 -0.0091434)
      PathPoint P3: calcn_r (0.093301 0.037417 -0.025592)
      PathPoint P4: calcn_r (0.12437 0.029722 -0.031171)
      PathPoint P5: calcn_r (0.16679 0.01337 -0.03396)
      PathPoint P6: toes_r (0.028664 0.0039437 -0.029715)
      PathPoint P7: toes_r (0.054153 0.0032704 -0.022559)
    DeGrooteFregly2016Muscle glut_med1_l: max_isometric_force=4914 optimal_fiber_length=0.049845
        tendon_slack_length=0.072671 pennation_angle_at_optimal=0.13963 passive_fiber_strain_at_one_norm_force=2
      PathPoint P1: pelvis (-0.034587 0.025771 -0.10249)
      PathPoint P2: femur_l (-0.0233 -0.012505 -0.07051)
    DeGrooteFregly2016Muscle glut_med2_l: max_isometric_force=3438 optimal_fiber_length=0.080209
        tendon_slack_length=0.050309 pennation_angle_at_optimal=0 passive_fiber_strain_at_one_norm_force=2
      PathPoint P1: pelvis (-0.072481 0.037724 -0.064936)
      PathPoint P2: femur_l (-0.027575 -0.006199 -0.066952)
    DeGrooteFregly2016Muscle glut_med3_l: max_isometric_force=3918 optimal_fiber_length=0.063704
        tendon_slack_length=0.052265 pennation_angle_at_optimal=0.3578 passive_fiber_strain_at_one_norm_force=2
      PathPoint P1: pelvis (-0.10368 0.0089012 -0.054933)
      PathPoint P2: femur_l (-0.033026 -0.0050233 -0.065809)
    DeGrooteFregly2016Muscle glut_min1_l: max_isometric_force=1620 optimal_fiber_length=0.069785
        tendon_slack_length=0.01642 pennation_angle_at_optimal=0.17453 passive_fiber_strain_at_one_norm_force=0.6
      PathPoint P1: pelvis (-0.039589 -0.0067818 -0.08952)
      PathPoint P2: femur_l (-0.0076953 -0.011115 -0.071145)
    DeGrooteFregly2016Muscle glut_min2_l: max_isometric_force=1710 optimal_fiber_length=0.065219
        tendon_slack_length=0.020348 pennation_angle_at_optimal=0 passive_fiber_strain_at_one_norm_force=0.6
      PathPoint P1: pelvis (-0.053661 -0.0055102 -0.08401)
      PathPoint P2: femur_l (-0.01026 -0.011115 -0.071145)
    DeGrooteFregly2016Muscle glut_min3_l: max_isometric_force=1938 optimal_fiber_length=0.039898
        tendon_slack_length=0.053548 pennation_angle_at_optimal=0.017453 passive_fiber_strain_at_one_norm_force=0.6
      PathPoint P1: pelvis (-0.070701 -0.0053407 -0.072566)
      PathPoint P2: femur_l (-0.014429 -0.008871 -0.069874)
    DeGrooteFregly2016Muscle semimem_l: max_isometric_force=7728 optimal_fiber_length=0.087532
        tendon_slack_length=0.37639 pennation_angle_at_optimal=0.2618 passive_fiber_strain_at_one_norm_force=0.6
      PathPoint P1: pelvis (-0.10105 -0.082628 -0.060621)
      ConditionalPathPoint P2: tibia_l (-0.03972 -0.040166 0.020341) socket_coordinate=/jointset/knee_l/knee_angle_l
          range=(-0.55851 0.17453)
      PathPoint P3: tibia_l (-0.030818 -0.054456 0.021051)
    DeGrooteFregly2016Muscle semiten_l: max_isometric_force=2460 optimal_fiber_length=0.22247
        tendon_slack_length=0.30493 pennation_angle_at_optimal=0.2269 passive_fiber_strain_at_one_norm_force=0.6
      PathPoint P1: pelvis (-0.10711 -0.093148 -0.051194)
      ConditionalPathPoint P2: tibia_l (-0.047973 -0.032632 0.024494) socket_coordinate=/jointset/knee_l/knee_angle_l
          range=(-0.33161 0.17453)
      PathPoint P3: tibia_l (-0.037917 -0.060288 0.024612)
      PathPoint P4: tibia_l (-0.012898 -0.085148 0.026355)
      PathPoint P5: tibia_l (0.0030817 -0.10912 0.020761)
    DeGrooteFregly2016Muscle bifemlh_l: max_isometric_force=5376 optimal_fiber_length=0.10958
        tendon_slack_length=0.36708 pennation_angle_at_optimal=0.20246 passive_fiber_strain_at_one_norm_force=0.6
      PathPoint P1: pelvis (-0.10678 -0.086952 -0.058866)
      PathPoint P2: tibia_l (-0.034356 -0.04109 -0.031658)
      PathPoint P3: tibia_l (-0.026709 -0.06426 -0.036896)
    DeGrooteFregly2016Muscle bifemsh_l: max_isometric_force=4824 optimal_fiber_length=0.11986
        tendon_slack_length=0.16485 pennation_angle_at_optimal=0.21468 passive_fiber_strain_at_one_norm_force=0.6
      PathPoint P1: femur_l (0.005344 -0.22562 -0.029728)
      PathPoint P2: tibia_l (-0.034356 -0.04109 -0.031658)
      PathPoint P3: tibia_l (-0.026709 -0.06426 -0.036896)
    DeGrooteFregly2016Muscle sar_l: max_isometric_force=936 optimal_fiber_length=0.42486 tendon_slack_length=0.14759
        pennation_angle_at_optimal=0.02269 passive_fiber_strain_at_one_norm_force=0.6
      PathPoint P1: pelvis (-0.01297 -0.0011021 -0.10529)
      PathPoint P2: femur_l (-0.0032064 -0.38135 0.053486)
      PathPoint P3: tibia_l (-0.0063918 -0.047824 0.04292)
      PathPoint P4: tibia_l (0.0068483 -0.067228 0.041199)
      PathPoint P5: tibia_l (0.027736 -0.095877 0.027108)
    DeGrooteFregly2016Muscle add_long_l: max_isometric_force=3762 optimal_fiber_length=0.11481
        tendon_slack_length=0.14834 pennation_angle_at_optimal=0.12391 passive_fiber_strain_at_one_norm_force=0.6
      PathPoint P1: pelvis (-0.026788 -0.07087 -0.014327)
      PathPoint P2: femur_l (0.005344 -0.22562 -0.029728)
    DeGrooteFregly2016Muscle add_brev_l: max_isometric_force=2574 optimal_fiber_length=0.10846
        tendon_slack_length=0.052601 pennation_angle_at_optimal=0.10647 passive_fiber_strain_at_one_norm_force=0.6
      PathPoint P1: pelvis (-0.049762 -0.077567 -0.013903)
      PathPoint P2: femur_l (0.00096191 -0.12783 -0.037351)
    DeGrooteFregly2016Muscle add_mag1_l: max_isometric_force=2286 optimal_fiber_length=0.09505
        tendon_slack_length=0.032776 pennation_angle_at_optimal=0.2618 passive_fiber_strain_at_one_norm_force=0.6
      PathPoint P1: pelvis (-0.062054 -0.099523 -0.021617)
      PathPoint P2: femur_l (-0.0048096 -0.12943 -0.043068)
    DeGrooteFregly2016Muscle add_mag2_l: max_isometric_force=2058 optimal_fiber_length=0.13439
        tendon_slack_length=0.099956 pennation_angle_at_optimal=0.2618 passive_fiber_strain_at_one_norm_force=0.6
      PathPoint P1: pelvis (-0.070446 -0.10105 -0.02611)
      PathPoint P2: femur_l (0.0057715 -0.24422 -0.028839)
    DeGrooteFregly2016Muscle add_mag3_l: max_isometric_force=2928 optimal_fiber_length=0.14362
        tendon_slack_length=0.27298 pennation_angle_at_optimal=0.2618 passive_fiber_strain_at_one_norm_force=0.6
      PathPoint P1: pelvis (-0.094166 -0.096751 -0.041386)
      PathPoint P2: femur_l (0.0074816 -0.4101 0.033794)
    DeGrooteFregly2016Muscle tfl_l: max_isometric_force=1398 optimal_fiber_length=0.099707 tendon_slack_length=0.44606
        pennation_angle_at_optimal=0.05236 passive_fiber_strain_at_one_norm_force=0.6
      PathPoint P1: pelvis (-0.026364 0.018141 -0.1052)
      PathPoint P2: femur_l (0.031423 -0.10634 -0.075845)
      PathPoint P3: femur_l (0.0057715 -0.43275 -0.045355)
      PathPoint P4: tibia_l (0.011003 -0.02188 -0.03865)
      PathPoint P5: tibia_l (0.0068483 -0.055586 -0.031948)
    DeGrooteFregly2016Muscle pect_l: max_isometric_force=1596 optimal_fiber_length=0.10439 tendon_slack_length=0.03445
        pennation_angle_at_optimal=0 passive_fiber_strain_at_one_norm_force=0.6
      PathPoint P1: pelvis (-0.036537 -0.065106 -0.038233)
      PathPoint P2: femur_l (-0.013039 -0.087855 -0.032142)
    DeGrooteFregly2016Muscle grac_l: max_isometric_force=972 optimal_fiber_length=0.25282 tendon_slack_length=0.27768
        pennation_angle_at_optimal=0.14312 passive_fiber_strain_at_one_norm_force=0.6
      PathPoint P1: pelvis (-0.06274 -0.10063 -0.023686)
      ConditionalPathPoint P2: tibia_l (-0.030327 -0.03641 0.040597) socket_coordinate=/jointset/knee_l/knee_angle_l
          range=(-0.43633 0.17453)
      PathPoint P3: tibia_l (-0.022177 -0.058816 0.03851)
      PathPoint P4: tibia_l (0.0068483 -0.09542 0.024526)
    DeGrooteFregly2016Muscle glut_max1_l: max_isometric_force=3438 optimal_fiber_length=0.13838
        tendon_slack_length=0.097448 pennation_angle_at_optimal=0.087266 passive_fiber_strain_at_one_norm_force=2.5
      PathPoint P1: pelvis (-0.1013 0.051881 -0.059341)
      PathPoint P2: pelvis (-0.11967 -0.0020006 -0.073312)
      PathPoint P3: femur_l (-0.082425 0.0042324 -0.030453)
      PathPoint P4: femur_l (-0.067965 -0.031978 -0.046841)
      PathPoint P5: femur_l (-0.029606 -0.060494 -0.059711)
    DeGrooteFregly2016Muscle glut_max2_l: max_isometric_force=4914 optimal_fiber_length=0.14615
        tendon_slack_length=0.10638 pennation_angle_at_optimal=0 passive_fiber_strain_at_one_norm_force=2.5
      PathPoint P1: pelvis (-0.11436 0.01492 -0.047727)
      PathPoint P2: pelvis (-0.13124 -0.018574 -0.064063)
      PathPoint P3: femur_l (-0.082169 -0.020799 -0.019171)
      PathPoint P4: femur_l (-0.063732 -0.060889 -0.04364)
      PathPoint P5: femur_l (-0.016673 -0.10859 -0.053232)
    DeGrooteFregly2016Muscle glut_max3_l: max_isometric_force=3312 optimal_fiber_length=0.14488
        tendon_slack_length=0.1308 pennation_angle_at_optimal=0.523 passive_fiber_strain_at_one_norm_force=2.5
      PathPoint P1: pelvis (-0.13191 -0.026619 -0.0049168)
      PathPoint P2: pelvis (-0.13102 -0.083688 -0.042827)
      ConditionalPathPoint P3: pelvis (-0.086468 -0.11462 -0.056187) socket_coordinate=/jointset/hip_l/hip_flexion_l
          range=(0.75049 1.7453)
      PathPoint P4: femur_l (-0.06153 -0.095614 0.0018548)
      PathPoint P5: femur_l (-0.044622 -0.11578 -0.015626)
      PathPoint P6: femur_l (-0.0064128 -0.15166 -0.052215)
    DeGrooteFregly2016Muscle iliacus_l: max_isometric_force=6438 optimal_fiber_length=0.097906
        tendon_slack_length=0.12931 pennation_angle_at_optimal=0.25 passive_fiber_strain_at_one_norm_force=0.42
      PathPoint P1: pelvis (-0.057137 0.030942 -0.072396)
      PathPoint P2: pelvis (-0.012945 -0.056993 -0.068751)
      ConditionalPathPoint P3: pelvis (-0.015488 -0.07861 -0.069175) socket_coordinate=/jointset/hip_l/hip_flexion_l
          range=(-1.5708 0.61087)
      PathPoint P4: femur_l (0.013071 -0.071107 -0.0072415)
      PathPoint P5: femur_l (-0.020628 -0.066372 -0.016389)
    DeGrooteFregly2016Muscle psoas_l: max_isometric_force=6678 optimal_fiber_length=0.094994
        tendon_slack_length=0.17642 pennation_angle_at_optimal=0.185 passive_fiber_strain_at_one_norm_force=0.42
      PathPoint P1: pelvis (-0.054848 0.075194 -0.024499)
      PathPoint P2: pelvis (-0.010207 -0.05879 -0.064343)
      ConditionalPathPoint P3: pelvis (-0.014445 -0.078712 -0.069175) socket_coordinate=/jointset/hip_l/hip_flexion_l
          range=(-1.5708 0.66323)
      PathPoint P4: femur_l (0.014279 -0.067387 -0.0048277)
      PathPoint P5: femur_l (-0.020093 -0.063807 -0.013213)
    DeGrooteFregly2016Muscle quad_fem_l: max_isometric_force=2286 optimal_fiber_length=0.05695
        tendon_slack_length=0.025311 pennation_angle_at_optimal=0 passive_fiber_strain_at_one_norm_force=0.6
      PathPoint P1: pelvis (-0.096895 -0.097574 -0.044082)
      PathPoint P2: femur_l (-0.040721 -0.03837 -0.046498)
    DeGrooteFregly2016Muscle gem_l: max_isometric_force=984 optimal_fiber_length=0.026262 tendon_slack_length=0.042676
        pennation_angle_at_optimal=0 passive_fiber_strain_at_one_norm_force=0.6
      PathPoint P1: pelvis (-0.096048 -0.069514 -0.060528)
      PathPoint P2: femur_l (-0.015177 -0.003527 -0.056281)
    DeGrooteFregly2016Muscle peri_l: max_isometric_force=2664 optimal_fiber_length=0.024722 tendon_slack_length=0.10935
        pennation_angle_at_optimal=0.17453 passive_fiber_strain_at_one_norm_force=5
      PathPoint P1: pelvis (-0.11834 0.00025432 -0.019922)
      PathPoint P2: pelvis (-0.10113 -0.023397 -0.055696)
      PathPoint P3: femur_l (-0.015818 -0.0038477 -0.055518)
    DeGrooteFregly2016Muscle rect_fem_l: max_isometric_force=7014 optimal_fiber_length=0.1256
        tendon_slack_length=0.3611 pennation_angle_at_optimal=0.2426 passive_fiber_strain_at_one_norm_force=0.6
      PathPoint P1: pelvis (-0.025008 -0.026364 -0.08206)
      ConditionalPathPoint P2: femur_l (0.032502 -0.43025 -0.0026044) socket_coordinate=/jointset/knee_l/knee_angle_l
          range=(-2.7925 -1.46)
      MovingPathPoint P3: tibia_l socket_x_coordinate=/jointset/knee_l/knee_angle_l
          socket_y_coordinate=/jointset/knee_l/knee_angle_l socket_z_coordinate=/jointset/knee_l/knee_angle_l
        x_location: MultiplierFunction: scale=1.1414
          SimmSpline: x=(-2.0944 -2 -1.5708 -1.2882 -0.99101 -0.71974 -0.43723 -0.04248 0.40863 0.62692 0.73297)
              y=(-0.000189 0.002224 0.011737 0.017393 0.022498 0.026714 0.031087 0.034849 0.032975 0.028122 0.021101)
        y_location: MultiplierFunction: scale=1.1414
          SimmSpline: x=(-2.0944 -2 -1.5708 -1.4575 -1.3963 -0.91009 -0.17407 0.36671 0.76781 1.306 2.0944)
              y=(0.022415 0.022765 0.024126 0.024293 0.024329 0.022237 0.017842 0.013652 0.0092854 -0.00023045 -0.06562)
        z_location: MultiplierFunction: scale=1.0757
          SimmSpline: x=(-2.0944 0.1745) y=(-0.0014 -0.0014)
    DeGrooteFregly2016Muscle vas_med_l: max_isometric_force=7764 optimal_fiber_length=0.10672
        tendon_slack_length=0.12273 pennation_angle_at_optimal=0.51662 passive_fiber_strain_at_one_norm_force=5
      PathPoint P1: femur_l (0.014963 -0.22434 -0.023884)
      PathPoint P2: femur_l (0.038049 -0.29595 -0.0011434)
      ConditionalPathPoint P3: femur_l (0.036649 -0.43082 0.014915) socket_coordinate=/jointset/knee_l/knee_angle_l
          range=(-2.7925 -1.21)
      ConditionalPathPoint P4: femur_l (0.029948 -0.44697 0.016999) socket_coordinate=/jointset/knee_l/knee_angle_l
          range=(-2.7925 -1.7802)
      MovingPathPoint P5: tibia_l socket_x_coordinate=/jointset/knee_l/knee_angle_l
          socket_y_coordinate=/jointset/knee_l/knee_angle_l socket_z_coordinate=/jointset/knee_l/knee_angle_l
        x_location: MultiplierFunction: scale=1.1414
          SimmSpline: x=(-2.0944 -2 -1.5708 -1.2882 -0.99101 -0.71974 -0.43723 -0.04248 0.40863 0.62692 0.73297)
              y=(-0.000189 0.002224 0.011737 0.017393 0.022498 0.026714 0.031087 0.034849 0.032975 0.028122 0.021101)
        y_location: MultiplierFunction: scale=1.1414
          SimmSpline: x=(-2.0944 -2 -1.5708 -1.4575 -1.3963 -0.91009 -0.17407 0.36671 0.76781 1.306 2.0944)
              y=(0.022415 0.022765 0.024126 0.024293 0.024329 0.022237 0.017842 0.013652 0.0092854 -0.00023045 -0.06562)
        z_location: MultiplierFunction: scale=1.0757
          SimmSpline: x=(-2.0944 2.0944) y=(0.0146 0.0146)
    DeGrooteFregly2016Muscle vas_int_l: max_isometric_force=8190 optimal_fiber_length=0.092916
        tendon_slack_length=0.14525 pennation_angle_at_optimal=0.07854 passive_fiber_strain_at_one_norm_force=5
      PathPoint P1: femur_l (0.030995 -0.20564 -0.039384)
      PathPoint P2: femur_l (0.035805 -0.22274 -0.036208)
      ConditionalPathPoint P3: femur_l (0.033229 -0.4303 -0.001461) socket_coordinate=/jointset/knee_l/knee_angle_l
          range=(-2.7925 -1.3963)
      MovingPathPoint P4: tibia_l socket_x_coordinate=/jointset/knee_l/knee_angle_l
          socket_y_coordinate=/jointset/knee_l/knee_angle_l socket_z_coordinate=/jointset/knee_l/knee_angle_l
        x_location: MultiplierFunction: scale=1.1414
          SimmSpline: x=(-2.0944 -2 -1.5708 -1.2882 -0.99101 -0.71974 -0.43723 -0.04248 0.40863 0.62692 0.73297)
              y=(-0.000189 0.002224 0.011737 0.017393 0.022498 0.026714 0.031087 0.034849 0.032975 0.028122 0.021101)
        y_location: MultiplierFunction: scale=1.1414
          SimmSpline: x=(-2.0944 -2 -1.5708 -1.4575 -1.3963 -0.91009 -0.17407 0.36671 0.76781 1.306 2.0944)
              y=(0.022415 0.022765 0.024126 0.024293 0.024329 0.022237 0.017842 0.013652 0.0092854 -0.00023045 -0.06562)
        z_location: MultiplierFunction: scale=1.0757
          SimmSpline: x=(-2.0944 0.1745) y=(-0.0014 -0.0014)
    DeGrooteFregly2016Muscle vas_lat_l: max_isometric_force=11226 optimal_fiber_length=0.10732
        tendon_slack_length=0.15133 pennation_angle_at_optimal=0.32114 passive_fiber_strain_at_one_norm_force=5
      PathPoint P1: femur_l (0.0051302 -0.19815 -0.044338)
      PathPoint P2: femur_l (0.028751 -0.27692 -0.051961)
      ConditionalPathPoint P3: femur_l (0.037098 -0.40914 -0.028344) socket_coordinate=/jointset/knee_l/knee_angle_l
          range=(-2.7925 -1.0472)
      ConditionalPathPoint P4: femur_l (0.031016 -0.44408 -0.022766) socket_coordinate=/jointset/knee_l/knee_angle_l
          range=(-2.7925 -1.5708)
      MovingPathPoint P5: tibia_l socket_x_coordinate=/jointset/knee_l/knee_angle_l
          socket_y_coordinate=/jointset/knee_l/knee_angle_l socket_z_coordinate=/jointset/knee_l/knee_angle_l
        x_location: MultiplierFunction: scale=1.1414
          SimmSpline: x=(-2.0944 -2 -1.5708 -1.2882 -0.99101 -0.71974 -0.43723 -0.04248 0.40863 0.62692 0.73297)
              y=(-0.000189 0.002224 0.011737 0.017393 0.022498 0.026714 0.031087 0.034849 0.032975 0.028122 0.021101)
        y_location: MultiplierFunction: scale=1.1414
          SimmSpline: x=(-2.0944 -2 -1.5708 -1.4575 -1.3963 -0.91009 -0.17407 0.36671 0.76781 1.306 2.0944)
              y=(0.022415 0.022765 0.024126 0.024293 0.024329 0.022237 0.017842 0.013652 0.0092854 -0.00023045 -0.06562)
        z_location: MultiplierFunction: scale=1.0757
          SimmSpline: x=(-2.0944 2.0944) y=(-0.0165 -0.0165)
    DeGrooteFregly2016Muscle med_gas_l: max_isometric_force=9348 optimal_fiber_length=0.068869
        tendon_slack_length=0.46142 pennation_angle_at_optimal=0.35 passive_fiber_strain_at_one_norm_force=1.3
        tendon_strain_at_one_norm_force=0.07
      PathPoint P1: femur_l (-0.0030781 -0.40938 0.032739)
      ConditionalPathPoint P2: femur_l (-0.013787 -0.40857 0.031901) socket_coordinate=/jointset/knee_l/knee_angle_l
          range=(-1.6057 0.17453)
      ConditionalPathPoint P3: femur_l (-0.027404 -0.4127 0.030973) socket_coordinate=/jointset/knee_l/knee_angle_l
          range=(-1.2217 0.17453)
      ConditionalPathPoint P4: femur_l (-0.036745 -0.42004 0.031024) socket_coordinate=/jointset/knee_l/knee_angle_l
          range=(-0.87266 0.17453)
      ConditionalPathPoint P5: femur_l (-0.039406 -0.43032 0.029423) socket_coordinate=/jointset/knee_l/knee_angle_l
          range=(-0.17453 0.17453)
      PathPoint P6: calcn_l (0 0.029818 0.0064282)
    DeGrooteFregly2016Muscle lat_gas_l: max_isometric_force=4098 optimal_fiber_length=0.074574
        tendon_slack_length=0.45433 pennation_angle_at_optimal=0.21 passive_fiber_strain_at_one_norm_force=1.3
        tendon_strain_at_one_norm_force=0.07
      PathPoint P1: femur_l (-0.001507 -0.41103 -0.025434)
      ConditionalPathPoint P2: femur_l (-0.010239 -0.40908 -0.025002) socket_coordinate=/jointset/knee_l/knee_angle_l
          range=(-1.7453 0.17453)
      ConditionalPathPoint P3: femur_l (-0.023791 -0.41033 -0.024329) socket_coordinate=/jointset/knee_l/knee_angle_l
          range=(-1.3963 0.17453)
      ConditionalPathPoint P4: femur_l (-0.033934 -0.41551 -0.023452) socket_coordinate=/jointset/knee_l/knee_angle_l
          range=(-1.0472 0.17453)
      ConditionalPathPoint P5: femur_l (-0.039161 -0.42126 -0.024075) socket_coordinate=/jointset/knee_l/knee_angle_l
          range=(-0.69813 0.17453)
      ConditionalPathPoint P6: femur_l (-0.040133 -0.43575 -0.023173) socket_coordinate=/jointset/knee_l/knee_angle_l
          range=(0 0.17453)
      PathPoint P7: calcn_l (0 0.029818 0.0064282)
    DeGrooteFregly2016Muscle soleus_l: max_isometric_force=21294 optimal_fiber_length=0.058013
        tendon_slack_length=0.29007 pennation_angle_at_optimal=0.576 passive_fiber_strain_at_one_norm_force=0.6
        tendon_strain_at_one_norm_force=0.07
      PathPoint P1: tibia_l (-0.0027393 -0.17498 -0.0076374)
      PathPoint P2: calcn_l (0 0.029818 0.0064282)
    DeGrooteFregly2016Muscle tib_post_l: max_isometric_force=9528 optimal_fiber_length=0.042903
        tendon_slack_length=0.34413 pennation_angle_at_optimal=0.24435 passive_fiber_strain_at_one_norm_force=0.6
      PathPoint P1: tibia_l (-0.010729 -0.15386 -0.0020438)
      PathPoint P2: tibia_l (-0.016436 -0.46238 0.024633)
      PathPoint P3: calcn_l (0.04011 0.032126 0.034688)
      PathPoint P4: calcn_l (0.074256 0.015294 0.034082)
    DeGrooteFregly2016Muscle flex_dig_l: max_isometric_force=1860 optimal_fiber_length=0.048664
        tendon_slack_length=0.42067 pennation_angle_at_optimal=0.24435 passive_fiber_strain_at_one_norm_force=0.6
      PathPoint P1: tibia_l (-0.0094735 -0.23353 0.0019363)
      PathPoint P2: tibia_l (-0.017577 -0.46238 0.021084)
      PathPoint P3: calcn_l (0.041938 0.030299 0.03396)
      PathPoint P4: calcn_l (0.0681 0.016929 0.031898)
      PathPoint P5: calcn_l (0.15948 -0.0077911 -0.014069)
      PathPoint P6: toes_l (-0.0018276 -0.0075026 -0.017829)
      PathPoint P7: toes_l (0.027413 -0.0068293 -0.026077)
      PathPoint P8: toes_l (0.042418 -0.0057712 -0.029351)
    DeGrooteFregly2016Muscle flex_hal_l: max_isometric_force=1932 optimal_fiber_length=0.056089
        tendon_slack_length=0.39379 pennation_angle_at_optimal=0.2967 passive_fiber_strain_at_one_norm_force=0.6
      PathPoint P1: tibia_l (-0.009017 -0.2664 -0.026247)
      PathPoint P2: tibia_l (-0.02123 -0.46557 0.018717)
      PathPoint P3: calcn_l (0.035974 0.026548 0.02923)
      PathPoint P4: calcn_l (0.099842 0.0065407 0.031049)
      PathPoint P5: calcn_l (0.16602 -0.0050979 0.032626)
      PathPoint P6: toes_l (0.014909 -0.006156 0.032141)
      PathPoint P7: toes_l (0.054057 -0.0098111 0.021953)
    DeGrooteFregly2016Muscle tib_ant_l: max_isometric_force=5430 optimal_fiber_length=0.078736
        tendon_slack_length=0.28232 pennation_angle_at_optimal=0.17453 passive_fiber_strain_at_one_norm_force=0.6
      PathPoint P1: tibia_l (0.020431 -0.18536 -0.012371)
      PathPoint P2: tibia_l (0.037552 -0.45096 0.01904)
      PathPoint P3: calcn_l (0.11215 0.017121 0.036992)
    DeGrooteFregly2016Muscle per_brev_l: max_isometric_force=2610 optimal_fiber_length=0.05661
        tendon_slack_length=0.18229 pennation_angle_at_optimal=0.2 passive_fiber_strain_at_one_norm_force=0.6
      PathPoint P1: tibia_l (-0.0079897 -0.30201 -0.03496)
      PathPoint P2: tibia_l (-0.0226 -0.47756 -0.030442)
      PathPoint P3: tibia_l (-0.016436 -0.49023 -0.031088)
      PathPoint P4: calcn_l (0.045304 0.02597 -0.02826)
      PathPoint P5: calcn_l (0.065119 0.021065 -0.041601)
    DeGrooteFregly2016Muscle per_long_l: max_isometric_force=5658 optimal_fiber_length=0.054958
        tendon_slack_length=0.38695 pennation_angle_at_optimal=0.2618 passive_fiber_strain_at_one_norm_force=0.6
      PathPoint P1: tibia_l (0.00057069 -0.17897 -0.03894)
      PathPoint P2: tibia_l (-0.023627 -0.47995 -0.030765)
      PathPoint P3: tibia_l (-0.018491 -0.49297 -0.031088)
      PathPoint P4: calcn_l (0.04213 0.022123 -0.026804)
      PathPoint P5: calcn_l (0.065503 0.010196 -0.034445)
      PathPoint P6: calcn_l (0.081951 0.0066369 -0.014312)
      PathPoint P7: calcn_l (0.11571 0.0081759 0.022317)
    DeGrooteFregly2016Muscle per_tert_l: max_isometric_force=1080 optimal_fiber_length=0.09129
        tendon_slack_length=0.11556 pennation_angle_at_optimal=0.22689 passive_fiber_strain_at_one_norm_force=0.6
      PathPoint P1: tibia_l (0.0011414 -0.32005 -0.024849)
      PathPoint P2: tibia_l (0.026138 -0.46443 -0.017104)
      PathPoint P3: calcn_l (0.082432 0.021931 -0.036265)
    DeGrooteFregly2016Muscle ext_dig_l: max_isometric_force=3072 optimal_fiber_length=0.076618
        tendon_slack_length=0.41264 pennation_angle_at_optimal=0.2 passive_fiber_strain_at_one_norm_force=0.6
      PathPoint P1: tibia_l (0.0036524 -0.15763 -0.029689)
      PathPoint P2: tibia_l (0.032986 -0.45735 -0.007745)
      PathPoint P3: calcn_l (0.088684 0.037321 0.00012129)
      PathPoint P4: calcn_l (0.15544 0.0052903 -0.015767)
      PathPoint P5: toes_l (0.00028856 0.0045208 -0.018557)
      PathPoint P6: toes_l (0.042611 -0.00038475 -0.030322)
    DeGrooteFregly2016Muscle ext_hal_l: max_isometric_force=972 optimal_fiber_length=0.092418
        tendon_slack_length=0.35989 pennation_angle_at_optimal=0.17453 passive_fiber_strain_at_one_norm_force=0.6
      PathPoint P1: tibia_l (0.0013697 -0.20168 -0.024526)
      PathPoint P2: tibia_l (0.037209 -0.45484 0.0091434)
      PathPoint P3: calcn_l (0.093301 0.037417 0.025592)
      PathPoint P4: calcn_l (0.12437 0.029722 0.031171)
      PathPoint P5: calcn_l (0.16679 0.01337 0.03396)
      PathPoint P6: toes_l (0.028664 0.0039437 0.029715)
      PathPoint P7: toes_l (0.054153 0.0032704 0.022559)
    CoordinateActuator lumbar_extension_actuator: coordinate=lumbar_extension optimal_force=300
    CoordinateActuator lumbar_bending_actuator: coordinate=lumbar_bending optimal_force=300
    CoordinateActuator lumbar_rotation_actuator: coordinate=lumbar_rotation optimal_force=300
    CoordinateActuator arm_flex_r_actuator: coordinate=arm_flex_r optimal_force=300
    CoordinateActuator arm_add_r_actuator: coordinate=arm_add_r optimal_force=300
    CoordinateActuator arm_rot_r_actuator: coordinate=arm_rot_r optimal_force=300
    CoordinateActuator elbow_flex_r_actuator: coordinate=elbow_flex_r optimal_force=100
    CoordinateActuator pro_sup_r_actuator: coordinate=pro_sup_r optimal_force=100
    CoordinateActuator arm_flex_l_actuator: coordinate=arm_flex_l optimal_force=300
    CoordinateActuator arm_add_l_actuator: coordinate=arm_add_l optimal_force=300
    CoordinateActuator arm_rot_l_actuator: coordinate=arm_rot_l optimal_force=300
    CoordinateActuator elbow_flex_l_actuator: coordinate=elbow_flex_l optimal_force=100
    CoordinateActuator pro_sup_l_actuator: coordinate=pro_sup_l optimal_force=100
    CoordinateActuator hip_flexion_l_reserve: coordinate=hip_flexion_l optimal_force=2
    CoordinateActuator hip_adduction_l_reserve: coordinate=hip_adduction_l optimal_force=2
    CoordinateActuator hip_rotation_l_reserve: coordinate=hip_rotation_l optimal_force=2
    CoordinateActuator knee_angle_l_reserve: coordinate=knee_angle_l optimal_force=2
    CoordinateActuator ankle_angle_l_reserve: coordinate=ankle_angle_l optimal_force=2
    CoordinateActuator hip_flexion_r_reserve: coordinate=hip_flexion_r optimal_force=2
    CoordinateActuator hip_adduction_r_reserve: coordinate=hip_adduction_r optimal_force=2
    CoordinateActuator hip_rotation_r_reserve: coordinate=hip_rotation_r optimal_force=2
    CoordinateActuator knee_angle_r_reserve: coordinate=knee_angle_r optimal_force=2
    CoordinateActuator ankle_angle_r_reserve: coordinate=ankle_angle_r optimal_force=2
    SmoothSphereHalfSpaceForce [values shared by the 8 below unless stated]: socket_half_space=/contactgeometryset/floor
        stiffness=3067776 [N/m^2] dissipation=2 [s/m] static_friction=0.8 dynamic_friction=0.8 viscous_friction=0.5
        transition_velocity=0.2 [m/s] hertz_smoothing=300 hunt_crossley_smoothing=50
    SmoothSphereHalfSpaceForce contact_heel_r: socket_sphere=/contactgeometryset/heel_r
    SmoothSphereHalfSpaceForce contact_mt1_r: socket_sphere=/contactgeometryset/mt1_r
    SmoothSphereHalfSpaceForce contact_mt2_r: socket_sphere=/contactgeometryset/mt2_r
    SmoothSphereHalfSpaceForce contact_heel_l: socket_sphere=/contactgeometryset/heel_l
    SmoothSphereHalfSpaceForce contact_mt1_l: socket_sphere=/contactgeometryset/mt1_l
    SmoothSphereHalfSpaceForce contact_mt2_l: socket_sphere=/contactgeometryset/mt2_l
    SmoothSphereHalfSpaceForce contact_mtMid_r: socket_sphere=/contactgeometryset/mtMid_r
    SmoothSphereHalfSpaceForce contact_mtMid_l: socket_sphere=/contactgeometryset/mtMid_l
  MarkerSet:
    Marker RSH: torso (-0.042706 0.43466 0.16207)
    Marker LSH: torso (-0.039996 0.42799 -0.15958)
    Marker C7: torso (-0.06578 0.44214 -0.00605)
    Marker T7: torso (-0.10596 0.24405 -0.0039799)
    Marker MAN: torso (0.093354 0.3681 0.010041)
    Marker RASI: pelvis (0.027628 0.031464 0.10512)
    Marker LASI: pelvis (0.029193 0.035725 -0.11185)
    Marker SACR: pelvis (-0.15671 0.081672 -0.00092459)
    Marker RTHAP: femur_r (0.11317 -0.20783 0.036642)
    Marker RTHAD: femur_r (0.10236 -0.30531 0.025423)
    Marker RTHLD: femur_r (0.010313 -0.29504 0.11094)
    Marker RTHLP: femur_r (0.0017237 -0.18223 0.12393)
    Marker RLEPI: femur_r (0.009409 -0.44604 0.080508)
    Marker RMEPI: femur_r (-0.015762 -0.4559 -0.045144)
    Marker RTIAP: tibia_r (0.019959 -0.2345 -0.004359)
    Marker RTIAD: tibia_r (0.010577 -0.36033 -0.019176)
    Marker RTILAT: tibia_r (-0.019846 -0.24736 0.079752)
    Marker RLMAL: tibia_r (-0.010091 -0.4806 0.038811)
    Marker RMMAL: tibia_r (0.0050897 -0.46371 -0.05347)
    Marker RHEEL: calcn_r (-0.022593 0.020447 -0.018678)
    Marker RMFS: calcn_r (0.15173 0.052624 -0.011051)
    Marker RMFL: calcn_r (0.10843 0.025397 0.04395)
    Marker RP1MT: calcn_r (0.19202 0.002474 -0.051151)
    Marker RP5MT: calcn_r (0.16415 -0.0059433 0.073912)
    Marker RTOE: toes_r (0.076768 0.011904 -0.0093149)
    Marker LTHAP: femur_l (0.11732 -0.21565 -0.031036)
    Marker LTHAD: femur_l (0.098113 -0.3242 -0.017148)
    Marker LTHLD: femur_l (-0.00080824 -0.32389 -0.097826)
    Marker LTHLP: femur_l (-0.0063228 -0.21099 -0.11477)
    Marker LLEPI: femur_l (0.0059805 -0.44786 -0.075822)
    Marker LMEPI: femur_l (-0.010777 -0.45405 0.050007)
    Marker LTIAP: tibia_l (0.026827 -0.19444 0.0069953)
    Marker LTIAD: tibia_l (0.018827 -0.33319 0.010335)
    Marker LTILAT: tibia_l (-0.010274 -0.26459 -0.073198)
    Marker LLMAL: tibia_l (-0.0075709 -0.48119 -0.041435)
    Marker LMMAL: tibia_l (0.00027684 -0.46185 0.052073)
    Marker LHEEL: calcn_l (-0.021365 0.022057 0.012673)
    Marker LMFS: calcn_l (0.1446 0.050063 0.018591)
    Marker LMFL: calcn_l (0.11586 0.030843 -0.045601)
    Marker LP1MT: calcn_l (0.19016 -0.0020434 0.047887)
    Marker LP5MT: calcn_l (0.16684 -0.0021984 -0.076527)
    Marker LTOE: toes_l (0.074095 0.013336 0.011765)
    Marker RARM: humerus_r (-0.0061745 -0.15199 0.04168)
    Marker RELB: humerus_r (0.011633 -0.293 0.021684)
    Marker RFOREARM: radius_r (-0.040365 -0.12649 0.007551)
    Marker RWR: radius_r (-0.044397 -0.26518 0.010181)
    Marker LARM: humerus_l (-0.0061646 -0.15609 -0.040588)
    Marker LELB: humerus_l (0.0097855 -0.29233 -0.022575)
    Marker LFOREARM: radius_l (-0.042134 -0.1262 -0.0076254)
    Marker LWR: radius_l (-0.043407 -0.26608 -0.010087)
    Marker r_fp_heel1: calcn_r (0.01 0 -0.05)
    Marker r_fp_heel2: calcn_r (0 0 0.03)
    Marker r_fp_mt1: calcn_r (0.135 0 0.07)
    Marker r_fp_mt2: calcn_r (0.205 0 -0.05)
    Marker r_fp_toe: calcn_r (0.275 0 0.02)
    Marker l_fp_heel1: calcn_l (0.01 0 0.05)
    Marker l_fp_heel2: calcn_l (0 0 -0.03)
    Marker l_fp_mt1: calcn_l (0.135 0 -0.07)
    Marker l_fp_mt2: calcn_l (0.205 0 0.05)
    Marker l_fp_toe: calcn_l (0.275 0 -0.02)
  ContactGeometrySet:
    ContactHalfSpace floor: socket_frame=/ground orientation=(0 0 -1.570796)
    ContactSphere heel_r: socket_frame=/bodyset/calcn_r location=(0.005 0.02 -0.01) radius=0.04
    ContactSphere mt1_r: socket_frame=/bodyset/toes_r location=(-0.03698 0.0169237 0.0686901) radius=0.03
    ContactSphere mt2_r: socket_frame=/bodyset/toes_r location=(0.03302 0.0169237 -0.0513099) radius=0.03
    ContactSphere heel_l: socket_frame=/bodyset/calcn_l location=(0.005 0.02 0.01) radius=0.04
    ContactSphere mt1_l: socket_frame=/bodyset/toes_l location=(-0.03698 0.0169237 -0.0686901) radius=0.03
    ContactSphere mt2_l: socket_frame=/bodyset/toes_l location=(0.03302 0.0169237 0.0513099) radius=0.03
    ContactSphere mtMid_r: socket_frame=/bodyset/toes_r location=(-0.00198 0.0169237 0.0086901) radius=0.03
    ContactSphere mtMid_l: socket_frame=/bodyset/toes_l location=(-0.00198 0.0169237 -0.0086901) radius=0.03
