# OpenSim document version 40000
InverseKinematicsTool sprint:
  results_directory: ik\\
  time_range: 0.358 0.588
  output_motion_file: ik\\sprint_ik.mot
  marker_file: data\\sprint.trc
  IKTaskSet:
    IKMarkerTask C7: weight=10
    IKMarkerTask RSH: weight=10
    IKMarkerTask LSH: weight=10
    IKMarkerTask MAN: weight=10
    IKMarkerTask T7: weight=10
    IKMarkerTask LARM: weight=2.5
    IKMarkerTask LELB: weight=5
    IKMarkerTask LFOREARM: weight=10
    IKMarkerTask LWR: weight=10
    IKMarkerTask RARM: weight=2.5
    IKMarkerTask RELB: weight=5
    IKMarkerTask RFOREARM: weight=10
    IKMarkerTask RWR: weight=10
    IKMarkerTask RASI: weight=5
    IKMarkerTask LASI: weight=5
    IKMarkerTask SACR: weight=10
    IKMarkerTask P1: weight=7.5
    IKMarkerTask P2: weight=7.5
    IKMarkerTask P3: weight=7.5
    IKMarkerTask LTHLP: weight=5
    IKMarkerTask LTHAP: weight=5
    IKMarkerTask LTHAD: weight=5
    IKMarkerTask LTHLD: weight=5
    IKMarkerTask LLEPI: weight=10
    IKMarkerTask LPAT: weight=10
    IKMarkerTask LTIAP: weight=5
    IKMarkerTask LTIAD: weight=5
    IKMarkerTask LTILAT: weight=5
    IKMarkerTask LLMAL: weight=10
    IKMarkerTask LHEEL: weight=5
    IKMarkerTask LMFS: weight=2.5
    IKMarkerTask LMFL: weight=2.5
    IKMarkerTask LP1MT: weight=5
    IKMarkerTask LTOE: weight=2.5
    IKMarkerTask LP5MT: weight=5
    IKMarkerTask RTHLD: weight=5
    IKMarkerTask RTHAP: weight=5
    IKMarkerTask RTHLP: weight=5
    IKMarkerTask RTHAD: weight=5
    IKMarkerTask RLEPI: weight=10
    IKMarkerTask RPAT: weight=10
    IKMarkerTask RTIAP: weight=5
    IKMarkerTask RTIAD: weight=5
    IKMarkerTask RTILAT: weight=5
    IKMarkerTask RLMAL: weight=10
    IKMarkerTask RHEEL: weight=5
    IKMarkerTask RMFS: weight=2.5
    IKMarkerTask RMFL: weight=2.5
    IKMarkerTask RP1MT: weight=5
    IKMarkerTask RTOE: weight=2.5
    IKMarkerTask RP5MT: weight=5
