# OpenSim document version 40000
Model muscles2DModel:
  gravity: 0 -9.8066 0
  length_units: meters
  force_units: N
  credits:
    Delp S.L., Loan J.P., Hoy M.G., Zajac F.E., Topp E.L., Rosen J.M., Thelen D.G., Anderson F.C., Seth A., Hamner S.R.
  publications:
    Notes: 3D, 23 DOF gait model created by D.G. Thelen, Univ. of Wisconsin-Madison, and Ajay Seth, Frank C. Anderson, and Scott L. Delp, Stanford University. Lower extremity joint defintions based on Delp et al. (1990). Low back joint and anthropometry based on Anderson and Pandy (1999, 2001). Planar knee model of Yamaguchi and Zajac (1989). Seth removed the patella to avoid kinematic constraints; insertions of the quadrucepts are handled with moving points in the tibia frame. Delp, S.L., Loan, J.P., Hoy, M.G., Zajac, F.E., Topp E.L., Rosen, J.M.: An interactive graphics-based model of the lower extremity to study orthopaedic surgical procedures, IEEE Transactions on Biomedical Engineering, vol. 37, pp. 757-767, 1990. Yamaguchi G.T., Zajac F.E.: A planar model of the knee joint to characterize the knee extensor mechanism." J . Biomecl7. vol. 21. pp. 1-10. 1989. Anderson F.C., Pandy M.G.: A dynamic optimization solution for vertical jumping in three dimensions. Computer Methods in Biomechanics and Biomedical Engineering 2:201-231, 1999. Anderson F.C., Pandy M.G.: Dynamic optimization of human walking. Journal of Biomechanical Engineering 123:381-390, 2001.
  Ground
  BodySet:
    Body pelvis: mass=11.8962 [kg] mass_center=(-0.059934 0 0) inertia=(0.074625 0.063228 0.042031 0 0 0)
        meshes=(sacrum.vtp pelvis.vtp l_pelvis.vtp)
    Body femur_r: mass=9.3956 mass_center=(0 -0.18169 0) inertia=(0.15833 0.048143 0.15833 0 0 0) meshes=femur_r.vtp
    Body tibia_r: mass=3.745 mass_center=(0 -0.2131 0) inertia=(0.066131 0.0063251 0.066131 0 0 0)
        meshes=(tibia_r.vtp fibula.vtp)
    Body talus_r: mass=0.10101 mass_center=(0 0 0) inertia=(0.0012402 0.0012781 0.0012781 0 0 0) meshes=talus.vtp
    Body calcn_r: mass=1.2627 mass_center=(0.096187 0.028856 0) inertia=(0.0016498 0.0038155 0.0038155 0 0 0)
        meshes=foot.vtp
    Body toes_r: mass=0.21879 mass_center=(0.033281 0.0057712 -0.021225)
        inertia=(0.00011784 0.00019911 0.00019911 0 0 0) meshes=bofoot.vtp
    Body femur_l: mass=9.3956 mass_center=(0 -0.18169 0) inertia=(0.15833 0.048143 0.15833 0 0 0) meshes=femur_l.vtp
    Body tibia_l: mass=3.745 mass_center=(0 -0.2131 0) inertia=(0.066131 0.0063251 0.066131 0 0 0)
        meshes=(tibia_l.vtp l_fibula.vtp)
    Body talus_l: mass=0.10101 mass_center=(0 0 0) inertia=(0.0012402 0.0012781 0.0012781 0 0 0) meshes=l_talus.vtp
    Body calcn_l: mass=1.2627 mass_center=(0.096187 0.028856 0) inertia=(0.0016498 0.0038155 0.0038155 0 0 0)
        meshes=l_foot.vtp
    Body toes_l: mass=0.21879 mass_center=(0.033281 0.0057712 0.021225)
        inertia=(0.00011784 0.00019911 0.00019911 0 0 0) meshes=l_bofoot.vtp
    Body torso: mass=27.0982 mass_center=(-0.01429 0.30939 0.0022247) inertia=(1.3923 0.71336 1.3516 0 0 0)
        meshes=(hat_spine.vtp hat_jaw.vtp hat_skull.vtp hat_ribs.vtp scapula_lv1.vtp scapula_rv1.vtp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)
    Body humerus_r: mass=2.0531 mass_center=(0 -0.16394 0) inertia=(0.011986 0.0041347 0.013453 0 0 0)
        meshes=humerus_rv.vtp
    Body ulna_r: mass=0.61365 mass_center=(0 -0.13738 0) inertia=(0.0038879 0.00081118 0.0042173 0 0 0)
        meshes=ulna_rv.vtp
    Body radius_r: mass=0.61365 mass_center=(0 -0.13738 0) inertia=(0.0038879 0.00081118 0.0042173 0 0 0)
        meshes=radius_rv.vtp
    Body hand_r: mass=0.46213 mass_center=(0 -0.077623 0) inertia=(0.0011708 0.00071799 0.0017589 0 0 0)
        meshes=(pisiform_rvs.vtp lunate_rvs.vtp scaphoid_rvs.vtp triquetrum_rvs.vtp hamate_rvs.vtp capitate_rvs.vtp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)
    Body humerus_l: mass=2.0531 mass_center=(0 -0.16394 0) inertia=(0.011986 0.0041347 0.013453 0 0 0)
        meshes=humerus_lv.vtp
    Body ulna_l: mass=0.61365 mass_center=(0 -0.13738 0) inertia=(0.0038879 0.00081118 0.0042173 0 0 0)
        meshes=ulna_lv.vtp
    Body radius_l: mass=0.61365 mass_center=(0 -0.13738 0) inertia=(0.0038879 0.00081118 0.0042173 0 0 0)
        meshes=radius_lv.vtp
    Body hand_l: mass=0.46213 mass_center=(0 -0.077623 0) inertia=(0.0011708 0.00071799 0.0017589 0 0 0)
        meshes=(pisiform_lvs.vtp lunate_lvs.vtp scaphoid_lvs.vtp triquetrum_lvs.vtp hamate_lvs.vtp capitate_lvs.vtp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)
  JointSet:
    CustomJoint knee_r: socket_parent_frame=femur_r_offset socket_child_frame=tibia_r_offset
      Coordinate knee_angle_r: default_value=0 range=(-2.7925 0.17453) clamped=true
      PhysicalOffsetFrame femur_r_offset: socket_parent=/bodyset/femur_r translation=(0 0 0) [meters]
      PhysicalOffsetFrame tibia_r_offset: socket_parent=/bodyset/tibia_r translation=(0 0 0)
      SpatialTransform: axes_held_at_zero=(rotation2 rotation3 translation3)
        TransformAxis rotation1: coordinates=knee_angle_r axis=(0 0 1) LinearFunction(coefficients=1 0)
        TransformAxis translation1: coordinates=knee_angle_r axis=(1 0 0)
          MultiplierFunction: scale=1.0688
            SimmSpline: x=(-2.0944 -1.7453 -1.3963 -1.0472 -0.69813 -0.34907 -0.17453 0.19734 0.33739 0.49018 1.5215 2.0944)
                y=(-0.0032 0.00179 0.00411 0.0041 0.00212 -0.001 -0.0031 -0.005227 -0.005435 -0.005574 -0.005435 -0.00525)
        TransformAxis translation2: coordinates=knee_angle_r axis=(0 1 0)
          MultiplierFunction: scale=1.0688
            SimmSpline: x=(-2.0944 -1.2217 -0.5236 -0.34907 -0.17453 0.15915 2.0944)
                y=(-0.4226 -0.4082 -0.399 -0.3976 -0.3966 -0.39526 -0.396)
    CustomJoint knee_l: socket_parent_frame=femur_l_offset socket_child_frame=tibia_l_offset
      Coordinate knee_angle_l: default_value=0 range=(-2.7925 0.17453) clamped=true
      PhysicalOffsetFrame femur_l_offset: socket_parent=/bodyset/femur_l translation=(0 0 0)
      PhysicalOffsetFrame tibia_l_offset: socket_parent=/bodyset/tibia_l translation=(0 0 0)
      SpatialTransform: axes_held_at_zero=(rotation2 rotation3 translation3)
        TransformAxis rotation1: coordinates=knee_angle_l axis=(0 0 1) LinearFunction(coefficients=1 0)
        TransformAxis translation1: coordinates=knee_angle_l axis=(1 0 0)
          MultiplierFunction: scale=1.0688
            SimmSpline: x=(-2.0944 -1.7453 -1.3963 -1.0472 -0.69813 -0.34907 -0.17453 0.19734 0.33739 0.49018 1.5215 2.0944)
                y=(-0.0032 0.00179 0.00411 0.0041 0.00212 -0.001 -0.0031 -0.005227 -0.005435 -0.005574 -0.005435 -0.00525)
        TransformAxis translation2: coordinates=knee_angle_l axis=(0 1 0)
          MultiplierFunction: scale=1.0688
            SimmSpline: x=(-2.0944 -1.2217 -0.5236 -0.34907 -0.17453 0.15915 2.0944)
                y=(-0.4226 -0.4082 -0.399 -0.3976 -0.3966 -0.39526 -0.396)
    CustomJoint elbow_r: socket_parent_frame=humerus_r_offset socket_child_frame=ulna_r_offset
      Coordinate elbow_flex_r: default_value=0 range=(-0.17453 2.618) clamped=true
      PhysicalOffsetFrame humerus_r_offset: socket_parent=/bodyset/humerus_r translation=(0.0131 -0.2853 -0.0095626)
      PhysicalOffsetFrame ulna_r_offset: socket_parent=/bodyset/ulna_r translation=(0 0 0)
      SpatialTransform: axes_held_at_zero=(rotation2 rotation3 translation1 translation2 translation3)
        TransformAxis rotation1: coordinates=elbow_flex_r axis=(0.22605 0.022269 0.97386)
            LinearFunction(coefficients=1 0)
    CustomJoint elbow_l: socket_parent_frame=humerus_l_offset socket_child_frame=ulna_l_offset
      Coordinate elbow_flex_l: default_value=0 range=(-0.17453 2.618) clamped=true
      PhysicalOffsetFrame humerus_l_offset: socket_parent=/bodyset/humerus_l translation=(0.0131 -0.2853 0.0095626)
      PhysicalOffsetFrame ulna_l_offset: socket_parent=/bodyset/ulna_l translation=(0 0 0)
      SpatialTransform: axes_held_at_zero=(rotation2 rotation3 translation1 translation2 translation3)
        TransformAxis rotation1: coordinates=elbow_flex_l axis=(-0.22605 -0.022269 0.97386)
            LinearFunction(coefficients=1 0)
    PinJoint hip_r: socket_parent_frame=pelvis_offset socket_child_frame=femur_r_offset
      Coordinate hip_flexion_r: default_value=0 range=(-0.69813 1.7453) clamped=true
      PhysicalOffsetFrame pelvis_offset: socket_parent=/bodyset/pelvis translation=(-0.059934 -0.056035 0.070785)
      PhysicalOffsetFrame femur_r_offset: socket_parent=/bodyset/femur_r translation=(0 0 0)
    PinJoint hip_l: socket_parent_frame=pelvis_offset socket_child_frame=femur_l_offset
      Coordinate hip_flexion_l: default_value=0 range=(-0.69813 1.7453) clamped=true
      PhysicalOffsetFrame pelvis_offset: socket_parent=/bodyset/pelvis translation=(-0.059934 -0.056035 -0.070785)
      PhysicalOffsetFrame femur_l_offset: socket_parent=/bodyset/femur_l translation=(0 0 0)
    PinJoint ankle_r: socket_parent_frame=tibia_r_offset socket_child_frame=talus_r_offset
      Coordinate ankle_angle_r: default_value=0 range=(-0.69813 1.7453) clamped=true
      PhysicalOffsetFrame tibia_r_offset: socket_parent=/bodyset/tibia_r translation=(0 -0.4908 0)
      PhysicalOffsetFrame talus_r_offset: socket_parent=/bodyset/talus_r translation=(0 0 0)
    PinJoint ankle_l: socket_parent_frame=tibia_l_offset socket_child_frame=talus_l_offset
      Coordinate ankle_angle_l: default_value=0 range=(-0.69813 1.7453) clamped=true
      PhysicalOffsetFrame tibia_l_offset: socket_parent=/bodyset/tibia_l translation=(0 -0.4908 0)
      PhysicalOffsetFrame talus_l_offset: socket_parent=/bodyset/talus_l translation=(0 0 0)
    PinJoint back: socket_parent_frame=pelvis_offset socket_child_frame=torso_offset
      Coordinate lumbar_extension: default_value=0 range=(-0.7854 0.17453) clamped=true
      PhysicalOffsetFrame pelvis_offset: socket_parent=/bodyset/pelvis translation=(-0.085366 0.06909 0)
      PhysicalOffsetFrame torso_offset: socket_parent=/bodyset/torso translation=(0 0 0)
    PlanarJoint ground_pelvis: socket_parent_frame=ground_offset socket_child_frame=pelvis_offset
      Coordinate pelvis_tilt: default_value=0 range=(-1.5708 1.5708) clamped=true
      Coordinate pelvis_tx: default_value=0 range=(-20 20) clamped=true
      Coordinate pelvis_ty: default_value=0.95 range=(-2 4) clamped=true
      PhysicalOffsetFrame ground_offset: socket_parent=/ground translation=(0 0 0)
      PhysicalOffsetFrame pelvis_offset: socket_parent=/bodyset/pelvis translation=(0 0 0)
    PinJoint acromial_r: socket_parent_frame=torso_offset socket_child_frame=humerus_r_offset
      Coordinate arm_flex_r: default_value=0 range=(-1.5708 1.5708) clamped=true
      PhysicalOffsetFrame torso_offset: socket_parent=/bodyset/torso translation=(0.0030504 0.35918 0.16436)
      PhysicalOffsetFrame humerus_r_offset: socket_parent=/bodyset/humerus_r translation=(0 0 0)
    PinJoint acromial_l: socket_parent_frame=torso_offset socket_child_frame=humerus_l_offset
      Coordinate arm_flex_l: default_value=0 range=(-1.5708 1.5708) clamped=true
      PhysicalOffsetFrame torso_offset: socket_parent=/bodyset/torso translation=(0.0030504 0.35918 -0.16436)
      PhysicalOffsetFrame humerus_l_offset: socket_parent=/bodyset/humerus_l translation=(0 0 0)
    WeldJoint subtalar_r: socket_parent_frame=talus_r_offset socket_child_frame=calcn_r_offset
      PhysicalOffsetFrame talus_r_offset: socket_parent=/bodyset/talus_r translation=(-0.055666 -0.047881 0.0085195)
          orientation=(-3.141593 1.224647e-16 -3.141593) [radians]
      PhysicalOffsetFrame calcn_r_offset: socket_parent=/bodyset/calcn_r translation=(0 0 0)
          orientation=(-3.141593 1.224647e-16 -3.141593)
    WeldJoint subtalar_l: socket_parent_frame=talus_l_offset socket_child_frame=calcn_l_offset
      PhysicalOffsetFrame talus_l_offset: socket_parent=/bodyset/talus_l translation=(-0.055666 -0.047881 -0.0085195)
          orientation=(-3.141593 1.224647e-16 -3.141593)
      PhysicalOffsetFrame calcn_l_offset: socket_parent=/bodyset/calcn_l translation=(0 0 0)
          orientation=(-3.141593 1.224647e-16 -3.141593)
    WeldJoint mtp_r: socket_parent_frame=calcn_r_offset socket_child_frame=toes_r_offset
      PhysicalOffsetFrame calcn_r_offset: socket_parent=/bodyset/calcn_r translation=(0.17198 -0.0019237 0.0013099)
          orientation=(-3.141593 1.224647e-16 -3.141593)
      PhysicalOffsetFrame toes_r_offset: socket_parent=/bodyset/toes_r translation=(0 0 0)
          orientation=(-3.141593 1.224647e-16 -3.141593)
    WeldJoint mtp_l: socket_parent_frame=calcn_l_offset socket_child_frame=toes_l_offset
      PhysicalOffsetFrame calcn_l_offset: socket_parent=/bodyset/calcn_l translation=(0.17198 -0.0019237 -0.0013099)
          orientation=(-3.141593 1.224647e-16 -3.141593)
      PhysicalOffsetFrame toes_l_offset: socket_parent=/bodyset/toes_l translation=(0 0 0)
          orientation=(-3.141593 1.224647e-16 -3.141593)
    WeldJoint radioulnar_r: socket_parent_frame=ulna_r_offset socket_child_frame=radius_r_offset
      PhysicalOffsetFrame ulna_r_offset: socket_parent=/bodyset/ulna_r translation=(-0.0076683 -0.014827 0.029733)
      PhysicalOffsetFrame radius_r_offset: socket_parent=/bodyset/radius_r translation=(0 0 0)
          orientation=(0 -1.570796 0)
    WeldJoint radioulnar_l: socket_parent_frame=ulna_l_offset socket_child_frame=radius_l_offset
      PhysicalOffsetFrame ulna_l_offset: socket_parent=/bodyset/ulna_l translation=(-0.0076683 -0.014827 -0.029733)
      PhysicalOffsetFrame radius_l_offset: socket_parent=/bodyset/radius_l translation=(0 0 0)
          orientation=(0 1.570796 0)
    WeldJoint radius_hand_r: socket_parent_frame=radius_r_offset socket_child_frame=hand_r_offset
      PhysicalOffsetFrame radius_r_offset: socket_parent=/bodyset/radius_r translation=(-0.010028 -0.26884 0.015514)
      PhysicalOffsetFrame hand_r_offset: socket_parent=/bodyset/hand_r translation=(0 0 0)
    WeldJoint radius_hand_l: socket_parent_frame=radius_l_offset socket_child_frame=hand_l_offset
      PhysicalOffsetFrame radius_l_offset: socket_parent=/bodyset/radius_l translation=(-0.010028 -0.26884 -0.015514)
      PhysicalOffsetFrame hand_l_offset: socket_parent=/bodyset/hand_l translation=(0 0 0)
  ForceSet:
    SmoothSphereHalfSpaceForce [values shared by the 6 below unless stated]: socket_half_space=/contactgeometryset/floor
        stiffness=3067776 [N/m^2] dissipation=2 [s/m] static_friction=0.8 dynamic_friction=0.8 viscous_friction=0.5
        hertz_smoothing=300 hunt_crossley_smoothing=50 transition_velocity=0.2 [m/s]
    SmoothSphereHalfSpaceForce contactHeel_r: socket_sphere=/contactgeometryset/heel_r transition_velocity=0.001
    SmoothSphereHalfSpaceForce contactMidfoot_r: socket_sphere=/contactgeometryset/midfoot_r
    SmoothSphereHalfSpaceForce contactToe_r: socket_sphere=/contactgeometryset/toe_r
    SmoothSphereHalfSpaceForce contactHeel_l: socket_sphere=/contactgeometryset/heel_l
    SmoothSphereHalfSpaceForce contactMidfoot_l: socket_sphere=/contactgeometryset/midfoot_l
    SmoothSphereHalfSpaceForce contactToe_l: socket_sphere=/contactgeometryset/toe_l
    DeGrooteFregly2016Muscle [values shared by the 18 below unless stated]: min_control=0.01 max_control=1
        max_contraction_velocity=15 activation_time_constant=0.01 deactivation_time_constant=0.04
        default_activation=0.01 active_force_width_scale=1 fiber_damping=0.01 tendon_strain_at_one_norm_force=0.049
        ignore_passive_fiber_force=false
    DeGrooteFregly2016Muscle hamstrings_r: max_isometric_force=4105.466 optimal_fiber_length=0.069
        tendon_slack_length=0.349 pennation_angle_at_optimal=0.2617994 [radians]
      PathPoint bifemlh_r-P1: pelvis (-0.121645 -0.0990559 0.0684676)
      PathPoint bifemlh_r-P2: tibia_r (-0.0290986 -0.0348024 0.0284509)
      PathPoint bifemlh_r-P3: tibia_r (-0.0226215 -0.054427 0.0331589)
    DeGrooteFregly2016Muscle bifemsh_r: max_isometric_force=557.1148 optimal_fiber_length=0.11
        tendon_slack_length=0.117 pennation_angle_at_optimal=0.4014257
      PathPoint P1: femur_r (0.00501373 -0.211679 0.0234642)
      PathPoint P2: tibia_r (-0.0290986 -0.0348024 0.0284509)
      PathPoint P3: tibia_r (-0.0226215 -0.054427 0.0331589)
    DeGrooteFregly2016Muscle glut_max_r: max_isometric_force=3337.584 optimal_fiber_length=0.157
        tendon_slack_length=0.048 pennation_angle_at_optimal=0
      PathPoint P1: pelvis (-0.127188 0.00840194 0.045553)
      PathPoint P2: pelvis (-0.129795 -0.0588136 0.0801615)
      PathPoint P3: femur_r (-0.0451235 -0.0585603 0.0252692)
      PathPoint P4: femur_r (-0.0156428 -0.101879 0.042015)
    DeGrooteFregly2016Muscle iliopsoas_r: max_isometric_force=2697.344 optimal_fiber_length=0.117
        tendon_slack_length=0.13 pennation_angle_at_optimal=0.1396263
      PathPoint psoas_r-P1: pelvis (-0.0624834 0.0856611 0.0284953)
      PathPoint psoas_r-P2: pelvis (-0.0229846 -0.0550472 0.0748371)
      ConditionalPathPoint psoas_r-P3: pelvis (-0.0278133 -0.077742 0.0804573)
          socket_coordinate=/jointset/hip_r/hip_flexion_r range=(-1.5708 0.785398) [radians]
      PathPoint psoas_r-P4: femur_r (0.00160439 -0.0508392 0.00381043)
      PathPoint psoas_r-P5: femur_r (-0.0188516 -0.0598639 0.0104285)
    DeGrooteFregly2016Muscle rect_fem_r: max_isometric_force=2191.741 optimal_fiber_length=0.076
        tendon_slack_length=0.346 pennation_angle_at_optimal=0.08726646
      PathPoint P1: pelvis (-0.0284893 -0.0300345 0.0954444)
      ConditionalPathPoint P2: femur_r (0.0334917 -0.404106 0.00190522) socket_coordinate=/jointset/knee_r/knee_angle_r
          range=(-2.61799 -1.45997)
      MovingPathPoint P3: tibia_r socket_x_coordinate=/jointset/knee_r/knee_angle_r
          socket_y_coordinate=/jointset/knee_r/knee_angle_r socket_z_coordinate=/jointset/knee_r/knee_angle_r
        x_location: MultiplierFunction: scale=0.9667322
          SimmSpline: x=(-2.0944 -1.99997 -1.5708 -1.45752 -1.39626 -1.0472 -0.698132 -0.526391 -0.349066 -0.174533 0 0.00017453 0.00034907 0.0279253 0.0872665 0.174533 2.0944)
              y=(0.0155805 0.0179938 0.0275081 0.0296564 0.0307615 0.0365695 0.0422074 0.0450902 0.048391 0.0534299 0.0617576 0.0617669 0.0617762 0.0633083 0.066994 0.0733035 0.0573481)
        y_location: MultiplierFunction: scale=0.9667322
          SimmSpline: x=(-2.0944 -1.99997 -1.5708 -1.45752 -1.39626 -1.0472 -0.698132 -0.526391 -0.349066 -0.174533 0 0.00017453 0.00034907 0.0279253 0.0872665 0.174533 2.0944)
              y=(0.0234116 0.0237613 0.0251141 0.0252795 0.0253146 0.0249184 0.0242373 0.0238447 0.0234197 0.0227644 0.020984 0.0209814 0.0209788 0.0205225 0.0191754 0.0159554 -0.0673774)
        z_location: MultiplierFunction: scale=0.9667322
          SimmSpline: x=(-2.0944 0.1745) y=(0.0014 0.0014)
    DeGrooteFregly2016Muscle vasti_r: max_isometric_force=9593.951 optimal_fiber_length=0.099 tendon_slack_length=0.102
        pennation_angle_at_optimal=0.05235988
      PathPoint vas_int_r-P1: femur_r (0.0290796 -0.192928 0.0310851)
      PathPoint vas_int_r-P2: femur_r (0.033592 -0.208972 0.0285782)
      ConditionalPathPoint vas_int_r-P3: femur_r (0.0343942 -0.404106 0.0055151)
          socket_coordinate=/jointset/knee_r/knee_angle_r range=(-2.61799 -1.42)
      MovingPathPoint vas_int_r-P4: tibia_r socket_x_coordinate=/jointset/knee_r/knee_angle_r
          socket_y_coordinate=/jointset/knee_r/knee_angle_r socket_z_coordinate=/jointset/knee_r/knee_angle_r
        x_location: MultiplierFunction: scale=0.9667322
          SimmSpline: x=(-2.0944 -1.99997 -1.5708 -1.45752 -1.39626 -1.0472 -0.698132 -0.526391 -0.349066 -0.174533 0 0.00017453 0.00034907 0.0279253 0.0872665 0.174533 2.0944)
              y=(0.0082733 0.0106866 0.0202042 0.022353 0.0234583 0.0292715 0.0349465 0.037871 0.0412569 0.0465287 0.0554632 0.0554735 0.0554837 0.0571717 0.061272 0.0684368 0.0648818)
        y_location: MultiplierFunction: scale=0.9667322
          SimmSpline: x=(-2.0944 -1.99997 -1.5708 -1.45752 -1.39626 -1.0472 -0.698132 -0.526391 -0.349066 -0.174533 0 0.00017453 0.00034907 0.0279253 0.0872665 0.174533 2.0944)
              y=(0.025599 0.0259487 0.0273124 0.0274796 0.0275151 0.0271363 0.0265737 0.0263073 0.0261187 0.0260129 0.0252923 0.0252911 0.0252898 0.0250526 0.0242191 0.0218288 -0.0685706)
        z_location: MultiplierFunction: scale=0.9667322
          SimmSpline: x=(-2.0944 2.0944) y=(0.0018 0.0018)
    DeGrooteFregly2016Muscle gastroc_r: max_isometric_force=4690.574 optimal_fiber_length=0.051
        tendon_slack_length=0.384 pennation_angle_at_optimal=0.296706 tendon_strain_at_one_norm_force=0.1
      PathPoint med_gas_r-P1: femur_r (-0.0190522 -0.393979 -0.0235645)
      ConditionalPathPoint med_gas_r-P2: femur_r (-0.0300824 -0.403304 -0.0258708)
          socket_coordinate=/jointset/knee_r/knee_angle_r range=(-0.785398 0.174533)
      PathPoint med_gas_r-P3: calcn_r (0 0.0283317 -0.0048438)
    DeGrooteFregly2016Muscle soleus_r: max_isometric_force=7924.997 optimal_fiber_length=0.044
        tendon_slack_length=0.244 pennation_angle_at_optimal=0.4363323 tendon_strain_at_one_norm_force=0.1
      PathPoint P1: tibia_r (-0.00232016 -0.1482 0.0068638)
      PathPoint P2: calcn_r (0 0.0283317 -0.0048438)
    DeGrooteFregly2016Muscle tib_ant_r: max_isometric_force=2116.818 optimal_fiber_length=0.068
        tendon_slack_length=0.238 pennation_angle_at_optimal=0.08726646
      PathPoint P1: tibia_r (0.0173045 -0.156997 0.0111174)
      PathPoint P2: tibia_r (0.0318055 -0.381956 -0.0171112)
      PathPoint P3: calcn_r (0.106564 0.0162679 -0.0278747)
    DeGrooteFregly2016Muscle hamstrings_l: max_isometric_force=4105.466 optimal_fiber_length=0.069
        tendon_slack_length=0.349 pennation_angle_at_optimal=0.2617994
      PathPoint bifemlh_l-P1: pelvis (-0.121645 -0.0990559 -0.0684676)
      PathPoint bifemlh_l-P2: tibia_l (-0.0290986 -0.0348024 -0.0284509)
      PathPoint bifemlh_l-P3: tibia_l (-0.0226215 -0.054427 -0.0331589)
    DeGrooteFregly2016Muscle bifemsh_l: max_isometric_force=557.1148 optimal_fiber_length=0.11
        tendon_slack_length=0.117 pennation_angle_at_optimal=0.4014257
      PathPoint P1: femur_l (0.00501373 -0.211679 -0.0234642)
      PathPoint P2: tibia_l (-0.0290986 -0.0348024 -0.0284509)
      PathPoint P3: tibia_l (-0.0226215 -0.054427 -0.0331589)
    DeGrooteFregly2016Muscle glut_max_l: max_isometric_force=3337.584 optimal_fiber_length=0.157
        tendon_slack_length=0.048 pennation_angle_at_optimal=0
      PathPoint P1: pelvis (-0.127188 0.00840194 -0.045553)
      PathPoint P2: pelvis (-0.129795 -0.0588136 -0.0801615)
      PathPoint P3: femur_l (-0.0451235 -0.0585603 -0.0252692)
      PathPoint P4: femur_l (-0.0156428 -0.101879 -0.042015)
    DeGrooteFregly2016Muscle iliopsoas_l: max_isometric_force=2697.344 optimal_fiber_length=0.117
        tendon_slack_length=0.13 pennation_angle_at_optimal=0.1396263
      PathPoint psoas_l-P1: pelvis (-0.0624834 0.0856611 -0.0284953)
      PathPoint psoas_l-P2: pelvis (-0.0229846 -0.0550472 -0.0748371)
      ConditionalPathPoint psoas_l-P3: pelvis (-0.0278133 -0.077742 -0.0804573)
          socket_coordinate=/jointset/hip_l/hip_flexion_l range=(-1.5708 0.785398)
      PathPoint psoas_l-P4: femur_l (0.00160439 -0.0508392 -0.00381043)
      PathPoint psoas_l-P5: femur_l (-0.0188516 -0.0598639 -0.0104285)
    DeGrooteFregly2016Muscle rect_fem_l: max_isometric_force=2191.741 optimal_fiber_length=0.076
        tendon_slack_length=0.346 pennation_angle_at_optimal=0.08726646
      PathPoint P1: pelvis (-0.0284893 -0.0300345 -0.0954444)
      ConditionalPathPoint P2: femur_l (0.0334917 -0.404106 -0.00190522)
          socket_coordinate=/jointset/knee_l/knee_angle_l range=(-2.61799 -1.45997)
      MovingPathPoint P3: tibia_l socket_x_coordinate=/jointset/knee_l/knee_angle_l
          socket_y_coordinate=/jointset/knee_l/knee_angle_l socket_z_coordinate=/jointset/knee_l/knee_angle_l
        x_location: MultiplierFunction: scale=0.9667322
          SimmSpline: x=(-2.0944 -1.99997 -1.5708 -1.45752 -1.39626 -1.0472 -0.698132 -0.526391 -0.349066 -0.174533 0 0.00017453 0.00034907 0.0279253 0.0872665 0.174533 2.0944)
              y=(0.0155805 0.0179938 0.0275081 0.0296564 0.0307615 0.0365695 0.0422074 0.0450902 0.048391 0.0534299 0.0617576 0.0617669 0.0617762 0.0633083 0.066994 0.0733035 0.0573481)
        y_location: MultiplierFunction: scale=0.9667322
          SimmSpline: x=(-2.0944 -1.99997 -1.5708 -1.45752 -1.39626 -1.0472 -0.698132 -0.526391 -0.349066 -0.174533 0 0.00017453 0.00034907 0.0279253 0.0872665 0.174533 2.0944)
              y=(0.0234116 0.0237613 0.0251141 0.0252795 0.0253146 0.0249184 0.0242373 0.0238447 0.0234197 0.0227644 0.020984 0.0209814 0.0209788 0.0205225 0.0191754 0.0159554 -0.0673774)
        z_location: MultiplierFunction: scale=0.9667322
          SimmSpline: x=(-2.0944 0.1745) y=(-0.0014 -0.0014)
    DeGrooteFregly2016Muscle vasti_l: max_isometric_force=9593.951 optimal_fiber_length=0.099 tendon_slack_length=0.102
        pennation_angle_at_optimal=0.05235988
      PathPoint vas_int_l-P1: femur_l (0.0290796 -0.192928 -0.0310851)
      PathPoint vas_int_l-P2: femur_l (0.033592 -0.208972 -0.0285782)
      ConditionalPathPoint vas_int_l-P3: femur_l (0.0343942 -0.404106 -0.0055151)
          socket_coordinate=/jointset/knee_l/knee_angle_l range=(-2.61799 -1.42)
      MovingPathPoint vas_int_l-P4: tibia_l socket_x_coordinate=/jointset/knee_l/knee_angle_l
          socket_y_coordinate=/jointset/knee_l/knee_angle_l socket_z_coordinate=/jointset/knee_l/knee_angle_l
        x_location: MultiplierFunction: scale=0.9667322
          SimmSpline: x=(-2.0944 -1.99997 -1.5708 -1.45752 -1.39626 -1.0472 -0.698132 -0.526391 -0.349066 -0.174533 0 0.00017453 0.00034907 0.0279253 0.0872665 0.174533 2.0944)
              y=(0.0082733 0.0106866 0.0202042 0.022353 0.0234583 0.0292715 0.0349465 0.037871 0.0412569 0.0465287 0.0554632 0.0554735 0.0554837 0.0571717 0.061272 0.0684368 0.0648818)
        y_location: MultiplierFunction: scale=0.9667322
          SimmSpline: x=(-2.0944 -1.99997 -1.5708 -1.45752 -1.39626 -1.0472 -0.698132 -0.526391 -0.349066 -0.174533 0 0.00017453 0.00034907 0.0279253 0.0872665 0.174533 2.0944)
              y=(0.025599 0.0259487 0.0273124 0.0274796 0.0275151 0.0271363 0.0265737 0.0263073 0.0261187 0.0260129 0.0252923 0.0252911 0.0252898 0.0250526 0.0242191 0.0218288 -0.0685706)
        z_location: MultiplierFunction: scale=0.9667322
          SimmSpline: x=(-2.0944 2.0944) y=(-0.0018 -0.0018)
    DeGrooteFregly2016Muscle gastroc_l: max_isometric_force=4690.574 optimal_fiber_length=0.051
        tendon_slack_length=0.384 pennation_angle_at_optimal=0.296706 tendon_strain_at_one_norm_force=0.1
      PathPoint med_gas_l-P1: femur_l (-0.0190522 -0.393979 0.0235645)
      ConditionalPathPoint med_gas_l-P2: femur_l (-0.0300824 -0.403304 0.0258708)
          socket_coordinate=/jointset/knee_l/knee_angle_l range=(-0.785398 0.174533)
      PathPoint med_gas_l-P3: calcn_l (0 0.0283317 0.0048438)
    DeGrooteFregly2016Muscle soleus_l: max_isometric_force=7924.997 optimal_fiber_length=0.044
        tendon_slack_length=0.244 pennation_angle_at_optimal=0.4363323 tendon_strain_at_one_norm_force=0.1
      PathPoint P1: tibia_l (-0.00232016 -0.1482 -0.0068638)
      PathPoint P2: calcn_l (0 0.0283317 0.0048438)
    DeGrooteFregly2016Muscle tib_ant_l: max_isometric_force=2116.818 optimal_fiber_length=0.068
        tendon_slack_length=0.238 pennation_angle_at_optimal=0.08726646
      PathPoint P1: tibia_l (0.0173045 -0.156997 -0.0111174)
      PathPoint P2: tibia_l (0.0318055 -0.381956 0.0171112)
      PathPoint P3: calcn_l (0.106564 0.0162679 0.0278747)
  ContactGeometrySet:
    ContactHalfSpace floor: socket_frame=/ground orientation=(0 0 -1.570796)
    ContactSphere heel_r: socket_frame=/bodyset/calcn_r location=(0.02783157 0.01723335 0) radius=0.035
    ContactSphere midfoot_r: socket_frame=/bodyset/calcn_r location=(0.122571 0.00723335 0) radius=0.025
    ContactSphere toe_r: socket_frame=/bodyset/calcn_r location=(0.1979993 0.00723335 0) radius=0.025
    ContactSphere heel_l: socket_frame=/bodyset/calcn_l location=(0.03130753 0.0105 0) radius=0.035
    ContactSphere midfoot_l: socket_frame=/bodyset/calcn_l location=(0.1232683 0.00723335 0) radius=0.025
    ContactSphere toe_l: socket_frame=/bodyset/calcn_l location=(0.1991258 0.00723335 0) radius=0.025
