# OpenSim document version 40000
Model base3DModel:
  gravity: 0 -9.8066 0
  length_units: meters
  force_units: N
  credits:
    Delp S.L., Loan J.P., Hoy M.G., Zajac F.E., Topp E.L., Rosen J.M., Thelen D.G., Anderson F.C., Seth A., Hamner S.R.
  publications:
    Notes: 3D, 23 DOF gait model created by D.G. Thelen, Univ. of Wisconsin-Madison, and Ajay Seth, Frank C. Anderson, and Scott L. Delp, Stanford University. Lower extremity joint defintions based on Delp et al. (1990). Low back joint and anthropometry based on Anderson and Pandy (1999, 2001). Planar knee model of Yamaguchi and Zajac (1989). Seth removed the patella to avoid kinematic constraints; insertions of the quadrucepts are handled with moving points in the tibia frame. Delp, S.L., Loan, J.P., Hoy, M.G., Zajac, F.E., Topp E.L., Rosen, J.M.: An interactive graphics-based model of the lower extremity to study orthopaedic surgical procedures, IEEE Transactions on Biomedical Engineering, vol. 37, pp. 757-767, 1990. Yamaguchi G.T., Zajac F.E.: A planar model of the knee joint to characterize the knee extensor mechanism." J . Biomecl7. vol. 21. pp. 1-10. 1989. Anderson F.C., Pandy M.G.: A dynamic optimization solution for vertical jumping in three dimensions. Computer Methods in Biomechanics and Biomedical Engineering 2:201-231, 1999. Anderson F.C., Pandy M.G.: Dynamic optimization of human walking. Journal of Biomechanical Engineering 123:381-390, 2001.
  Ground
  BodySet:
    Body pelvis: mass=11.8962 [kg] mass_center=(-0.059934 0 0) inertia=(0.074625 0.063228 0.042031 0 0 0)
        meshes=(sacrum.vtp pelvis.vtp l_pelvis.vtp)
    Body femur_r: mass=9.3956 mass_center=(0 -0.18169 0) inertia=(0.15833 0.048143 0.15833 0 0 0) meshes=femur_r.vtp
    Body tibia_r: mass=3.745 mass_center=(0 -0.2131 0) inertia=(0.066131 0.0063251 0.066131 0 0 0)
        meshes=(tibia_r.vtp fibula.vtp)
    Body talus_r: mass=0.10101 mass_center=(0 0 0) inertia=(0.0012402 0.0012781 0.0012781 0 0 0) meshes=talus.vtp
    Body calcn_r: mass=1.2627 mass_center=(0.096187 0.028856 0) inertia=(0.0016498 0.0038155 0.0038155 0 0 0)
        meshes=foot.vtp
    Body toes_r: mass=0.21879 mass_center=(0.033281 0.0057712 -0.021225)
        inertia=(0.00011784 0.00019911 0.00019911 0 0 0) meshes=bofoot.vtp
    Body femur_l: mass=9.3956 mass_center=(0 -0.18169 0) inertia=(0.15833 0.048143 0.15833 0 0 0) meshes=femur_l.vtp
    Body tibia_l: mass=3.745 mass_center=(0 -0.2131 0) inertia=(0.066131 0.0063251 0.066131 0 0 0)
        meshes=(tibia_l.vtp l_fibula.vtp)
    Body talus_l: mass=0.10101 mass_center=(0 0 0) inertia=(0.0012402 0.0012781 0.0012781 0 0 0) meshes=l_talus.vtp
    Body calcn_l: mass=1.2627 mass_center=(0.096187 0.028856 0) inertia=(0.0016498 0.0038155 0.0038155 0 0 0)
        meshes=l_foot.vtp
    Body toes_l: mass=0.21879 mass_center=(0.033281 0.0057712 0.021225)
        inertia=(0.00011784 0.00019911 0.00019911 0 0 0) meshes=l_bofoot.vtp
    Body torso: mass=27.0982 mass_center=(-0.11429 0.30939 0.0688421) inertia=(1.3923 0.71336 1.3516 0 0 0)
        meshes=(hat_spine.vtp hat_jaw.vtp hat_skull.vtp hat_ribs.vtp scapula_lv1.vtp scapula_rv1.vtp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)
    Body humerus_r: mass=2.0531 mass_center=(0 -0.16394 0) inertia=(0.011986 0.0041347 0.013453 0 0 0)
        meshes=humerus_rv.vtp
    Body ulna_r: mass=0.61365 mass_center=(0 -0.13738 0) inertia=(0.0038879 0.00081118 0.0042173 0 0 0)
        meshes=ulna_rv.vtp
    Body radius_r: mass=0.61365 mass_center=(0 -0.13738 0) inertia=(0.0038879 0.00081118 0.0042173 0 0 0)
        meshes=radius_rv.vtp
    Body hand_r: mass=0.46213 mass_center=(0 -0.077623 0) inertia=(0.0011708 0.00071799 0.0017589 0 0 0)
        meshes=(pisiform_rvs.vtp lunate_rvs.vtp scaphoid_rvs.vtp triquetrum_rvs.vtp hamate_rvs.vtp capitate_rvs.vtp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)
    Body humerus_l: mass=2.0531 mass_center=(0 -0.16394 0) inertia=(0.011986 0.0041347 0.013453 0 0 0)
        meshes=humerus_lv.vtp
    Body ulna_l: mass=0.61365 mass_center=(0 -0.13738 0) inertia=(0.0038879 0.00081118 0.0042173 0 0 0)
        meshes=ulna_lv.vtp
    Body radius_l: mass=0.61365 mass_center=(0 -0.13738 0) inertia=(0.0038879 0.00081118 0.0042173 0 0 0)
        meshes=radius_lv.vtp
    Body hand_l: mass=0.46213 mass_center=(0 -0.077623 0) inertia=(0.0011708 0.00071799 0.0017589 0 0 0)
        meshes=(pisiform_lvs.vtp lunate_lvs.vtp scaphoid_lvs.vtp triquetrum_lvs.vtp hamate_lvs.vtp capitate_lvs.vtp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)
  JointSet:
    CustomJoint ground_pelvis: socket_parent_frame=ground_offset socket_child_frame=pelvis_offset
      Coordinate pelvis_tilt: default_value=0 range=(-1.5708 1.5708) clamped=true
      Coordinate pelvis_list: default_value=0 range=(-1.5708 1.5708) clamped=true
      Coordinate pelvis_rotation: default_value=0 range=(-1.5708 1.5708) clamped=true
      Coordinate pelvis_tx: default_value=0 range=(-20 20) clamped=true
      Coordinate pelvis_ty: default_value=1.0203 range=(-2 4) clamped=true
      Coordinate pelvis_tz: default_value=0 range=(-5 5) clamped=true
      PhysicalOffsetFrame ground_offset: socket_parent=/ground translation=(0 0 0) [meters]
      PhysicalOffsetFrame pelvis_offset: socket_parent=/bodyset/pelvis translation=(0 0 0)
      SpatialTransform:
        TransformAxis rotation1: coordinates=pelvis_tilt axis=(0 0 1) LinearFunction(coefficients=1 0)
        TransformAxis rotation2: coordinates=pelvis_list axis=(1 0 0) LinearFunction(coefficients=1 0)
        TransformAxis rotation3: coordinates=pelvis_rotation axis=(0 1 0) LinearFunction(coefficients=1 0)
        TransformAxis translation1: coordinates=pelvis_tx axis=(1 0 0)
            MultiplierFunction(scale=1, LinearFunction(coefficients=1 0))
        TransformAxis translation2: coordinates=pelvis_ty axis=(0 1 0)
            MultiplierFunction(scale=1, LinearFunction(coefficients=1 0))
        TransformAxis translation3: coordinates=pelvis_tz axis=(0 0 1)
            MultiplierFunction(scale=1, LinearFunction(coefficients=1 0))
    CustomJoint hip_r: socket_parent_frame=pelvis_offset socket_child_frame=femur_r_offset
      Coordinate hip_flexion_r: default_value=0 range=(-0.69813 1.7453) clamped=true
      Coordinate hip_adduction_r: default_value=0 range=(-0.5236 0.5236) clamped=true
      Coordinate hip_rotation_r: default_value=0 range=(-0.5236 0.5236) clamped=true
      PhysicalOffsetFrame pelvis_offset: socket_parent=/bodyset/pelvis translation=(-0.059934 -0.056035 0.070785)
      PhysicalOffsetFrame femur_r_offset: socket_parent=/bodyset/femur_r translation=(0 0 0)
      SpatialTransform: axes_held_at_zero=(translation1 translation2 translation3)
        TransformAxis rotation1: coordinates=hip_flexion_r axis=(0 0 1) LinearFunction(coefficients=1 0)
        TransformAxis rotation2: coordinates=hip_adduction_r axis=(1 0 0) LinearFunction(coefficients=1 0)
        TransformAxis rotation3: coordinates=hip_rotation_r axis=(0 1 0) LinearFunction(coefficients=1 0)
    CustomJoint knee_r: socket_parent_frame=femur_r_offset socket_child_frame=tibia_r_offset
      Coordinate knee_angle_r: default_value=0 range=(-2.7925 0.17453) clamped=true
      PhysicalOffsetFrame femur_r_offset: socket_parent=/bodyset/femur_r translation=(0 0 0)
      PhysicalOffsetFrame tibia_r_offset: socket_parent=/bodyset/tibia_r translation=(0 0 0)
      SpatialTransform: axes_held_at_zero=(rotation2 rotation3 translation3)
        TransformAxis rotation1: coordinates=knee_angle_r axis=(0 0 1) LinearFunction(coefficients=1 0)
        TransformAxis translation1: coordinates=knee_angle_r axis=(1 0 0)
          MultiplierFunction: scale=1.0688
            SimmSpline: x=(-2.0944 -1.7453 -1.3963 -1.0472 -0.69813 -0.34907 -0.17453 0.19734 0.33739 0.49018 1.5215 2.0944)
                y=(-0.0032 0.00179 0.00411 0.0041 0.00212 -0.001 -0.0031 -0.005227 -0.005435 -0.005574 -0.005435 -0.00525)
        TransformAxis translation2: coordinates=knee_angle_r axis=(0 1 0)
          MultiplierFunction: scale=1.0688
            SimmSpline: x=(-2.0944 -1.2217 -0.5236 -0.34907 -0.17453 0.15915 2.0944)
                y=(-0.4226 -0.4082 -0.399 -0.3976 -0.3966 -0.39526 -0.396)
    CustomJoint ankle_r: socket_parent_frame=tibia_r_offset socket_child_frame=talus_r_offset
      Coordinate ankle_angle_r: default_value=0 range=(-1.0472 0.69813) clamped=true
      PhysicalOffsetFrame tibia_r_offset: socket_parent=/bodyset/tibia_r translation=(0 -0.4908 0)
      PhysicalOffsetFrame talus_r_offset: socket_parent=/bodyset/talus_r translation=(0 0 0)
      SpatialTransform: axes_held_at_zero=(rotation2 rotation3 translation1 translation2 translation3)
        TransformAxis rotation1: coordinates=ankle_angle_r axis=(-0.10501 -0.17402 0.97913)
            LinearFunction(coefficients=1 0)
    CustomJoint subtalar_r: socket_parent_frame=talus_r_offset socket_child_frame=calcn_r_offset
      Coordinate subtalar_angle_r: default_value=0 range=(-0.87266 0.87266) clamped=true
      PhysicalOffsetFrame talus_r_offset: socket_parent=/bodyset/talus_r translation=(-0.055666 -0.047881 0.0085195)
      PhysicalOffsetFrame calcn_r_offset: socket_parent=/bodyset/calcn_r translation=(0 0 0)
      SpatialTransform: axes_held_at_zero=(rotation2 rotation3 translation1 translation2 translation3)
        TransformAxis rotation1: coordinates=subtalar_angle_r axis=(0.78718 0.60475 -0.12095)
            LinearFunction(coefficients=1 0)
    CustomJoint mtp_r: socket_parent_frame=calcn_r_offset socket_child_frame=toes_r_offset
      Coordinate mtp_angle_r: default_value=0 range=(-1.0472 1.0472) clamped=true
      PhysicalOffsetFrame calcn_r_offset: socket_parent=/bodyset/calcn_r translation=(0.17198 -0.0019237 0.0013099)
      PhysicalOffsetFrame toes_r_offset: socket_parent=/bodyset/toes_r translation=(0 0 0)
      SpatialTransform: axes_held_at_zero=(rotation2 rotation3 translation1 translation2 translation3)
        TransformAxis rotation1: coordinates=mtp_angle_r axis=(-0.58095 0 0.81394) LinearFunction(coefficients=1 0)
    CustomJoint hip_l: socket_parent_frame=pelvis_offset socket_child_frame=femur_l_offset
      Coordinate hip_flexion_l: default_value=0 range=(-0.69813 1.7453) clamped=true
      Coordinate hip_adduction_l: default_value=0 range=(-0.5236 0.5236) clamped=true
      Coordinate hip_rotation_l: default_value=0 range=(-0.5236 0.5236) clamped=true
      PhysicalOffsetFrame pelvis_offset: socket_parent=/bodyset/pelvis translation=(-0.059934 -0.056035 -0.070785)
      PhysicalOffsetFrame femur_l_offset: socket_parent=/bodyset/femur_l translation=(0 0 0)
      SpatialTransform: axes_held_at_zero=(translation1 translation2 translation3)
        TransformAxis rotation1: coordinates=hip_flexion_l axis=(0 0 1) LinearFunction(coefficients=1 0)
        TransformAxis rotation2: coordinates=hip_adduction_l axis=(-1 0 0) LinearFunction(coefficients=1 0)
        TransformAxis rotation3: coordinates=hip_rotation_l axis=(0 -1 0) LinearFunction(coefficients=1 0)
    CustomJoint knee_l: socket_parent_frame=femur_l_offset socket_child_frame=tibia_l_offset
      Coordinate knee_angle_l: default_value=0 range=(-2.7925 0.17453) clamped=true
      PhysicalOffsetFrame femur_l_offset: socket_parent=/bodyset/femur_l translation=(0 0 0)
      PhysicalOffsetFrame tibia_l_offset: socket_parent=/bodyset/tibia_l translation=(0 0 0)
      SpatialTransform: axes_held_at_zero=(rotation2 rotation3 translation3)
        TransformAxis rotation1: coordinates=knee_angle_l axis=(0 0 1) LinearFunction(coefficients=1 0)
        TransformAxis translation1: coordinates=knee_angle_l axis=(1 0 0)
          MultiplierFunction: scale=1.0688
            SimmSpline: x=(-2.0944 -1.7453 -1.3963 -1.0472 -0.69813 -0.34907 -0.17453 0.19734 0.33739 0.49018 1.5215 2.0944)
                y=(-0.0032 0.00179 0.00411 0.0041 0.00212 -0.001 -0.0031 -0.005227 -0.005435 -0.005574 -0.005435 -0.00525)
        TransformAxis translation2: coordinates=knee_angle_l axis=(0 1 0)
          MultiplierFunction: scale=1.0688
            SimmSpline: x=(-2.0944 -1.2217 -0.5236 -0.34907 -0.17453 0.15915 2.0944)
                y=(-0.4226 -0.4082 -0.399 -0.3976 -0.3966 -0.39526 -0.396)
    CustomJoint ankle_l: socket_parent_frame=tibia_l_offset socket_child_frame=talus_l_offset
      Coordinate ankle_angle_l: default_value=0 range=(-1.0472 0.69813) clamped=true
      PhysicalOffsetFrame tibia_l_offset: socket_parent=/bodyset/tibia_l translation=(0 -0.4908 0)
      PhysicalOffsetFrame talus_l_offset: socket_parent=/bodyset/talus_l translation=(0 0 0)
      SpatialTransform: axes_held_at_zero=(rotation2 rotation3 translation1 translation2 translation3)
        TransformAxis rotation1: coordinates=ankle_angle_l axis=(0.10501 0.17402 0.97913)
            LinearFunction(coefficients=1 0)
    CustomJoint subtalar_l: socket_parent_frame=talus_l_offset socket_child_frame=calcn_l_offset
      Coordinate subtalar_angle_l: default_value=0 range=(-0.87266 0.87266) clamped=true
      PhysicalOffsetFrame talus_l_offset: socket_parent=/bodyset/talus_l translation=(-0.055666 -0.047881 -0.0085195)
      PhysicalOffsetFrame calcn_l_offset: socket_parent=/bodyset/calcn_l translation=(0 0 0)
      SpatialTransform: axes_held_at_zero=(rotation2 rotation3 translation1 translation2 translation3)
        TransformAxis rotation1: coordinates=subtalar_angle_l axis=(-0.78718 -0.60475 -0.12095)
            LinearFunction(coefficients=1 0)
    CustomJoint mtp_l: socket_parent_frame=calcn_l_offset socket_child_frame=toes_l_offset
      Coordinate mtp_angle_l: default_value=0 range=(-1.0472 1.0472) clamped=true
      PhysicalOffsetFrame calcn_l_offset: socket_parent=/bodyset/calcn_l translation=(0.17198 -0.0019237 -0.0013099)
      PhysicalOffsetFrame toes_l_offset: socket_parent=/bodyset/toes_l translation=(0 0 0)
      SpatialTransform: axes_held_at_zero=(rotation2 rotation3 translation1 translation2 translation3)
        TransformAxis rotation1: coordinates=mtp_angle_l axis=(0.58095 0 0.81394) LinearFunction(coefficients=1 0)
    CustomJoint back: socket_parent_frame=pelvis_offset socket_child_frame=torso_offset
      Coordinate lumbar_extension: default_value=0 range=(-0.7854 0.17453) clamped=true
      Coordinate lumbar_bending: default_value=0 range=(-0.34907 0.34907) clamped=true
      Coordinate lumbar_rotation: default_value=0 range=(-0.5236 0.5236) clamped=true
      PhysicalOffsetFrame pelvis_offset: socket_parent=/bodyset/pelvis translation=(-0.085366 0.06909 0)
      PhysicalOffsetFrame torso_offset: socket_parent=/bodyset/torso translation=(0 0 0)
      SpatialTransform: axes_held_at_zero=(translation1 translation2 translation3)
        TransformAxis rotation1: coordinates=lumbar_extension axis=(0 0 1) LinearFunction(coefficients=1 0)
        TransformAxis rotation2: coordinates=lumbar_bending axis=(1 0 0) LinearFunction(coefficients=1 0)
        TransformAxis rotation3: coordinates=lumbar_rotation axis=(0 1 0) LinearFunction(coefficients=1 0)
    CustomJoint acromial_r: socket_parent_frame=torso_offset socket_child_frame=humerus_r_offset
      Coordinate arm_flex_r: default_value=0 range=(-1.5708 1.5708) clamped=true
      Coordinate arm_add_r: default_value=0 range=(-2.0944 1.5708) clamped=true
      Coordinate arm_rot_r: default_value=0 range=(-1.5708 1.5708) clamped=true
      PhysicalOffsetFrame torso_offset: socket_parent=/bodyset/torso translation=(0.0030504 0.35918 0.16436)
      PhysicalOffsetFrame humerus_r_offset: socket_parent=/bodyset/humerus_r translation=(0 0 0)
      SpatialTransform: axes_held_at_zero=(translation1 translation2 translation3)
        TransformAxis rotation1: coordinates=arm_flex_r axis=(0 0 1) LinearFunction(coefficients=1 0)
        TransformAxis rotation2: coordinates=arm_add_r axis=(1 0 0) LinearFunction(coefficients=1 0)
        TransformAxis rotation3: coordinates=arm_rot_r axis=(0 1 0) LinearFunction(coefficients=1 0)
    CustomJoint elbow_r: socket_parent_frame=humerus_r_offset socket_child_frame=ulna_r_offset
      Coordinate elbow_flex_r: default_value=0 range=(-0.17453 2.618) clamped=true
      PhysicalOffsetFrame humerus_r_offset: socket_parent=/bodyset/humerus_r translation=(0.0131 -0.2853 -0.0095626)
      PhysicalOffsetFrame ulna_r_offset: socket_parent=/bodyset/ulna_r translation=(0 0 0)
      SpatialTransform: axes_held_at_zero=(rotation2 rotation3 translation1 translation2 translation3)
        TransformAxis rotation1: coordinates=elbow_flex_r axis=(0.22605 0.022269 0.97386)
            LinearFunction(coefficients=1 0)
    CustomJoint radioulnar_r: socket_parent_frame=ulna_r_offset socket_child_frame=radius_r_offset
      Coordinate pro_sup_r: default_value=0 range=(0 3.1416) clamped=true
      PhysicalOffsetFrame ulna_r_offset: socket_parent=/bodyset/ulna_r translation=(-0.0076683 -0.014827 0.029733)
      PhysicalOffsetFrame radius_r_offset: socket_parent=/bodyset/radius_r translation=(0 0 0)
      SpatialTransform: axes_held_at_zero=(rotation2 rotation3 translation1 translation2 translation3)
        TransformAxis rotation1: coordinates=pro_sup_r axis=(0.056398 0.99841 0.001952)
            LinearFunction(coefficients=1 0)
    CustomJoint radius_hand_r: socket_parent_frame=radius_r_offset socket_child_frame=hand_r_offset
      Coordinate wrist_flex_r: default_value=0 range=(-1.2217 1.2217) clamped=true
      Coordinate wrist_dev_r: default_value=0 range=(-0.43633 0.61087) clamped=true
      PhysicalOffsetFrame radius_r_offset: socket_parent=/bodyset/radius_r translation=(-0.010028 -0.26884 0.015514)
      PhysicalOffsetFrame hand_r_offset: socket_parent=/bodyset/hand_r translation=(0 0 0)
      SpatialTransform: axes_held_at_zero=(rotation3 translation1 translation2 translation3)
        TransformAxis rotation1: coordinates=wrist_flex_r axis=(0 0 1) LinearFunction(coefficients=1 0)
        TransformAxis rotation2: coordinates=wrist_dev_r axis=(1 0 0) LinearFunction(coefficients=1 0)
    CustomJoint acromial_l: socket_parent_frame=torso_offset socket_child_frame=humerus_l_offset
      Coordinate arm_flex_l: default_value=0 range=(-1.5708 1.5708) clamped=true
      Coordinate arm_add_l: default_value=0 range=(-2.0944 1.5708) clamped=true
      Coordinate arm_rot_l: default_value=0 range=(-1.5708 1.5708) clamped=true
      PhysicalOffsetFrame torso_offset: socket_parent=/bodyset/torso translation=(0.0030504 0.35918 -0.16436)
      PhysicalOffsetFrame humerus_l_offset: socket_parent=/bodyset/humerus_l translation=(0 0 0)
      SpatialTransform: axes_held_at_zero=(translation1 translation2 translation3)
        TransformAxis rotation1: coordinates=arm_flex_l axis=(0 0 1) LinearFunction(coefficients=1 0)
        TransformAxis rotation2: coordinates=arm_add_l axis=(-1 0 0) LinearFunction(coefficients=1 0)
        TransformAxis rotation3: coordinates=arm_rot_l axis=(0 -1 0) LinearFunction(coefficients=1 0)
    CustomJoint elbow_l: socket_parent_frame=humerus_l_offset socket_child_frame=ulna_l_offset
      Coordinate elbow_flex_l: default_value=0 range=(-0.17453 2.618) clamped=true
      PhysicalOffsetFrame humerus_l_offset: socket_parent=/bodyset/humerus_l translation=(0.0131 -0.2853 0.0095626)
      PhysicalOffsetFrame ulna_l_offset: socket_parent=/bodyset/ulna_l translation=(0 0 0)
      SpatialTransform: axes_held_at_zero=(rotation2 rotation3 translation1 translation2 translation3)
        TransformAxis rotation1: coordinates=elbow_flex_l axis=(-0.22605 -0.022269 0.97386)
            LinearFunction(coefficients=1 0)
    CustomJoint radioulnar_l: socket_parent_frame=ulna_l_offset socket_child_frame=radius_l_offset
      Coordinate pro_sup_l: default_value=0 range=(0 3.1416) clamped=true
      PhysicalOffsetFrame ulna_l_offset: socket_parent=/bodyset/ulna_l translation=(-0.0076683 -0.014827 -0.029733)
      PhysicalOffsetFrame radius_l_offset: socket_parent=/bodyset/radius_l translation=(0 0 0)
      SpatialTransform: axes_held_at_zero=(rotation2 rotation3 translation1 translation2 translation3)
        TransformAxis rotation1: coordinates=pro_sup_l axis=(-0.056398 -0.99841 0.001952)
            LinearFunction(coefficients=1 0)
    CustomJoint radius_hand_l: socket_parent_frame=radius_l_offset socket_child_frame=hand_l_offset
      Coordinate wrist_flex_l: default_value=0 range=(-1.2217 1.2217) clamped=true
      Coordinate wrist_dev_l: default_value=0 range=(-0.43633 0.61087) clamped=true
      PhysicalOffsetFrame radius_l_offset: socket_parent=/bodyset/radius_l translation=(-0.010028 -0.26884 -0.015514)
      PhysicalOffsetFrame hand_l_offset: socket_parent=/bodyset/hand_l translation=(0 0 0)
      SpatialTransform: axes_held_at_zero=(rotation3 translation1 translation2 translation3)
        TransformAxis rotation1: coordinates=wrist_flex_l axis=(0 0 1) LinearFunction(coefficients=1 0)
        TransformAxis rotation2: coordinates=wrist_dev_l axis=(-1 0 0) LinearFunction(coefficients=1 0)
  ForceSet:
    SmoothSphereHalfSpaceForce [values shared by the 6 below unless stated]: socket_half_space=/contactgeometryset/floor
        stiffness=3067776 [N/m^2] dissipation=2 [s/m] static_friction=0.8 dynamic_friction=0.8 viscous_friction=0.5
        hertz_smoothing=300 hunt_crossley_smoothing=50 transition_velocity=0.2 [m/s]
    SmoothSphereHalfSpaceForce contactHeel_r: socket_sphere=/contactgeometryset/heel_r transition_velocity=0.001
    SmoothSphereHalfSpaceForce contactMidfoot_r: socket_sphere=/contactgeometryset/midfoot_r
    SmoothSphereHalfSpaceForce contactToe_r: socket_sphere=/contactgeometryset/toe_r
    SmoothSphereHalfSpaceForce contactHeel_l: socket_sphere=/contactgeometryset/heel_l
    SmoothSphereHalfSpaceForce contactMidfoot_l: socket_sphere=/contactgeometryset/midfoot_l
    SmoothSphereHalfSpaceForce contactToe_l: socket_sphere=/contactgeometryset/toe_l
  MarkerSet:
    Marker RSH: torso (-0.042706 0.43466 0.16207)
    Marker LSH: torso (-0.039996 0.42799 -0.15958)
    Marker C7: torso (-0.06578 0.44214 -0.00605)
    Marker T7: torso (-0.10596 0.24405 -0.0039799)
    Marker MAN: torso (0.093354 0.3681 0.010041)
    Marker RASI: pelvis (0.027628 0.031464 0.10512)
    Marker LASI: pelvis (0.029193 0.035725 -0.11185)
    Marker SACR: pelvis (-0.15671 0.081672 -0.00092459)
    Marker RTHAP: femur_r (0.11317 -0.20783 0.036642)
    Marker RTHAD: femur_r (0.10236 -0.30531 0.025423)
    Marker RTHLD: femur_r (0.010313 -0.29504 0.11094)
    Marker RTHLP: femur_r (0.0017237 -0.18223 0.12393)
    Marker RLEPI: femur_r (0.009409 -0.44604 0.080508)
    Marker RMEPI: femur_r (-0.015762 -0.4559 -0.045144)
    Marker RTIAP: tibia_r (0.019959 -0.2345 -0.004359)
    Marker RTIAD: tibia_r (0.010577 -0.36033 -0.019176)
    Marker RTILAT: tibia_r (-0.019846 -0.24736 0.079752)
    Marker RLMAL: tibia_r (-0.010091 -0.4806 0.038811)
    Marker RMMAL: tibia_r (0.0050897 -0.46371 -0.05347)
    Marker RHEEL: calcn_r (-0.022593 0.020447 -0.018678)
    Marker RMFS: calcn_r (0.15173 0.052624 -0.011051)
    Marker RMFL: calcn_r (0.10843 0.025397 0.04395)
    Marker RP1MT: calcn_r (0.19202 0.002474 -0.051151)
    Marker RP5MT: calcn_r (0.16415 -0.0059433 0.073912)
    Marker RTOE: toes_r (0.076768 0.011904 -0.0093149)
    Marker LTHAP: femur_l (0.11732 -0.21565 -0.031036)
    Marker LTHAD: femur_l (0.098113 -0.3242 -0.017148)
    Marker LTHLD: femur_l (-0.00080824 -0.32389 -0.097826)
    Marker LTHLP: femur_l (-0.0063228 -0.21099 -0.11477)
    Marker LLEPI: femur_l (0.0059805 -0.44786 -0.075822)
    Marker LMEPI: femur_l (-0.010777 -0.45405 0.050007)
    Marker LTIAP: tibia_l (0.026827 -0.19444 0.0069953)
    Marker LTIAD: tibia_l (0.018827 -0.33319 0.010335)
    Marker LTILAT: tibia_l (-0.010274 -0.26459 -0.073198)
    Marker LLMAL: tibia_l (-0.0075709 -0.48119 -0.041435)
    Marker LMMAL: tibia_l (0.00027684 -0.46185 0.052073)
    Marker LHEEL: calcn_l (-0.021365 0.022057 0.012673)
    Marker LMFS: calcn_l (0.1446 0.050063 0.018591)
    Marker LMFL: calcn_l (0.11586 0.030843 -0.045601)
    Marker LP1MT: calcn_l (0.19016 -0.0020434 0.047887)
    Marker LP5MT: calcn_l (0.16684 -0.0021984 -0.076527)
    Marker LTOE: toes_l (0.074095 0.013336 0.011765)
    Marker RARM: humerus_r (-0.0061745 -0.15199 0.04168)
    Marker RELB: humerus_r (0.011633 -0.293 0.021684)
    Marker RFOREARM: radius_r (-0.040365 -0.12649 0.007551)
    Marker RWR: radius_r (-0.044397 -0.26518 0.010181)
    Marker LARM: humerus_l (-0.0061646 -0.15609 -0.040588)
    Marker LELB: humerus_l (0.0097855 -0.29233 -0.022575)
    Marker LFOREARM: radius_l (-0.042134 -0.1262 -0.0076254)
    Marker LWR: radius_l (-0.043407 -0.26608 -0.010087)
    Marker r_fp_heel1: calcn_r (0.01 0 -0.05)
    Marker r_fp_heel2: calcn_r (0 0 0.03)
    Marker r_fp_mt1: calcn_r (0.135 0 0.07)
    Marker r_fp_mt2: calcn_r (0.205 0 -0.05)
    Marker r_fp_toe: calcn_r (0.275 0 0.02)
    Marker l_fp_heel1: calcn_l (0.01 0 0.05)
    Marker l_fp_heel2: calcn_l (0 0 -0.03)
    Marker l_fp_mt1: calcn_l (0.135 0 -0.07)
    Marker l_fp_mt2: calcn_l (0.205 0 0.05)
    Marker l_fp_toe: calcn_l (0.275 0 -0.02)
  ContactGeometrySet:
    ContactHalfSpace floor: socket_frame=/ground orientation=(0 0 -1.570796)
    ContactSphere heel_r: socket_frame=/bodyset/calcn_r location=(0.02783157 0.01723335 0) radius=0.035
    ContactSphere midfoot_r: socket_frame=/bodyset/calcn_r location=(0.122571 0.00723335 0) radius=0.025
    ContactSphere toe_r: socket_frame=/bodyset/calcn_r location=(0.1979993 0.00723335 0) radius=0.025
    ContactSphere heel_l: socket_frame=/bodyset/calcn_l location=(0.03130753 0.0105 0) radius=0.035
    ContactSphere midfoot_l: socket_frame=/bodyset/calcn_l location=(0.1232683 0.00723335 0) radius=0.025
    ContactSphere toe_l: socket_frame=/bodyset/calcn_l location=(0.1991258 0.00723335 0) radius=0.025
