# OpenSim document version 40000
CMC_TaskSet:
  CMC_Joint [values shared by the 37 below unless stated]: active=(true false false) kp=(100 0 0) kv=(20 0 0)
      ka=(1 1 1) r0=(0 0 0) r1=(0 0 0) r2=(0 0 0) limit=0
  CMC_Joint pelvis_tilt: weight=(1000 0 0) coordinate=pelvis_tilt
  CMC_Joint pelvis_list: weight=(500 0 0) coordinate=pelvis_list
  CMC_Joint pelvis_rotation: weight=(100 0 0) coordinate=pelvis_rotation
  CMC_Joint pelvis_tx: weight=(5 0 0) coordinate=pelvis_tx
  CMC_Joint pelvis_ty: weight=(5 0 0) coordinate=pelvis_ty
  CMC_Joint pelvis_tz: weight=(5 0 0) coordinate=pelvis_tz
  CMC_Joint hip_flexion_r: weight=(50 0 0) coordinate=hip_flexion_r
  CMC_Joint hip_adduction_r: weight=(25 0 0) coordinate=hip_adduction_r
  CMC_Joint hip_rotation_r: weight=(25 0 0) coordinate=hip_rotation_r
  CMC_Joint knee_angle_r: weight=(50 0 0) coordinate=knee_angle_r
  CMC_Joint ankle_angle_r: weight=(50 0 0) coordinate=ankle_angle_r
  CMC_Joint subtalar_angle_r: weight=(20 0 0) coordinate=subtalar_angle_r
  CMC_Joint mtp_angle_r: weight=(20 0 0) coordinate=mtp_angle_r
  CMC_Joint hip_flexion_l: weight=(50 0 0) coordinate=hip_flexion_l
  CMC_Joint hip_adduction_l: weight=(25 0 0) coordinate=hip_adduction_l
  CMC_Joint hip_rotation_l: weight=(25 0 0) coordinate=hip_rotation_l
  CMC_Joint knee_angle_l: weight=(50 0 0) coordinate=knee_angle_l
  CMC_Joint ankle_angle_l: weight=(50 0 0) coordinate=ankle_angle_l
  CMC_Joint subtalar_angle_l: weight=(20 0 0) coordinate=subtalar_angle_l
  CMC_Joint mtp_angle_l: weight=(20 0 0) coordinate=mtp_angle_l
  CMC_Joint lumbar_extension: weight=(30 0 0) coordinate=lumbar_extension
  CMC_Joint lumbar_bending: weight=(30 0 0) coordinate=lumbar_bending
  CMC_Joint lumbar_rotation: weight=(30 0 0) coordinate=lumbar_rotation
  CMC_Joint arm_flex_r: weight=(25 0 0) coordinate=arm_flex_r
  CMC_Joint arm_add_r: weight=(25 0 0) coordinate=arm_add_r
  CMC_Joint arm_rot_r: weight=(10 0 0) coordinate=arm_rot_r
  CMC_Joint elbow_flex_r: weight=(25 0 0) coordinate=elbow_flex_r
  CMC_Joint pro_sup_r: weight=(10 0 0) coordinate=pro_sup_r
  CMC_Joint wrist_flex_r: weight=(25 0 0) coordinate=wrist_flex_r
  CMC_Joint wrist_dev_r: weight=(10 0 0) coordinate=wrist_dev_r
  CMC_Joint arm_flex_l: weight=(25 0 0) coordinate=arm_flex_l
  CMC_Joint arm_add_l: weight=(25 0 0) coordinate=arm_add_l
  CMC_Joint arm_rot_l: weight=(10 0 0) coordinate=arm_rot_l
  CMC_Joint elbow_flex_l: weight=(25 0 0) coordinate=elbow_flex_l
  CMC_Joint pro_sup_l: weight=(10 0 0) coordinate=pro_sup_l
  CMC_Joint wrist_flex_l: weight=(25 0 0) coordinate=wrist_flex_l
  CMC_Joint wrist_dev_l: weight=(10 0 0) coordinate=wrist_dev_l
